modify wecc240_psse_G_1032_0.status OUT_OF_SERVICE;
modify wecc240_psse_G_1032_1.status OUT_OF_SERVICE;
modify wecc240_psse_G_1032_2.status OUT_OF_SERVICE;
modify wecc240_psse_G_1034_0.status OUT_OF_SERVICE;
modify wecc240_psse_G_1034_1.status OUT_OF_SERVICE;
modify wecc240_psse_G_1034_2.status OUT_OF_SERVICE;
modify wecc240_psse_G_1131_0.status OUT_OF_SERVICE;
modify wecc240_psse_G_1131_1.status OUT_OF_SERVICE;
modify wecc240_psse_G_1232_0.status OUT_OF_SERVICE;
modify wecc240_psse_G_1232_1.status OUT_OF_SERVICE;
modify wecc240_psse_G_1331_0.status OUT_OF_SERVICE;
modify wecc240_psse_G_1331_1.status OUT_OF_SERVICE;
modify wecc240_psse_G_1333_0.status OUT_OF_SERVICE;
modify wecc240_psse_G_1333_1.status OUT_OF_SERVICE;
modify wecc240_psse_G_1333_2.status OUT_OF_SERVICE;
modify wecc240_psse_G_1431_0.status OUT_OF_SERVICE;
modify wecc240_psse_G_1431_1.status OUT_OF_SERVICE;
modify wecc240_psse_G_1431_2.status OUT_OF_SERVICE;
modify wecc240_psse_G_2030_0.status OUT_OF_SERVICE;
modify wecc240_psse_G_2030_1.status OUT_OF_SERVICE;
modify wecc240_psse_G_2130_0.status OUT_OF_SERVICE;
modify wecc240_psse_G_2130_1.status OUT_OF_SERVICE;
modify wecc240_psse_G_2130_2.status OUT_OF_SERVICE;
modify wecc240_psse_G_2130_3.status OUT_OF_SERVICE;
modify wecc240_psse_G_2233_0.status OUT_OF_SERVICE;
modify wecc240_psse_G_2233_1.status OUT_OF_SERVICE;
modify wecc240_psse_G_2233_2.status OUT_OF_SERVICE;
modify wecc240_psse_G_2332_0.status OUT_OF_SERVICE;
modify wecc240_psse_G_2431_0.status OUT_OF_SERVICE;
modify wecc240_psse_G_2434_0.status OUT_OF_SERVICE;
modify wecc240_psse_G_2438_0.status OUT_OF_SERVICE;
modify wecc240_psse_G_2438_1.status OUT_OF_SERVICE;
modify wecc240_psse_G_2438_2.status OUT_OF_SERVICE;
modify wecc240_psse_G_2438_3.status OUT_OF_SERVICE;
modify wecc240_psse_G_2438_4.status OUT_OF_SERVICE;
modify wecc240_psse_G_2438_5.status OUT_OF_SERVICE;
modify wecc240_psse_G_2438_6.status OUT_OF_SERVICE;
modify wecc240_psse_G_2438_7.status OUT_OF_SERVICE;
modify wecc240_psse_G_2439_0.status OUT_OF_SERVICE;
modify wecc240_psse_G_2533_0.status OUT_OF_SERVICE;
modify wecc240_psse_G_2630_0.status OUT_OF_SERVICE;
modify wecc240_psse_G_2631_0.status OUT_OF_SERVICE;
modify wecc240_psse_G_2634_0.status OUT_OF_SERVICE;
modify wecc240_psse_G_2637_0.status OUT_OF_SERVICE;
modify wecc240_psse_G_2638_0.status OUT_OF_SERVICE;
modify wecc240_psse_G_3133_0.status OUT_OF_SERVICE;
modify wecc240_psse_G_3133_1.status OUT_OF_SERVICE;
modify wecc240_psse_G_3135_0.status OUT_OF_SERVICE;
modify wecc240_psse_G_3135_1.status OUT_OF_SERVICE;
modify wecc240_psse_G_3234_0.status OUT_OF_SERVICE;
modify wecc240_psse_G_3234_1.status OUT_OF_SERVICE;
modify wecc240_psse_G_3234_2.status OUT_OF_SERVICE;
modify wecc240_psse_G_3234_3.status OUT_OF_SERVICE;
modify wecc240_psse_G_3333_0.status OUT_OF_SERVICE;
modify wecc240_psse_G_3333_1.status OUT_OF_SERVICE;
modify wecc240_psse_G_3432_0.status OUT_OF_SERVICE;
modify wecc240_psse_G_3433_0.status OUT_OF_SERVICE;
modify wecc240_psse_G_3433_1.status OUT_OF_SERVICE;
modify wecc240_psse_G_3531_0.status OUT_OF_SERVICE;
modify wecc240_psse_G_3531_1.status OUT_OF_SERVICE;
modify wecc240_psse_G_3531_2.status OUT_OF_SERVICE;
modify wecc240_psse_G_3631_0.status OUT_OF_SERVICE;
modify wecc240_psse_G_3631_1.status OUT_OF_SERVICE;
modify wecc240_psse_G_3731_0.status OUT_OF_SERVICE;
modify wecc240_psse_G_3831_0.status OUT_OF_SERVICE;
modify wecc240_psse_G_3835_0.status OUT_OF_SERVICE;
modify wecc240_psse_G_3835_1.status OUT_OF_SERVICE;
modify wecc240_psse_G_3835_2.status OUT_OF_SERVICE;
modify wecc240_psse_G_3836_0.status OUT_OF_SERVICE;
modify wecc240_psse_G_3931_0.status OUT_OF_SERVICE;
modify wecc240_psse_G_3931_1.status OUT_OF_SERVICE;
modify wecc240_psse_G_3932_0.status OUT_OF_SERVICE;
modify wecc240_psse_G_3933_0.status OUT_OF_SERVICE;
modify wecc240_psse_G_3933_1.status OUT_OF_SERVICE;
modify wecc240_psse_G_3933_2.status OUT_OF_SERVICE;
modify wecc240_psse_G_3933_3.status OUT_OF_SERVICE;
modify wecc240_psse_G_3933_4.status OUT_OF_SERVICE;
modify wecc240_psse_G_3933_5.status OUT_OF_SERVICE;
modify wecc240_psse_G_3933_6.status OUT_OF_SERVICE;
modify wecc240_psse_G_4031_0.status OUT_OF_SERVICE;
modify wecc240_psse_G_4031_1.status OUT_OF_SERVICE;
modify wecc240_psse_G_4031_2.status OUT_OF_SERVICE;
modify wecc240_psse_G_4031_3.status OUT_OF_SERVICE;
modify wecc240_psse_G_4035_0.status OUT_OF_SERVICE;
modify wecc240_psse_G_4035_1.status OUT_OF_SERVICE;
modify wecc240_psse_G_4035_2.status OUT_OF_SERVICE;
modify wecc240_psse_G_4035_3.status OUT_OF_SERVICE;
modify wecc240_psse_G_4039_0.status OUT_OF_SERVICE;
modify wecc240_psse_G_4039_1.status OUT_OF_SERVICE;
modify wecc240_psse_G_4039_2.status OUT_OF_SERVICE;
modify wecc240_psse_G_4131_0.status OUT_OF_SERVICE;
modify wecc240_psse_G_4131_1.status OUT_OF_SERVICE;
modify wecc240_psse_G_4131_2.status OUT_OF_SERVICE;
modify wecc240_psse_G_4132_0.status OUT_OF_SERVICE;
modify wecc240_psse_G_4132_1.status OUT_OF_SERVICE;
modify wecc240_psse_G_4132_2.status OUT_OF_SERVICE;
modify wecc240_psse_G_4132_3.status OUT_OF_SERVICE;
modify wecc240_psse_G_4231_0.status OUT_OF_SERVICE;
modify wecc240_psse_G_4231_1.status OUT_OF_SERVICE;
modify wecc240_psse_G_4231_2.status OUT_OF_SERVICE;
modify wecc240_psse_G_4232_0.status OUT_OF_SERVICE;
modify wecc240_psse_G_4232_1.status OUT_OF_SERVICE;
modify wecc240_psse_G_4232_2.status OUT_OF_SERVICE;
modify wecc240_psse_G_5031_0.status OUT_OF_SERVICE;
modify wecc240_psse_G_5031_1.status OUT_OF_SERVICE;
modify wecc240_psse_G_5032_0.status OUT_OF_SERVICE;
modify wecc240_psse_G_5032_1.status OUT_OF_SERVICE;
modify wecc240_psse_G_5032_2.status OUT_OF_SERVICE;
modify wecc240_psse_G_5032_3.status OUT_OF_SERVICE;
modify wecc240_psse_G_5032_4.status OUT_OF_SERVICE;
modify wecc240_psse_G_6132_0.status OUT_OF_SERVICE;
modify wecc240_psse_G_6132_1.status OUT_OF_SERVICE;
modify wecc240_psse_G_6132_2.status OUT_OF_SERVICE;
modify wecc240_psse_G_6132_3.status OUT_OF_SERVICE;
modify wecc240_psse_G_6132_4.status OUT_OF_SERVICE;
modify wecc240_psse_G_6231_0.status OUT_OF_SERVICE;
modify wecc240_psse_G_6231_1.status OUT_OF_SERVICE;
modify wecc240_psse_G_6235_0.status OUT_OF_SERVICE;
modify wecc240_psse_G_6235_1.status OUT_OF_SERVICE;
modify wecc240_psse_G_6235_2.status OUT_OF_SERVICE;
modify wecc240_psse_G_6333_0.status OUT_OF_SERVICE;
modify wecc240_psse_G_6333_1.status OUT_OF_SERVICE;
modify wecc240_psse_G_6335_0.status OUT_OF_SERVICE;
modify wecc240_psse_G_6335_1.status OUT_OF_SERVICE;
modify wecc240_psse_G_6335_2.status OUT_OF_SERVICE;
modify wecc240_psse_G_6433_0.status OUT_OF_SERVICE;
modify wecc240_psse_G_6433_1.status OUT_OF_SERVICE;
modify wecc240_psse_G_6433_2.status OUT_OF_SERVICE;
modify wecc240_psse_G_6433_3.status OUT_OF_SERVICE;
modify wecc240_psse_G_6533_0.status OUT_OF_SERVICE;
modify wecc240_psse_G_6533_1.status OUT_OF_SERVICE;
modify wecc240_psse_G_6533_2.status OUT_OF_SERVICE;
modify wecc240_psse_G_6533_3.status OUT_OF_SERVICE;
modify wecc240_psse_G_6533_4.status OUT_OF_SERVICE;
modify wecc240_psse_G_7031_0.status OUT_OF_SERVICE;
modify wecc240_psse_G_7031_1.status OUT_OF_SERVICE;
modify wecc240_psse_G_7031_2.status OUT_OF_SERVICE;
modify wecc240_psse_G_7031_3.status OUT_OF_SERVICE;
modify wecc240_psse_G_7031_4.status OUT_OF_SERVICE;
modify wecc240_psse_G_7032_0.status OUT_OF_SERVICE;
modify wecc240_psse_G_7032_1.status OUT_OF_SERVICE;
modify wecc240_psse_G_7032_2.status OUT_OF_SERVICE;
modify wecc240_psse_G_7032_3.status OUT_OF_SERVICE;
modify wecc240_psse_G_8033_0.status OUT_OF_SERVICE;
modify wecc240_psse_G_8034_0.status OUT_OF_SERVICE;
modify wecc240_psse_G_8034_1.status OUT_OF_SERVICE;
object pypower.gen {
    name wecc240_psse_G_1401;
    bus 18;
    status IN_SERVICE;
}
modify PALO_VERDE.parent wecc240_psse_G_1401;
object pypower.gen {
    name wecc240_psse_G_1101;
    bus 7;
    status IN_SERVICE;
}
modify SPRINGERVILLE.parent wecc240_psse_G_1101;
object pypower.gen {
    name wecc240_psse_G_1402;
    bus 19;
    status IN_SERVICE;
}
modify SANTAN.parent wecc240_psse_G_1402;
modify HARQUAHALA_GENERATING_PROJECT.parent wecc240_psse_G_1401;
object pypower.gen {
    name wecc240_psse_G_1202;
    bus 11;
    status IN_SERVICE;
}
modify GLEN_CANYON_DAM.parent wecc240_psse_G_1202;
modify WEST_PHOENIX.parent wecc240_psse_G_1402;
modify RED_HAWK.parent wecc240_psse_G_1401;
object pypower.gen {
    name wecc240_psse_G_1102;
    bus 8;
    status IN_SERVICE;
}
modify BOWIE_POWER_STATION_LLC.parent wecc240_psse_G_1102;
object pypower.gen {
    name wecc240_psse_G_1301;
    bus 13;
    status IN_SERVICE;
}
modify HOOVER_DAM_AZ.parent wecc240_psse_G_1301;
modify CHOLLA.parent wecc240_psse_G_1102;
modify CORONADO.parent wecc240_psse_G_1101;
modify COOLIDGE_GENERATION_STATION.parent wecc240_psse_G_1402;
modify ARLINGTON_VALLEY_ENERGY_FACILITY.parent wecc240_psse_G_1401;
object pypower.gen {
    name wecc240_psse_G_1403;
    bus 20;
    status IN_SERVICE;
}
modify SOUTH_POINT_ENERGY_CENTER.parent wecc240_psse_G_1403;
modify MESQUITE_GENERATING_STATION_BLOCK_1.parent wecc240_psse_G_1401;
modify MESQUITE_GENERATING_STATION_BLOCK_2.parent wecc240_psse_G_1401;
modify APACHE_STATION.parent wecc240_psse_G_1102;
modify GRIFFITH_ENERGY_LLC.parent wecc240_psse_G_1403;
modify DESERT_BASIN.parent wecc240_psse_G_1402;
modify GILA_RIVER_POWER_BLOCK_2.parent wecc240_psse_G_1401;
modify GILA_RIVER_POWER_BLOCK_3.parent wecc240_psse_G_1401;
modify GILA_RIVER_POWER_STATION.parent wecc240_psse_G_1401;
modify SUNDEVIL_POWER_HOLDINGS_-_GILA_RIVER.parent wecc240_psse_G_1401;
modify AGUA_FRIA.parent wecc240_psse_G_1402;
modify SUNDANCE.parent wecc240_psse_G_1402;
modify KYRENE.parent wecc240_psse_G_1402;
modify H_WILSON_SUNDT_GENERATING_STATION.parent wecc240_psse_G_1402;
object pypower.gen {
    name wecc240_psse_G_2100;
    bus 24;
    status IN_SERVICE;
}
modify YUCCA.parent wecc240_psse_G_2100;
modify AGUA_CALIENTE_SOLAR_PROJECT.parent wecc240_psse_G_1401;
modify OCOTILLO.parent wecc240_psse_G_1402;
modify SOLANA_GENERATING_STATION.parent wecc240_psse_G_1401;
object pypower.gen {
    name wecc240_psse_G_2901;
    bus 80;
    status IN_SERVICE;
}
modify DAVIS_DAM.parent wecc240_psse_G_2901;
modify SAGUARO.parent wecc240_psse_G_1402;
modify MESQUITE_SOLAR_1.parent wecc240_psse_G_1401;
modify MESQUITE_3.parent wecc240_psse_G_1401;
modify HORSE_MESA.parent wecc240_psse_G_1402;
modify ARLINGTON_VALLEY_SOLAR_ENERGY_II.parent wecc240_psse_G_1401;
modify BLACK_MOUNTAIN_GENERATING_STATION.parent wecc240_psse_G_1403;
modify NORTH_LOOP.parent wecc240_psse_G_1402;
modify MESQUITE_2.parent wecc240_psse_G_1401;
object pypower.gen {
    name wecc240_psse_G_1201;
    bus 10;
    status IN_SERVICE;
}
modify PERRIN_RANCH_WIND_LLC.parent wecc240_psse_G_1201;
modify APACHE_SOLAR_1.parent wecc240_psse_G_1102;
modify DEMOSS_PETRIE.parent wecc240_psse_G_1402;
modify RED_HORSE_2.parent wecc240_psse_G_1102;
modify DRY_LAKE_WIND_II_LLC.parent wecc240_psse_G_1102;
modify MORMON_FLAT.parent wecc240_psse_G_1402;
modify DRY_LAKE_WIND_LLC.parent wecc240_psse_G_1102;
modify YUMA_COGENERATION_ASSOCIATES.parent wecc240_psse_G_2100;
modify BONNYBROOKE_PV.parent wecc240_psse_G_1402;
modify SANDSTONE_SOLAR.parent wecc240_psse_G_1402;
modify WADDELL.parent wecc240_psse_G_1402;
modify RED_ROCK.parent wecc240_psse_G_1402;
modify ROOSEVELT.parent wecc240_psse_G_1402;
modify FOOTHILLS_SOLAR_PLANT.parent wecc240_psse_G_2100;
modify GILA_BEND.parent wecc240_psse_G_1401;
modify RED_HORSE_III.parent wecc240_psse_G_1102;
modify AVALON_SOLAR.parent wecc240_psse_G_1402;
modify KAYENTA_SOLAR_PROJECT.parent wecc240_psse_G_1202;
modify NOVO_BIOPOWER_PLANT.parent wecc240_psse_G_1102;
modify AVRA_VALLEY_SOLAR.parent wecc240_psse_G_1402;
modify DOUGLAS.parent wecc240_psse_G_1102;
modify HYDER_SOLAR.parent wecc240_psse_G_1401;
modify PICTURE_ROCKS_SOLAR_LLC.parent wecc240_psse_G_1402;
modify SULPHUR_SPRINGS.parent wecc240_psse_G_1102;
modify COPPER_CROSSING_SOLAR_LLC.parent wecc240_psse_G_1402;
modify HEADGATE_ROCK.parent wecc240_psse_G_1403;
modify QUEEN_CREEK_SOLAR_FARM.parent wecc240_psse_G_1402;
modify CHINO_SOLAR_VALLEY.parent wecc240_psse_G_1402;
modify PALOMA_SOLAR.parent wecc240_psse_G_1401;
modify HYDER_SOLAR_PLANT_PHASE_1.parent wecc240_psse_G_1401;
modify PALOMA_SOLAR_PLANT.parent wecc240_psse_G_1401;
modify COTTON_CENTER_SOLAR.parent wecc240_psse_G_1401;
modify RE_BAGDAD_SOLAR_I_LLC.parent wecc240_psse_G_1402;
modify AVALON_SOLAR_II.parent wecc240_psse_G_1402;
modify SADDLE_MOUNTAIN_SOLAR_I.parent wecc240_psse_G_1401;
modify GILLESPIE_1.parent wecc240_psse_G_1401;
modify BAGDAD_SOLAR_PROJECT.parent wecc240_psse_G_1402;
modify BADGER_1.parent wecc240_psse_G_1401;
modify MOHAVE_ELECTRIC_AT_FORT_MOHAVE.parent wecc240_psse_G_1403;
modify HYDER_II.parent wecc240_psse_G_1401;
modify FORT_HUACHUCA_SOLAR_PV_PROJECT.parent wecc240_psse_G_1402;
modify STEWART_MOUNTAIN.parent wecc240_psse_G_1402;
modify DAVIS_MONTHAN_AFB_AZ_WEST_AIRFIELD.parent wecc240_psse_G_1402;
modify IRON_HORSE_BATTERY_STORAGE.parent wecc240_psse_G_1402;
modify PRESCOTT_SOLAR_PLANT.parent wecc240_psse_G_1402;
modify KINGMAN_1.parent wecc240_psse_G_1403;
modify SR85.parent wecc240_psse_G_1401;
modify PIMA_ENERGY_STORAGE_SYSTEM.parent wecc240_psse_G_1402;
modify VALENCIA_SOLAR.parent wecc240_psse_G_1402;
modify PRESCOTT.parent wecc240_psse_G_1402;
object pypower.gen {
    name wecc240_psse_G_3801;
    bus 114;
    status IN_SERVICE;
}
modify DIABLO_CANYON.parent wecc240_psse_G_3801;
object pypower.gen {
    name wecc240_psse_G_2407;
    bus 40;
    status IN_SERVICE;
}
modify AES_ALAMITOS_LLC.parent wecc240_psse_G_2407;
modify HAYNES.parent wecc240_psse_G_2407;
object pypower.gen {
    name wecc240_psse_G_2608;
    bus 61;
    status IN_SERVICE;
}
modify CASTAIC.parent wecc240_psse_G_2608;
object pypower.gen {
    name wecc240_psse_G_2618;
    bus 71;
    status IN_SERVICE;
}
modify ORMOND_BEACH.parent wecc240_psse_G_2618;
object pypower.gen {
    name wecc240_psse_G_3902;
    bus 131;
    status IN_SERVICE;
}
modify DYNEGY_MOSS_LANDING_POWER_PLANT.parent wecc240_psse_G_3902;
modify AES_REDONDO_BEACH_LLC.parent wecc240_psse_G_2407;
object pypower.gen {
    name wecc240_psse_G_3501;
    bus 108;
    status IN_SERVICE;
}
modify GEYSERS_UNIT_5-20.parent wecc240_psse_G_3501;
object pypower.gen {
    name wecc240_psse_G_3803;
    bus 116;
    status IN_SERVICE;
}
modify LA_PALOMA_GENERATING_LLC.parent wecc240_psse_G_3803;
object pypower.gen {
    name wecc240_psse_G_3806;
    bus 119;
    status IN_SERVICE;
}
modify DYNEGY_MORRO_BAY_LLC.parent wecc240_psse_G_3806;
object pypower.gen {
    name wecc240_psse_G_3402;
    bus 102;
    status IN_SERVICE;
}
modify HELMS_PUMPED_STORAGE.parent wecc240_psse_G_3402;
object pypower.gen {
    name wecc240_psse_G_2403;
    bus 36;
    status IN_SERVICE;
}
modify MOUNTAINVIEW_GENERATING_STATION.parent wecc240_psse_G_2403;
object pypower.gen {
    name wecc240_psse_G_2503;
    bus 51;
    status IN_SERVICE;
}
modify ENCINA.parent wecc240_psse_G_2503;
object pypower.gen {
    name wecc240_psse_G_3204;
    bus 92;
    status IN_SERVICE;
}
modify DELTA_ENERGY_CENTER.parent wecc240_psse_G_3204;
object pypower.gen {
    name wecc240_psse_G_2613;
    bus 66;
    status IN_SERVICE;
}
modify SCATTERGOOD.parent wecc240_psse_G_2613;
object pypower.gen {
    name wecc240_psse_G_2603;
    bus 56;
    status IN_SERVICE;
}
modify HIGH_DESERT_POWER_PLANT.parent wecc240_psse_G_2603;
modify MARSH_LANDING_GENERATING_STATION.parent wecc240_psse_G_3204;
object pypower.gen {
    name wecc240_psse_G_2400;
    bus 33;
    status IN_SERVICE;
}
modify CPV_SENTINEL_ENERGY_PROJECT.parent wecc240_psse_G_2400;
modify PASTORIA_ENERGY_FACILITY_LLC.parent wecc240_psse_G_2608;
modify BLYTHE_SOLAR_POWER_PROJECT.parent wecc240_psse_G_1403;
object pypower.gen {
    name wecc240_psse_G_8001;
    bus 237;
    status IN_SERVICE;
}
modify SHASTA.parent wecc240_psse_G_8001;
object pypower.gen {
    name wecc240_psse_G_3916;
    bus 145;
    status IN_SERVICE;
}
modify COLUSA_GENERATING_STATION.parent wecc240_psse_G_3916;
object pypower.gen {
    name wecc240_psse_G_2602;
    bus 55;
    status IN_SERVICE;
}
modify VALLEY_CA.parent wecc240_psse_G_2602;
object pypower.gen {
    name wecc240_psse_G_2201;
    bus 26;
    status IN_SERVICE;
}
modify OTAY_MESA_GENERATING_PROJECT.parent wecc240_psse_G_2201;
modify OTAY_MESA_GENERATING_PROJECT_2.parent wecc240_psse_G_2201;
modify LOS_MEDANOS_ENERGY_CENTER.parent wecc240_psse_G_3204;
object pypower.gen {
    name wecc240_psse_G_3904;
    bus 133;
    status IN_SERVICE;
}
modify CPV_VACA_STATION_LLC.parent wecc240_psse_G_3904;
object pypower.gen {
    name wecc240_psse_G_3305;
    bus 99;
    status IN_SERVICE;
}
modify RUSSELL_CITY_ENERGY_CENTER.parent wecc240_psse_G_3305;
object pypower.gen {
    name wecc240_psse_G_3919;
    bus 148;
    status IN_SERVICE;
}
modify EDWARD_C_HYATT.parent wecc240_psse_G_3919;
object pypower.gen {
    name wecc240_psse_G_3405;
    bus 105;
    status IN_SERVICE;
}
modify SUTTER_ENERGY_CENTER.parent wecc240_psse_G_3405;
object pypower.gen {
    name wecc240_psse_G_3301;
    bus 95;
    status IN_SERVICE;
}
modify METCALF_ENERGY_CENTER.parent wecc240_psse_G_3301;
modify ELK_HILLS_POWER_LLC.parent wecc240_psse_G_3803;
modify GATEWAY_GENERATING_STATION.parent wecc240_psse_G_3204;
modify SUNRISE_POWER_LLC.parent wecc240_psse_G_3803;
modify BLYTHE_ENERGY_INC.parent wecc240_psse_G_1403;
modify TOPAZ_SOLAR_FARM.parent wecc240_psse_G_3803;
modify TOPAZ.parent wecc240_psse_G_3803;
object pypower.gen {
    name wecc240_psse_G_2203;
    bus 28;
    status IN_SERVICE;
}
modify PALOMAR_ENERGY.parent wecc240_psse_G_2203;
modify HARBOR.parent wecc240_psse_G_2407;
modify SONORAN_WEST_SOLAR_EGS.parent wecc240_psse_G_2100;
modify EL_SEGUNDO_ENERGY_CENTER_LLC.parent wecc240_psse_G_2613;
object pypower.gen {
    name wecc240_psse_G_8004;
    bus 240;
    status IN_SERVICE;
}
modify COSUMNES.parent wecc240_psse_G_8004;
object pypower.gen {
    name wecc240_psse_G_2408;
    bus 41;
    status IN_SERVICE;
}
modify WALNUT_CREEK_ENERGY_PARK.parent wecc240_psse_G_2408;
object pypower.gen {
    name wecc240_psse_G_2610;
    bus 63;
    status IN_SERVICE;
}
modify AES_HUNTINGTON_BEACH_LLC.parent wecc240_psse_G_2610;
object pypower.gen {
    name wecc240_psse_G_3404;
    bus 104;
    status IN_SERVICE;
}
modify PANOCHE_ENERGY_CENTER.parent wecc240_psse_G_3404;
object pypower.gen {
    name wecc240_psse_G_3901;
    bus 130;
    status IN_SERVICE;
}
modify W_R_GIANELLI.parent wecc240_psse_G_3901;
modify HYDROGEN_ENERGY_CALIFORNIA_LLC.parent wecc240_psse_G_3803;
modify WATSON_COGENERATION.parent wecc240_psse_G_2407;
object pypower.gen {
    name wecc240_psse_G_2301;
    bus 30;
    status IN_SERVICE;
}
modify EL_CENTRO.parent wecc240_psse_G_2301;
modify MAGNOLIA_POWER_PROJECT.parent wecc240_psse_G_2602;
object pypower.gen {
    name wecc240_psse_G_3903;
    bus 132;
    status IN_SERVICE;
}
modify TRACY_COMBINED_CYCLE_POWER_PLANT.parent wecc240_psse_G_3903;
modify ALTAMONT_PASS_WINDPLANT.parent wecc240_psse_G_3903;
modify PIO_PICO_ENERGY_CENTER.parent wecc240_psse_G_2201;
object pypower.gen {
    name wecc240_psse_G_2902;
    bus 81;
    status IN_SERVICE;
}
modify ANTELOPE_VALLEY_I.parent wecc240_psse_G_2902;
modify SOLAR_STAR_1.parent wecc240_psse_G_2902;
object pypower.gen {
    name wecc240_psse_G_3909;
    bus 138;
    status IN_SERVICE;
}
modify COLGATE.parent wecc240_psse_G_3909;
modify DESERT_SUNLIGHT_300_LLC.parent wecc240_psse_G_2100;
object pypower.gen {
    name wecc240_psse_G_3203;
    bus 91;
    status IN_SERVICE;
}
modify LOS_ESTEROS_CRITICAL_ENERGY_CENTER.parent wecc240_psse_G_3203;
object pypower.gen {
    name wecc240_psse_G_2609;
    bus 62;
    status IN_SERVICE;
}
modify GRAYSON.parent wecc240_psse_G_2609;
modify WALNUT_ENERGY_CENTER.parent wecc240_psse_G_3901;
modify KERN_RIVER_COGENERATION.parent wecc240_psse_G_3803;
modify SYCAMORE_COGENERATION.parent wecc240_psse_G_3803;
object pypower.gen {
    name wecc240_psse_G_3907;
    bus 136;
    status IN_SERVICE;
}
modify NEW_MELONES.parent wecc240_psse_G_3907;
modify DESERT_STATELINE.parent wecc240_psse_G_2901;
object pypower.gen {
    name wecc240_psse_G_8002;
    bus 238;
    status IN_SERVICE;
}
modify LODI_ENERGY_CENTER.parent wecc240_psse_G_8002;
modify MOJAVE_SOLAR_PROJECT.parent wecc240_psse_G_2603;
modify SOLAR_STAR_2.parent wecc240_psse_G_2902;
object pypower.gen {
    name wecc240_psse_G_2401;
    bus 34;
    status IN_SERVICE;
}
modify DEVIL_CANYON.parent wecc240_psse_G_2401;
modify MCCOY_SOLAR_ENERGY_PROJECT.parent wecc240_psse_G_1403;
object pypower.gen {
    name wecc240_psse_G_3913;
    bus 142;
    status IN_SERVICE;
}
modify WHITE_ROCK_SLAB_CREEK.parent wecc240_psse_G_3913;
object pypower.gen {
    name wecc240_psse_G_2406;
    bus 39;
    status IN_SERVICE;
}
modify GLENARM.parent wecc240_psse_G_2406;
modify OCOTILLO_EXPRESS_LLC.parent wecc240_psse_G_2301;
modify AV_SOLAR_RANCH_ONE.parent wecc240_psse_G_2608;
modify COLLIERVILLE_POWERHOUSE.parent wecc240_psse_G_3907;
modify LONG_BEACH_GENERATION_LLC.parent wecc240_psse_G_2407;
modify HIDDEN_HILLS_SOLAR_PLANT_2.parent wecc240_psse_G_2901;
modify RIO_MESA_SEGF_2.parent wecc240_psse_G_2100;
modify GENESIS_SOLAR_ENERGY_PROJECT.parent wecc240_psse_G_2100;
modify RIO_MESA_SOLAR_FACILITY_1.parent wecc240_psse_G_2100;
modify HIDDEN_HILLS_SOLAR_PLANT_1.parent wecc240_psse_G_2901;
modify CA_VALLEY.parent wecc240_psse_G_3803;
modify CALIFORNIA_VALLEY_SOLAR_RANCH.parent wecc240_psse_G_3803;
modify DESERT_SUNLIGHT_250_LLC.parent wecc240_psse_G_2100;
object pypower.gen {
    name wecc240_psse_G_3205;
    bus 93;
    status IN_SERVICE;
}
modify CROCKETT_COGEN_PROJECT.parent wecc240_psse_G_3205;
modify MIDWAY_SUNSET_COGEN.parent wecc240_psse_G_3803;
modify SOLANO_WIND.parent wecc240_psse_G_3204;
modify ALMOND_POWER_PLANT.parent wecc240_psse_G_3907;
object pypower.gen {
    name wecc240_psse_G_3101;
    bus 82;
    status IN_SERVICE;
}
modify DYNEGY_OAKLAND_POWER_PLANT.parent wecc240_psse_G_3101;
modify RE_TRANQUILLITY.parent wecc240_psse_G_3404;
object pypower.gen {
    name wecc240_psse_G_2501;
    bus 49;
    status IN_SERVICE;
}
modify CANYON_POWER_PLANT.parent wecc240_psse_G_2501;
modify MT_SIGNAL.parent wecc240_psse_G_2301;
modify IMPERIAL_VALLEY_SOLAR_LLC.parent wecc240_psse_G_2301;
modify MARIPOSA_ENERGY_PROJECT.parent wecc240_psse_G_3903;
modify WOODLAND.parent wecc240_psse_G_3907;
modify FOLSOM.parent wecc240_psse_G_3913;
object pypower.gen {
    name wecc240_psse_G_2402;
    bus 35;
    status IN_SERVICE;
}
modify RIVERSIDE_ENERGY_RESOURCE_CENTER.parent wecc240_psse_G_2402;
object pypower.gen {
    name wecc240_psse_G_3908;
    bus 137;
    status IN_SERVICE;
}
modify SCA_COGEN_2.parent wecc240_psse_G_3908;
modify MANZANA_WIND_LLC.parent wecc240_psse_G_2902;
modify GARLAND.parent wecc240_psse_G_2608;
modify REDDING_POWER.parent wecc240_psse_G_8001;
modify EL_SEGUNDO_COGEN.parent wecc240_psse_G_2613;
modify SPRING_CREEK.parent wecc240_psse_G_8001;
modify CALISTOGA_POWER_PLANT.parent wecc240_psse_G_3501;
modify CENTINELA_SOLAR_ENERGY.parent wecc240_psse_G_2301;
modify BIG_CREEK_3.parent wecc240_psse_G_3402;
modify SPA_COGEN_3.parent wecc240_psse_G_3908;
modify DON_PEDRO.parent wecc240_psse_G_3907;
modify RICE_SOLAR_ENERGY.parent wecc240_psse_G_1403;
object pypower.gen {
    name wecc240_psse_G_3906;
    bus 135;
    status IN_SERVICE;
}
modify JAMES_B_BLACK.parent wecc240_psse_G_3906;
modify PINYON_PINE_I.parent wecc240_psse_G_2902;
modify ALTA_WIND_ENERGY_CENTER_V.parent wecc240_psse_G_2902;
object pypower.gen {
    name wecc240_psse_G_3601;
    bus 110;
    status IN_SERVICE;
}
modify HUMBOLDT_BAY.parent wecc240_psse_G_3601;
object pypower.gen {
    name wecc240_psse_G_3403;
    bus 103;
    status IN_SERVICE;
}
modify PINE_FLAT.parent wecc240_psse_G_3403;
object pypower.gen {
    name wecc240_psse_G_3920;
    bus 149;
    status IN_SERVICE;
}
modify ROSEVILLE_ENERGY_PARK.parent wecc240_psse_G_3920;
modify HIGH_WINDS_LLC.parent wecc240_psse_G_3204;
modify NORTH_SKY_RIVER_ENERGY_LLC.parent wecc240_psse_G_2902;
modify JAYBIRD.parent wecc240_psse_G_3913;
modify CAMINO.parent wecc240_psse_G_3913;
object pypower.gen {
    name wecc240_psse_G_3401;
    bus 101;
    status IN_SERVICE;
}
modify DION_R_HOLM.parent wecc240_psse_G_3401;
modify RICHMOND_COGEN.parent wecc240_psse_G_3101;
modify SONORA_FACILITY.parent wecc240_psse_G_2100;
modify SOLAR_GEN_2.parent wecc240_psse_G_2100;
modify ARKANSAS.parent wecc240_psse_G_2100;
modify SPRINGBOK_2.parent wecc240_psse_G_2902;
modify JUDGE_F_CARR.parent wecc240_psse_G_8001;
modify DONALD_VON_RAESFELD_POWER_PLANT.parent wecc240_psse_G_3203;
modify PACIFIC_WIND_LLC.parent wecc240_psse_G_2902;
modify ALTA_WIND_ENERGY_CENTER_II.parent wecc240_psse_G_2902;
modify SHILOH_I_WIND_PROJECT.parent wecc240_psse_G_3204;
modify ALTA_WIND_ENERGY_CENTER_I.parent wecc240_psse_G_2902;
modify ALTA_WIND_VIII.parent wecc240_psse_G_2902;
modify MUSTANG_HILLS_LLC.parent wecc240_psse_G_2902;
modify SHILOH_WIND_PROJECT_2_LLC.parent wecc240_psse_G_3204;
modify ALTA_WIND_ENERGY_CENTER_III.parent wecc240_psse_G_2902;
modify INDIGO_ENERGY_FACILITY.parent wecc240_psse_G_2400;
modify IMPERIAL_SOLAR_ENERGY_CENTER_WEST.parent wecc240_psse_G_2301;
modify CAMPO_VERDE_SOLAR.parent wecc240_psse_G_2301;
object pypower.gen {
    name wecc240_psse_G_3905;
    bus 134;
    status IN_SERVICE;
}
modify POE.parent wecc240_psse_G_3905;
modify MCCLURE.parent wecc240_psse_G_3907;
modify PIT_5.parent wecc240_psse_G_3906;
modify TRINITY.parent wecc240_psse_G_8001;
modify MIDWAY_PEAKING_LLC.parent wecc240_psse_G_3404;
modify KERCKHOFF_2.parent wecc240_psse_G_3401;
modify ALTA_WIND_X.parent wecc240_psse_G_2902;
modify GILROY_PEAKING_ENERGY_CENTER.parent wecc240_psse_G_3301;
modify HAAS.parent wecc240_psse_G_3402;
modify PINE_TREE_WIND_POWER_PROJECT.parent wecc240_psse_G_2902;
modify IVANPAH_3.parent wecc240_psse_G_2901;
modify IVANPAH_2.parent wecc240_psse_G_2901;
modify KING_CITY_POWER_PLANT.parent wecc240_psse_G_3902;
modify IVANPAH_1.parent wecc240_psse_G_2901;
modify PINYON_PINE_II.parent wecc240_psse_G_2902;
modify BLYTHE_SOLAR_II_LLC.parent wecc240_psse_G_1403;
modify CA_FLATS_SOLAR_130_LLC.parent wecc240_psse_G_3806;
object pypower.gen {
    name wecc240_psse_G_2605;
    bus 58;
    status IN_SERVICE;
}
modify MALBURG.parent wecc240_psse_G_2605;
modify GILROY_POWER_PLANT.parent wecc240_psse_G_3301;
modify IMPERIAL_CENTER_S.parent wecc240_psse_G_2301;
modify IMPERIAL_SOLAR_ENERGY_CENTER_SOUTH.parent wecc240_psse_G_2301;
modify ROCK_CREEK.parent wecc240_psse_G_3905;
modify CARSON_ICE-GEN_PROJECT.parent wecc240_psse_G_3908;
modify MIDDLE_FORK.parent wecc240_psse_G_3913;
modify KINGS_RIVER.parent wecc240_psse_G_3403;
modify NILAND_GAS_TURBINE_PLANT.parent wecc240_psse_G_2100;
modify RIPON_GENERATION_STATION.parent wecc240_psse_G_8002;
modify PARKER_DAM.parent wecc240_psse_G_1403;
modify WINDSTAR_1.parent wecc240_psse_G_2902;
modify ORANGE_GROVE_PEAKING_FACILITY.parent wecc240_psse_G_2503;
modify CARIBOU_2.parent wecc240_psse_G_3905;
modify BELDEN.parent wecc240_psse_G_3905;
modify KESWICK.parent wecc240_psse_G_8001;
modify R_C_KIRKWOOD.parent wecc240_psse_G_3401;
modify THERMALITO.parent wecc240_psse_G_3905;
object pypower.gen {
    name wecc240_psse_G_3201;
    bus 89;
    status IN_SERVICE;
}
modify FOSTER_WHEELER_MARTINEZ.parent wecc240_psse_G_3201;
modify CATALINA_1_2.parent wecc240_psse_G_2902;
modify GEOTHERMAL_1.parent wecc240_psse_G_3501;
modify CATALINA_SOLAR_LLC.parent wecc240_psse_G_2902;
modify GEOTHERMAL_2.parent wecc240_psse_G_3501;
modify PIT_7.parent wecc240_psse_G_3906;
modify NRG_SOLAR_BLYTHE_II.parent wecc240_psse_G_1403;
modify QUINTO.parent wecc240_psse_G_3901;
modify ACE_COGENERATION_FACILITY.parent wecc240_psse_G_2902;
modify QUINTO_SOLAR_PV_PROJECT.parent wecc240_psse_G_3901;
modify HARBOR_COGEN.parent wecc240_psse_G_2407;
modify MIRAMAR_ENERGY_FACILITY.parent wecc240_psse_G_2203;
modify SPRINGBOK_1.parent wecc240_psse_G_2902;
modify PIT_4.parent wecc240_psse_G_3906;
modify SHILOH_III_WIND_PROJECT_LLC.parent wecc240_psse_G_3204;
modify ELECTRA.parent wecc240_psse_G_8004;
modify SHILOH_IV_WIND_PROJECT_LLC.parent wecc240_psse_G_3204;
modify ALTA_WIND_ENERGY_CENTER_IV.parent wecc240_psse_G_2902;
object pypower.gen {
    name wecc240_psse_G_3802;
    bus 115;
    status IN_SERVICE;
}
modify HENRIETTA_SOLAR_PROJECT.parent wecc240_psse_G_3802;
modify BROOKFIELD_TEHACHAPI_1.parent wecc240_psse_G_2902;
modify HENRIETTA_SOLAR.parent wecc240_psse_G_3802;
modify HATCHET_RIDGE_WIND_PROJECT.parent wecc240_psse_G_3906;
modify MOCCASIN.parent wecc240_psse_G_3907;
modify GREAT_VALLEY_SOLAR_PORTFOLIO_HOLDINGS_LLC.parent wecc240_psse_G_3404;
modify MARTINEZ_REFINING.parent wecc240_psse_G_3201;
modify ASTORIA_1.parent wecc240_psse_G_2608;
modify RE_MUSTANG_LLC.parent wecc240_psse_G_3802;
modify BIG_CREEK_4.parent wecc240_psse_G_3401;
modify RE_MUSTANG_4.parent wecc240_psse_G_3802;
modify RE_MUSTANG.parent wecc240_psse_G_3802;
modify RE_MUSTANG_3.parent wecc240_psse_G_3802;
modify LARKSPUR_ENERGY_FACILITY.parent wecc240_psse_G_2201;
modify RISING_TREE_WIND_FARM_III.parent wecc240_psse_G_2902;
modify HENRIETTA_PEAKER.parent wecc240_psse_G_3802;
modify BALCH_2.parent wecc240_psse_G_3402;
modify EXCHEQUER.parent wecc240_psse_G_3401;
modify SOUTH_BELRIDGE_COGENERATION_FACILITY.parent wecc240_psse_G_3803;
modify COACHELLA.parent wecc240_psse_G_2400;
modify COSO_FINANCE_PARTNERS.parent wecc240_psse_G_2902;
modify HANFORD_ENERGY_PARK_PEAKER.parent wecc240_psse_G_3403;
modify SEGS_IX.parent wecc240_psse_G_2603;
modify SEGS_VIII.parent wecc240_psse_G_2603;
modify COSO_POWER_DEVELOPERS.parent wecc240_psse_G_2902;
modify COSO_ENERGY_DEVELOPERS.parent wecc240_psse_G_2902;
modify ALTA_WIND_XI.parent wecc240_psse_G_2902;
modify BIG_CREEK_1.parent wecc240_psse_G_3402;
modify GOLDEN_HILLS_WIND.parent wecc240_psse_G_3903;
object pypower.gen {
    name wecc240_psse_G_2404;
    bus 37;
    status IN_SERVICE;
}
modify SOLVERDE_1.parent wecc240_psse_G_2404;
modify EQUILON_LOS_ANGELES_REFINING.parent wecc240_psse_G_2407;
modify FRESNO_COGEN_PARTNERS.parent wecc240_psse_G_3401;
modify STANISLAUS.parent wecc240_psse_G_3907;
modify PIT_3.parent wecc240_psse_G_3906;
modify SECOND_IMPERIAL_GEOTHERMAL.parent wecc240_psse_G_2301;
modify RALSTON.parent wecc240_psse_G_3913;
modify PIT_6.parent wecc240_psse_G_3906;
modify RISING_TREE_WIND_FARM.parent wecc240_psse_G_2902;
modify VASCO_WINDS.parent wecc240_psse_G_3903;
modify MONTEZUMA_WIND_II.parent wecc240_psse_G_3204;
modify SONOMA_CALIFORNIA_GEOTHERMAL.parent wecc240_psse_G_3501;
modify MCCLELLAN_CA.parent wecc240_psse_G_3908;
modify ASTORIA_2.parent wecc240_psse_G_2608;
modify W_E_WARNE.parent wecc240_psse_G_2608;
object pypower.gen {
    name wecc240_psse_G_3701;
    bus 112;
    status IN_SERVICE;
}
modify LOON_LAKE.parent wecc240_psse_G_3701;
modify CARIBOU_1.parent wecc240_psse_G_3905;
modify CRESTA.parent wecc240_psse_G_3905;
modify DONNELLS.parent wecc240_psse_G_3907;
object pypower.gen {
    name wecc240_psse_G_2410;
    bus 43;
    status IN_SERVICE;
}
modify SAN_FRANCISQUITO_1.parent wecc240_psse_G_2410;
modify PIT_1.parent wecc240_psse_G_3906;
modify OXNARD.parent wecc240_psse_G_2618;
modify LOS_ANGELES_REFINERY_WILMINGTON.parent wecc240_psse_G_2407;
modify MOUNTAIN_VIEW_I2.parent wecc240_psse_G_2400;
modify BUCKS_CREEK.parent wecc240_psse_G_3905;
modify SAN_GABRIEL_FACILITY.parent wecc240_psse_G_2402;
modify ALPINE_SOLAR.parent wecc240_psse_G_2608;
modify GIANERA.parent wecc240_psse_G_3203;
modify NORTH_BRAWLEY_GEOTHERMAL_PLANT.parent wecc240_psse_G_2100;
modify ARGUS_COGEN_PLANT.parent wecc240_psse_G_2902;
modify HEBER_GEOTHERMAL.parent wecc240_psse_G_2301;
modify NORTH_STAR_SOLAR.parent wecc240_psse_G_3404;
modify MT_POSO_COGENERATION.parent wecc240_psse_G_3803;
modify WHITEWATER_HILL_WIND_PARTNERS.parent wecc240_psse_G_2400;
modify ALGONQUIN_POWER_SANGER_LLC.parent wecc240_psse_G_3403;
modify LAKE_ONE.parent wecc240_psse_G_2602;
modify CALPEAK_POWER_VACA_DIXON_PEAKER_PLANT.parent wecc240_psse_G_3904;
modify CALPEAK_POWER_PANOCHE_PEAKER_PLANT.parent wecc240_psse_G_3404;
modify AGUA_MANSA_POWER_PLANT.parent wecc240_psse_G_2402;
modify CALPEAK_POWER_BORDER_PEAKER_PLANT.parent wecc240_psse_G_2201;
modify STOCKTON_COGEN.parent wecc240_psse_G_8002;
modify FIVE_POINTS_1.parent wecc240_psse_G_3802;
modify REGULUS_SOLAR_PROJECT.parent wecc240_psse_G_3803;
modify BARREN_RIDGE_1.parent wecc240_psse_G_2902;
modify REGULUS.parent wecc240_psse_G_3803;
modify OASIS_WIND.parent wecc240_psse_G_2902;
modify CENTER_PEAKER.parent wecc240_psse_G_2407;
modify GRAPELAND_PEAKER.parent wecc240_psse_G_2402;
modify CAMERON_RIDGE_LLC.parent wecc240_psse_G_2902;
modify WOODLEAF.parent wecc240_psse_G_3909;
modify CALPEAK_POWER_ENTERPRISE_PEAKER_PLANT.parent wecc240_psse_G_2203;
modify SALTON_SEA_POWER_LLC_-_UNIT_5.parent wecc240_psse_G_2100;
modify ELLWOOD.parent wecc240_psse_G_3803;
modify MOJAVE_COGEN.parent wecc240_psse_G_2902;
modify THUMS.parent wecc240_psse_G_2407;
modify HECATE_ENERGY_BEACON_SOLAR_3.parent wecc240_psse_G_2902;
modify CARSON_COGENERATION.parent wecc240_psse_G_2407;
modify DESERT_VIEW_POWER.parent wecc240_psse_G_2400;
modify NAVAL_STATION_ENERGY_FACILITY.parent wecc240_psse_G_2203;
modify JOHN_L_FEATHERSTONE_PLANT.parent wecc240_psse_G_2100;
object pypower.gen {
    name wecc240_psse_G_3911;
    bus 140;
    status IN_SERVICE;
}
modify WHEELABRATOR_SHASTA.parent wecc240_psse_G_3911;
modify PHILLIPS_66_RODEO_REFINERY.parent wecc240_psse_G_3205;
modify ALAMEDA.parent wecc240_psse_G_3101;
modify ROSAMOND_W_1.parent wecc240_psse_G_2902;
modify ROSAMOND_W_2.parent wecc240_psse_G_2608;
modify STOCKTON_BIOMASS.parent wecc240_psse_G_8002;
modify SALTON_SEA_POWER_GEN_CO_-_UNIT_3.parent wecc240_psse_G_2100;
modify DRUM_2.parent wecc240_psse_G_3909;
object pypower.gen {
    name wecc240_psse_G_3302;
    bus 96;
    status IN_SERVICE;
}
modify CARDINAL_COGEN.parent wecc240_psse_G_3302;
modify TIGER_CREEK.parent wecc240_psse_G_8004;
modify GOAL_LINE_LP.parent wecc240_psse_G_2203;
modify VALERO_REFINERY_COGENERATION_UNIT_1.parent wecc240_psse_G_3201;
modify ANTELOPE_DSR_1.parent wecc240_psse_G_2404;
modify KUMEYAAY_WIND.parent wecc240_psse_G_2201;
modify HECATE_ENERGY_BEACON_SOLAR_4.parent wecc240_psse_G_2902;
modify PUENTE_HILLS_ENERGY_RECOVERY.parent wecc240_psse_G_2408;
modify ALPAUGH_50.parent wecc240_psse_G_3803;
modify COMBUSTION_TURBINE_PROJECT_NO_2.parent wecc240_psse_G_8002;
modify ESCONDIDO_POWER_PLANT.parent wecc240_psse_G_2203;
modify PANOCHE_PEAKER.parent wecc240_psse_G_3404;
modify EL_CAJON_ENERGY_CENTER.parent wecc240_psse_G_2201;
modify MCGRATH_PEAKER.parent wecc240_psse_G_2618;
modify KERN_FRONT.parent wecc240_psse_G_3803;
modify ROCKWOOD.parent wecc240_psse_G_2301;
modify WALNUT.parent wecc240_psse_G_3901;
modify BARRE_PEAKER.parent wecc240_psse_G_2610;
modify DOUBLE_C.parent wecc240_psse_G_3803;
modify HIGH_SIERRA.parent wecc240_psse_G_3803;
modify MIRA_LOMA_PEAKER.parent wecc240_psse_G_2402;
modify CHOWCHILLA_II.parent wecc240_psse_G_3401;
modify SAN_GORGONIO_WINDPLANT_WPP1993.parent wecc240_psse_G_2400;
modify RIPON_MILL.parent wecc240_psse_G_8002;
modify EXXONMOBIL_OIL_TORRANCE_REFINERY.parent wecc240_psse_G_2407;
modify DRUM_1.parent wecc240_psse_G_3909;
modify MOUNTAIN_VIEW_IV.parent wecc240_psse_G_2400;
modify CLEARWATER_POWER_PLANT.parent wecc240_psse_G_2402;
modify YUBA_CITY_COGEN_PARTNERS.parent wecc240_psse_G_3405;
modify KERN_RIVER_EASTRIDGE_COGEN.parent wecc240_psse_G_3803;
modify CUYAMACA_PEAK_ENERGY_PLANT.parent wecc240_psse_G_2201;
modify KINGS_RIVER_PH.parent wecc240_psse_G_3402;
modify WELLHEAD_POWER_DELANO_LLC.parent wecc240_psse_G_3803;
modify E_F_OXNARD_ENERGY_FACILITY.parent wecc240_psse_G_2618;
modify US_BORAX.parent wecc240_psse_G_2902;
modify SALTON_SEA_POWER_GEN_CO_-_UNIT_4.parent wecc240_psse_G_2100;
modify YUBA_CITY_ENERGY_CENTER.parent wecc240_psse_G_3405;
modify KING_CITY_PEAKING.parent wecc240_psse_G_3902;
modify CREED_ENERGY_CENTER.parent wecc240_psse_G_3904;
modify FEATHER_RIVER_ENERGY_CENTER.parent wecc240_psse_G_3405;
modify LAMBIE_ENERGY_CENTER.parent wecc240_psse_G_3204;
modify WOLFSKILL_ENERGY_CENTER.parent wecc240_psse_G_3904;
modify RIVERVIEW_ENERGY_CENTER.parent wecc240_psse_G_3204;
modify GOOSE_HAVEN_ENERGY_CENTER.parent wecc240_psse_G_3904;
modify RIDGETOP.parent wecc240_psse_G_2902;
modify NARROWS_2.parent wecc240_psse_G_3909;
modify RED_BLUFF.parent wecc240_psse_G_3911;
modify BEAR_MOUNTAIN_COGEN.parent wecc240_psse_G_3803;
modify MCKITTRICK_COGEN_FACILITY.parent wecc240_psse_G_3803;
modify LIVE_OAK_COGEN.parent wecc240_psse_G_3803;
modify GOLDEN_HILLS_NORTH_WIND_ENERGY_CENTER.parent wecc240_psse_G_3903;
modify BADGER_CREEK_LIMITED.parent wecc240_psse_G_3803;
modify CHALK_CLIFF_COGEN.parent wecc240_psse_G_3803;
modify CE_LEATHERS.parent wecc240_psse_G_2100;
modify DEL_RANCH_COMPANY.parent wecc240_psse_G_2100;
modify ELMORE_COMPANY.parent wecc240_psse_G_2100;
modify RE_CAMELOT_LLC.parent wecc240_psse_G_2902;
modify DILLON_WIND_LLC.parent wecc240_psse_G_2400;
modify CENTURY_GENERATING_FACILITY.parent wecc240_psse_G_2402;
modify DREWS_GENERATING_FACILITY.parent wecc240_psse_G_2402;
modify CHULA_VISTA_I.parent wecc240_psse_G_2201;
modify CHICAGO_PARK.parent wecc240_psse_G_3909;
modify SAN_GORGONIO_WESTWINDS_II_LLC.parent wecc240_psse_G_2400;
modify UCLA_SO_CAMPUS_COGEN_PROJECT.parent wecc240_psse_G_2602;
object pypower.gen {
    name wecc240_psse_G_2405;
    bus 38;
    status IN_SERVICE;
}
modify BERRY_PLACERITA_COGEN.parent wecc240_psse_G_2405;
modify SAN_FRANCISQUITO_2.parent wecc240_psse_G_2410;
modify SALT_SPRINGS.parent wecc240_psse_G_8004;
modify LAKE_HODGES_HYDROELECTRIC_FACILITY.parent wecc240_psse_G_2203;
modify FORBESTOWN.parent wecc240_psse_G_3919;
modify CABAZON_WIND_PARTNERS.parent wecc240_psse_G_2400;
modify NORTH_ISLAND_ENERGY_FACILITY.parent wecc240_psse_G_2203;
modify KERN_RIVER_3.parent wecc240_psse_G_2902;
modify SPRINGS_GENERATING_STATION.parent wecc240_psse_G_2403;
modify CUYAMA_SOLAR_LLC.parent wecc240_psse_G_3803;
modify ELEVATION_SOLAR_C.parent wecc240_psse_G_2404;
modify BUTT_VALLEY.parent wecc240_psse_G_3905;
modify CABAZON_WIND_FARM.parent wecc240_psse_G_2400;
modify VULCAN-BN_GEOTHERMAL_POWER_COMPANY.parent wecc240_psse_G_2100;
modify SALINAS_RIVER_COGENERATION.parent wecc240_psse_G_3806;
modify BERRY_COGEN.parent wecc240_psse_G_3803;
modify UNION_VALLEY.parent wecc240_psse_G_3913;
modify TOTAL_ENERGY_FACILITIES.parent wecc240_psse_G_2407;
modify RIO_BRAVO_POSO.parent wecc240_psse_G_3803;
modify BUENA_VISTA_ENERGY_LLC.parent wecc240_psse_G_3903;
modify CONTROL_GORGE.parent wecc240_psse_G_3402;
modify UPPER_GORGE.parent wecc240_psse_G_3402;
modify MIDDLE_GORGE.parent wecc240_psse_G_3402;
modify FPL_ENERGY_MONTEZUMA_WINDS_LLC.parent wecc240_psse_G_3204;
modify HL_POWER.parent wecc240_psse_G_3701;
modify KINGSBURG_COGEN.parent wecc240_psse_G_3403;
object pypower.gen {
    name wecc240_psse_G_4204;
    bus 189;
    status IN_SERVICE;
}
modify COPCO_2.parent wecc240_psse_G_4204;
modify BREA_EXPANSION_PLANT.parent wecc240_psse_G_2501;
modify SOUTHEAST_RESOURCE_RECOVERY.parent wecc240_psse_G_2407;
modify UNIVERSITY_OF_CALIFORNIA_SAN_DIEGO.parent wecc240_psse_G_2203;
modify CIVIC_CENTER.parent wecc240_psse_G_2613;
modify OAK_CREEK_ENERGY_SYSTEMS_I.parent wecc240_psse_G_2902;
modify NEW-INDY_ONTARIO_MILL.parent wecc240_psse_G_2402;
modify TESORO_WILMINGTON_CALCINER.parent wecc240_psse_G_2407;
modify PILOT_KNOB.parent wecc240_psse_G_2100;
modify HYPERION_TREATMENT_PLANT_CHP_PLANT.parent wecc240_psse_G_2613;
modify MOJAVE_SIPHON.parent wecc240_psse_G_2401;
modify EEL_RIVER_POWER.parent wecc240_psse_G_3601;
modify AGNEWS_POWER_PLANT.parent wecc240_psse_G_3203;
modify LOST_HILLS.parent wecc240_psse_G_3803;
modify BLACKWELL.parent wecc240_psse_G_3803;
modify WILMINGTON_HYDROGEN_PLANT.parent wecc240_psse_G_2407;
modify OLS_ENERGY_CAMARILLO.parent wecc240_psse_G_2618;
modify SAN_GORGONIO_FARMS_WIND_FARM.parent wecc240_psse_G_2400;
modify BURNEY_FOREST_PRODUCTS.parent wecc240_psse_G_3906;
modify BALCH_1.parent wecc240_psse_G_3402;
modify SOUTHEAST_KERN_RIVER_COGEN.parent wecc240_psse_G_3803;
modify OLS_ENERGY_CHINO.parent wecc240_psse_G_2402;
modify WHEELABRATOR_NORWALK_ENERGY.parent wecc240_psse_G_2407;
modify FRIANT_HYDRO_FACILITY.parent wecc240_psse_G_3401;
modify SPI_ANDERSON_2.parent wecc240_psse_G_3911;
modify SEVILLE_2.parent wecc240_psse_G_2301;
modify MOJAVE_18.parent wecc240_psse_G_2902;
modify MOJAVE_16.parent wecc240_psse_G_2902;
modify MAMMOTH_PACIFIC_II.parent wecc240_psse_G_3402;
modify ESCONDIDO_ENERGY_STORAGE.parent wecc240_psse_G_2203;
modify MUCK_VALLEY_HYDROELECTRIC.parent wecc240_psse_G_3906;
modify MESA_WIND_POWER_CORP.parent wecc240_psse_G_2400;
modify DIAMOND_VALLEY_LAKE.parent wecc240_psse_G_2403;
modify GEO_EAST_MESA_III.parent wecc240_psse_G_2100;
modify MOJAVE_4.parent wecc240_psse_G_2902;
modify RIDGETOP_ENERGY_LLC.parent wecc240_psse_G_2902;
modify OXNARD_PAPER_MILL.parent wecc240_psse_G_2618;
modify COLTON_PLANT.parent wecc240_psse_G_2402;
modify TPC_WINDFARMS_LLC.parent wecc240_psse_G_2902;
object pypower.gen {
    name wecc240_psse_G_3910;
    bus 139;
    status IN_SERVICE;
}
modify WADHAM_ENERGY_LP.parent wecc240_psse_G_3910;
modify PE_BERKELEY.parent wecc240_psse_G_3205;
modify C_P_KELCO_SAN_DIEGO_PLANT.parent wecc240_psse_G_2203;
modify RIO_BRAVO_FRESNO.parent wecc240_psse_G_3403;
modify WOODLAND_BIOMASS_POWER_LTD.parent wecc240_psse_G_3405;
modify RIO_BRAVO_ROCKLIN.parent wecc240_psse_G_3920;
modify WESTERN_POWER_STEAM_INC.parent wecc240_psse_G_3803;
modify SIERRA_PACIFIC_QUINCY_FACILITY.parent wecc240_psse_G_3909;
modify PHILLIPS_66_CARBON_PLANT.parent wecc240_psse_G_3205;
modify DUTCH_FLAT_2.parent wecc240_psse_G_3909;
object pypower.gen {
    name wecc240_psse_G_3304;
    bus 98;
    status IN_SERVICE;
}
modify JEFFERSON_SMURFIT_SANTA_CLARA_MILL.parent wecc240_psse_G_3304;
modify HAYWORTH_SOLAR.parent wecc240_psse_G_3803;
modify HAYWORTH_SOLAR_2.parent wecc240_psse_G_3803;
modify ORMESA_I.parent wecc240_psse_G_2100;
modify KERN_RIVER_1.parent wecc240_psse_G_3803;
modify NRG_SOLAR_BORREGO_I.parent wecc240_psse_G_2400;
modify COPCO_1.parent wecc240_psse_G_4204;
modify NTC_MCRD_ENERGY_FACILITY.parent wecc240_psse_G_2203;
modify ROBBS_PEAK.parent wecc240_psse_G_3913;
modify ONEILL.parent wecc240_psse_G_3901;
modify MOJAVE_17.parent wecc240_psse_G_2902;
modify RET_MODESTO_SOLAR.parent wecc240_psse_G_3907;
modify WESTERN_GEOPOWER_UNIT_1.parent wecc240_psse_G_3501;
modify PACIFIC-ULTRAPOWER_CHINESE_STATION.parent wecc240_psse_G_3907;
modify AIDLIN_GEOTHERMAL_POWER_PLANT.parent wecc240_psse_G_3501;
modify TULLOCH.parent wecc240_psse_G_3907;
modify COVANTA_STANISLAUS_ENERGY.parent wecc240_psse_G_3901;
modify ORMESA_II.parent wecc240_psse_G_2100;
modify ETIWANDA.parent wecc240_psse_G_2402;
modify BOWERMAN_POWER_LFG_LLC.parent wecc240_psse_G_2501;
modify PARDEE.parent wecc240_psse_G_8004;
modify MOJAVE_3.parent wecc240_psse_G_2902;
modify IMPERIAL_VALLEY_SOLAR_COMPANY_1.parent wecc240_psse_G_2100;
modify IMPERIAL_VALLEY_SOLAR_COMPANY_1_LLC.parent wecc240_psse_G_2100;
modify SUNSHINE_GAS_PRODUCERS.parent wecc240_psse_G_2405;
modify MOJAVE_5.parent wecc240_psse_G_2902;
modify VANDENBERG_SOLAR_PROJECT.parent wecc240_psse_G_3801;
modify MOUNTAIN_VIEW_III.parent wecc240_psse_G_2400;
modify DUTCH_FLAT.parent wecc240_psse_G_3909;
modify GRIZZLY.parent wecc240_psse_G_3905;
modify TEHACHAPI_WIND_RESOURCE_II.parent wecc240_psse_G_2902;
modify VICTORY_GARDEN_TEHACHAPI.parent wecc240_psse_G_2902;
modify NRG_SOLAR_BLYTHE_LLC.parent wecc240_psse_G_1403;
modify ATWELL_ISLAND_SOLAR.parent wecc240_psse_G_3803;
modify ATWELL_ISLAND.parent wecc240_psse_G_3803;
modify TERMINUS_HYDROELECTRIC_PROJECT.parent wecc240_psse_G_3402;
modify CORCORAN_IRRIGATION.parent wecc240_psse_G_3403;
modify GIFFEN_SOLAR_PARK.parent wecc240_psse_G_3404;
modify ROSAMOND_ONE.parent wecc240_psse_G_2902;
modify NICOLIS.parent wecc240_psse_G_3803;
modify ALAMO_SOLAR.parent wecc240_psse_G_2603;
modify BAYSHORE_SOLAR_A_LLC.parent wecc240_psse_G_2404;
modify RIO_BRAVO_SOLAR_1_LLC.parent wecc240_psse_G_3803;
modify W_ANTELOPE_SOLAR_PARK.parent wecc240_psse_G_2404;
modify CORCORAN.parent wecc240_psse_G_3403;
modify ADELANTO_I.parent wecc240_psse_G_2603;
modify _4001_AND_2510_CLEARVISTA_SOLAR_AND_WIND.parent wecc240_psse_G_2902;
modify RE_KENT_SOUTH_LLC.parent wecc240_psse_G_3802;
modify ATWELL_ISLAND_WEST_SOLAR.parent wecc240_psse_G_3803;
modify IMPERIAL_VALLEY_SOLAR_CO_IVSC_2_LLC.parent wecc240_psse_G_2100;
modify BAYSHORE_SOLAR_C_LLC.parent wecc240_psse_G_2404;
modify REDWOOD_4_SOLAR_FARM.parent wecc240_psse_G_3803;
modify JACUMBA_SOLAR_FARM.parent wecc240_psse_G_2301;
modify PORTAL_RIDGE_B.parent wecc240_psse_G_2404;
modify CENTRAL_ANTELOPE_C.parent wecc240_psse_G_2404;
modify LONE_VALLEY_SOLAR_PARK_II_LLC.parent wecc240_psse_G_2603;
modify W_ANTELOPE_SOLAR.parent wecc240_psse_G_2404;
modify KETTLEMAN_SOLAR_-CENTAURUS.parent wecc240_psse_G_3802;
modify WESTERN_ANTELOPE_BLUE_SKY_RANCH_A.parent wecc240_psse_G_2404;
modify MIRA_LOMA_ENERGY_STORAGE_FACILITY.parent wecc240_psse_G_2402;
modify CANTUA_SOLAR_STATION.parent wecc240_psse_G_3404;
modify RE_KANSAS_SOLAR_LLC.parent wecc240_psse_G_3802;
modify JACUMBA_SOLAR_FARM_2.parent wecc240_psse_G_2301;
modify CALIPATRIA_SOLAR_FARM.parent wecc240_psse_G_2100;
modify KENT_SOUTH.parent wecc240_psse_G_3802;
modify ALGONQUIN_SKIC20_SOLAR_LLC.parent wecc240_psse_G_3803;
modify WHITNEY_POINT_SOLAR.parent wecc240_psse_G_3802;
modify GATES_SOLAR_STATION.parent wecc240_psse_G_3802;
modify ADERA.parent wecc240_psse_G_3404;
modify PORTAL_RIDGE_SOLAR_B_LLC.parent wecc240_psse_G_2404;
modify GUERNSEY_SOLAR_STATION.parent wecc240_psse_G_3403;
modify SOL_ORCHARD_EL_CENTRO_PV.parent wecc240_psse_G_2301;
modify KANSAS.parent wecc240_psse_G_3802;
modify SEPV_MOJAVE_W.parent wecc240_psse_G_2902;
modify TA-HIGH_DESERT_LLC.parent wecc240_psse_G_2404;
modify FRONTIER_SOLAR_LLC.parent wecc240_psse_G_3901;
modify CORCORAN_IRRIGATION_DISTRICT_SOLAR.parent wecc240_psse_G_3403;
modify SEVILLE_SOLAR_1.parent wecc240_psse_G_2301;
modify NORTH_LANCASTER_RANCH.parent wecc240_psse_G_2404;
modify BLUE_SKY_RANCH_B.parent wecc240_psse_G_2404;
object pypower.gen {
    name wecc240_psse_G_2600;
    bus 53;
    status IN_SERVICE;
}
modify VICTOR_PHELAN_1.parent wecc240_psse_G_2600;
modify KINGBIRD_SOLAR_B.parent wecc240_psse_G_2902;
modify MARICOPA_WEST.parent wecc240_psse_G_3803;
modify SKIC_SOLAR.parent wecc240_psse_G_3803;
modify SIERRA_SOLAR_GREENWORKS.parent wecc240_psse_G_2404;
modify ROSAMOND_TWO.parent wecc240_psse_G_2902;
modify SIERRA_SOLAR_GREENWORKS_2.parent wecc240_psse_G_2404;
modify SHAFTER_SOLAR_LLC.parent wecc240_psse_G_3803;
modify SIERRA_PACIFIC_BURNEY_FACILITY.parent wecc240_psse_G_3906;
modify CED_WHITE_RIVER.parent wecc240_psse_G_3803;
modify HURON_SOLAR_STATION.parent wecc240_psse_G_3802;
modify BAYSHORE_SOLAR_B_LLC.parent wecc240_psse_G_2404;
modify LONG_BOAT_SOLAR.parent wecc240_psse_G_2603;
modify HURON.parent wecc240_psse_G_3802;
modify EDOM_HILLS_PROJECT_1_LLC.parent wecc240_psse_G_2400;
modify CORCORAN_SOLAR_3.parent wecc240_psse_G_3403;
modify ANTELOPE_BIG_SKY_RANCH.parent wecc240_psse_G_2404;
modify OASIS_SOLAR.parent wecc240_psse_G_2404;
modify VEGA_SOLAR.parent wecc240_psse_G_3901;
modify ALPAUGH_NORTH.parent wecc240_psse_G_3803;
modify SUMMER_SOLAR.parent wecc240_psse_G_2404;
modify NEXTERA_WESTSIDE_PV.parent wecc240_psse_G_3802;
modify RIO_BRAVO_SOLAR_II_LLC.parent wecc240_psse_G_3803;
modify PUMPJACK_SOLAR_I.parent wecc240_psse_G_3803;
modify SHAFTER.parent wecc240_psse_G_3803;
modify CORCORAN_3.parent wecc240_psse_G_3403;
modify WHITE_RIVER_SOLAR.parent wecc240_psse_G_3803;
modify ADOBE.parent wecc240_psse_G_3803;
modify RE_GARLAND_A.parent wecc240_psse_G_2608;
modify KINGBIRD_SOLAR_A.parent wecc240_psse_G_2608;
modify RIO_BRAVO_1.parent wecc240_psse_G_3803;
modify SALTON_SEA_POWER_GEN_CO_-_UNIT_2.parent wecc240_psse_G_2301;
modify RIO_BRAVO_2.parent wecc240_psse_G_3803;
modify AP_NORTH_LAKE_I.parent wecc240_psse_G_2403;
modify RE_VICTOR_PHELAN_SOLAR_ONE_LLC.parent wecc240_psse_G_2600;
modify DUCOR_1.parent wecc240_psse_G_3803;
modify SUN_CITY_PROJECT_LLC.parent wecc240_psse_G_3802;
modify EL_DORADO.parent wecc240_psse_G_3913;
modify DUCOR_4.parent wecc240_psse_G_3803;
modify ISIS.parent wecc240_psse_G_3802;
modify HURON_SOLAR_FARM.parent wecc240_psse_G_3802;
modify CORCORAN_SOLAR.parent wecc240_psse_G_3403;
modify RE_KANSAS_SOUTH_LLC.parent wecc240_psse_G_3802;
modify RE_OLD_RIVER_ONE_LLC.parent wecc240_psse_G_3803;
modify PIONEER_GREEN_ENERGY.parent wecc240_psse_G_3803;
modify BURFORD_GIFFEN.parent wecc240_psse_G_3404;
modify CORONAL_LOST_HILLS.parent wecc240_psse_G_3802;
modify GRS_COYOTE_CANYON.parent wecc240_psse_G_2610;
modify SOLAR_BLYTHE_2.parent wecc240_psse_G_1403;
modify CANTUA.parent wecc240_psse_G_3404;
modify KERN_SOLAR_RANCH.parent wecc240_psse_G_3803;
modify DUCOR_2.parent wecc240_psse_G_3803;
modify STROUD_SOLAR_STATION.parent wecc240_psse_G_3404;
modify CED_CORCORAN_2.parent wecc240_psse_G_3403;
modify WHITE_RIVER_SOLAR_2.parent wecc240_psse_G_3803;
modify RISING_TREE_WIND_FARM_II.parent wecc240_psse_G_2902;
modify CORCORAN_SOLAR_2.parent wecc240_psse_G_3403;
modify DROP_4.parent wecc240_psse_G_2100;
modify ALAMO.parent wecc240_psse_G_2608;
modify WILDWOOD_SOLAR_I_LLC.parent wecc240_psse_G_3803;
modify COLUMBIA_1.parent wecc240_psse_G_3204;
modify SIERRA_PACIFIC_LINCOLN_FACILITY.parent wecc240_psse_G_3920;
modify SAND_DRAG_LLC.parent wecc240_psse_G_3802;
modify UCI_FACILITIES_MANAGEMENT_CENTRAL_PLANT.parent wecc240_psse_G_2610;
modify RE_ADAMS_EAST_LLC.parent wecc240_psse_G_3404;
modify ADAMS_E.parent wecc240_psse_G_3404;
modify IRON_GATE.parent wecc240_psse_G_4204;
modify CASCADE_SOLAR.parent wecc240_psse_G_2400;
modify DE_SABLA.parent wecc240_psse_G_3905;
modify DIABLO_WIND_LLC.parent wecc240_psse_G_3903;
modify CATALINA_SOLAR_2_LLC.parent wecc240_psse_G_2902;
modify WESTLANDS_SOLAR_PV_FARM.parent wecc240_psse_G_3802;
modify BERRY_COGEN_TANNE_HILLS_18.parent wecc240_psse_G_3803;
modify DINOSAUR_POINT.parent wecc240_psse_G_3901;
modify SMUD_AT_GRUNDMAN.parent wecc240_psse_G_3908;
modify REDCREST_SOLAR_FARM.parent wecc240_psse_G_3803;
modify REDCREST_SOLAR.parent wecc240_psse_G_3803;
modify GREEN_POWER_I.parent wecc240_psse_G_2400;
modify MCAGCC_COGEN_PLANT_1.parent wecc240_psse_G_2400;
modify WISE.parent wecc240_psse_G_3913;
modify SAND_BAR_POWER_PLANT.parent wecc240_psse_G_3907;
modify WINDPARK_UNLIMITED_2.parent wecc240_psse_G_2400;
modify PLANT_NO_2_ORANGE_COUNTY.parent wecc240_psse_G_2610;
modify EDF_RENEWABLE_WINDFARM_V_INC.parent wecc240_psse_G_3204;
modify FRENCH_MEADOWS.parent wecc240_psse_G_3701;
modify SAN_DIEGO_STATE_UNIVERSITY.parent wecc240_psse_G_2203;
modify FIVE_POINTS_SOLAR_STATION.parent wecc240_psse_G_3401;
modify MORELOS.parent wecc240_psse_G_3803;
modify RE_COLUMBIA_TWO_LLC.parent wecc240_psse_G_2902;
modify WESTSIDE_SOLAR_STATION.parent wecc240_psse_G_3802;
modify WOODMERE_SOLAR_FARM.parent wecc240_psse_G_3803;
modify DUCOR_3.parent wecc240_psse_G_3803;
modify WOODMERE_SOLAR_FARM_2.parent wecc240_psse_G_3803;
modify FIVE_POINTS_SOLAR_STATION_2.parent wecc240_psse_G_3802;
modify KINGS_BEACH.parent wecc240_psse_G_3701;
modify PLES_I.parent wecc240_psse_G_3402;
modify FORKS_OF_BUTTE_HYDRO_PROJECT.parent wecc240_psse_G_3905;
modify APPLE_CAMPUS_2_PV.parent wecc240_psse_G_3304;
modify TROPICO.parent wecc240_psse_G_3803;
modify GASNA_27P.parent wecc240_psse_G_3904;
modify MILLERCOORS_IRWINDALE_BREWERY.parent wecc240_psse_G_2408;
modify CALABASAS_GAS_TO_ENERGY_FACILITY.parent wecc240_psse_G_2618;
modify HALSEY.parent wecc240_psse_G_3913;
modify COALINGA_25D_COGEN.parent wecc240_psse_G_3802;
modify WEST_POINT_PH.parent wecc240_psse_G_8004;
object pypower.gen {
    name wecc240_psse_G_3105;
    bus 86;
    status IN_SERVICE;
}
modify PARNASSUS_CENTRAL_UTILITY_PLANT.parent wecc240_psse_G_3105;
modify NIMBUS.parent wecc240_psse_G_3913;
modify HOUWELING_NURSERIES.parent wecc240_psse_G_2618;
modify RUSH_CREEK.parent wecc240_psse_G_3402;
modify CALIFORNIA_INSTITUTE_OF_TECHNOLOGY.parent wecc240_psse_G_2406;
modify ROSEBURG_FOREST_PRODUCTS_BIOMASS.parent wecc240_psse_G_3906;
modify UC_DAVIS_SOUTH_CAMPUS.parent wecc240_psse_G_3904;
modify A_G_WISHON.parent wecc240_psse_G_3401;
modify NEWCASTLE.parent wecc240_psse_G_3913;
modify PEBBLY_BEACH.parent wecc240_psse_G_2610;
modify EL_NIDO_FACILITY.parent wecc240_psse_G_3404;
modify AMPERSAND_CHOWCHILLA_BIOMASS_LLC.parent wecc240_psse_G_3401;
modify CYMRIC_36W_COGEN.parent wecc240_psse_G_3803;
modify TAFT_26C_COGEN.parent wecc240_psse_G_3803;
modify SLY_CREEK.parent wecc240_psse_G_3909;
modify COLEMAN_PH.parent wecc240_psse_G_3911;
modify LOMA_LINDA_UNIVERSITY_COGEN.parent wecc240_psse_G_2403;
modify ROLLINS.parent wecc240_psse_G_3909;
modify MCKITTRICK_COGEN.parent wecc240_psse_G_3803;
modify SEPV_8.parent wecc240_psse_G_2400;
modify ORION_SOLAR_I.parent wecc240_psse_G_2608;
modify FOTOWATIO.parent wecc240_psse_G_3803;
modify CITY_OF_CORCORAN.parent wecc240_psse_G_3403;
modify CITY_OF_CORCORAN_SOLAR.parent wecc240_psse_G_3403;
modify GOOSE_LAKE_SOLAR.parent wecc240_psse_G_3803;
modify ISABELLA_HYDRO_PROJECT.parent wecc240_psse_G_2902;
modify H_GONZALES.parent wecc240_psse_G_2605;
modify KAREN_AVENUE_WINDFARM.parent wecc240_psse_G_2400;
modify MM_WEST_COVINA.parent wecc240_psse_G_2408;
modify MONTICELLO_DAM.parent wecc240_psse_G_3904;
modify CE_TURBO_LLC.parent wecc240_psse_G_2100;
object pypower.gen {
    name wecc240_psse_G_3103;
    bus 84;
    status IN_SERVICE;
}
modify AMERESCO_OX_MOUNTAIN.parent wecc240_psse_G_3103;
modify PORTAL_RIDGE_C.parent wecc240_psse_G_2404;
modify PORTAL_RIDGE_SOLAR_C_LLC.parent wecc240_psse_G_2404;
modify POOLE.parent wecc240_psse_G_3402;
modify NAVAL_AIR_WEAPONS_STATION_CHINA_LAKE.parent wecc240_psse_G_2902;
modify SJ_SC_WPCP.parent wecc240_psse_G_3203;
modify FOOTHILL.parent wecc240_psse_G_2405;
modify HEBER_SOLAR.parent wecc240_psse_G_2301;
modify CAMANCHE.parent wecc240_psse_G_8004;
modify RANCHO_SECO_SOLAR_LLC.parent wecc240_psse_G_8004;
modify USPS_PV.parent wecc240_psse_G_2613;
modify LOST_HILLS_COGENERATION_PLANT.parent wecc240_psse_G_3803;
modify MARIN_CLEAN_ENERGY_SOLAR_ONE.parent wecc240_psse_G_3101;
modify OTAY.parent wecc240_psse_G_2201;
modify NARROWS_PH.parent wecc240_psse_G_3909;
modify GIFFEN.parent wecc240_psse_G_3404;
modify CASCADE_SOLAR_PARK.parent wecc240_psse_G_2400;
modify HAT_CREEK_1.parent wecc240_psse_G_3906;
modify LONE_VALLEY_SOLAR_PARK_I_LLC.parent wecc240_psse_G_2603;
modify KELLY_RIDGE.parent wecc240_psse_G_3919;
modify DROP_2_CA.parent wecc240_psse_G_2100;
modify BEARDSLEY.parent wecc240_psse_G_3907;
modify JONES_FORK.parent wecc240_psse_G_3913;
modify HAYPRESS.parent wecc240_psse_G_3701;
modify CHILDRENS_HOSPITAL.parent wecc240_psse_G_2203;
modify HAT_CREEK_2.parent wecc240_psse_G_3906;
modify WESTERN_ANTELOPE_DRY_RANCH.parent wecc240_psse_G_2404;
modify WESTERN_ANTELOPE_DRY_RANCH_2.parent wecc240_psse_G_2404;
modify SEPV_PALMDALE_EAST.parent wecc240_psse_G_2404;
modify SKIC_SOLAR_1.parent wecc240_psse_G_3803;
modify COLUMBIA_3.parent wecc240_psse_G_2902;
modify MAMMOTH_PACIFIC_I.parent wecc240_psse_G_3402;
modify ADELANTO_SOLAR_PROJECT.parent wecc240_psse_G_2600;
modify SALTON_SEA_POWER_GEN_CO_UNIT_1.parent wecc240_psse_G_2301;
modify ALGONQUIN_SKIC_10_SOLAR_LLC.parent wecc240_psse_G_3803;
modify WEST_GATES_SOLAR_STATION.parent wecc240_psse_G_3802;
object pypower.gen {
    name wecc240_psse_G_7001;
    bus 233;
    status IN_SERVICE;
}
modify COMANCHE.parent wecc240_psse_G_7001;
object pypower.gen {
    name wecc240_psse_G_7002;
    bus 234;
    status IN_SERVICE;
}
modify CRAIG.parent wecc240_psse_G_7002;
object pypower.gen {
    name wecc240_psse_G_6302;
    bus 211;
    status IN_SERVICE;
}
modify FORT_ST_VRAIN.parent wecc240_psse_G_6302;
modify CHEROKEE.parent wecc240_psse_G_7001;
modify RAWHIDE.parent wecc240_psse_G_6302;
modify ROCKY_MOUNTAIN_ENERGY_CENTER.parent wecc240_psse_G_7001;
modify RUSH_CREEK_WIND.parent wecc240_psse_G_7001;
modify FRONT_RANGE_POWER_PLANT.parent wecc240_psse_G_7001;
modify PAWNEE.parent wecc240_psse_G_7001;
modify HAYDEN.parent wecc240_psse_G_7002;
modify PUEBLO_AIRPORT_GENERATING_STATION.parent wecc240_psse_G_7001;
modify SPINDLE_HILL_ENERGY_CENTER.parent wecc240_psse_G_6302;
modify BLUE_SPRUCE_ENERGY_CENTER.parent wecc240_psse_G_7001;
modify JM_SHAFER_GENERATING_STATION.parent wecc240_psse_G_6302;
modify CEDAR_CREEK_WIND.parent wecc240_psse_G_6302;
modify MANCHIEF_ELECTRIC_GENERATING_STATION.parent wecc240_psse_G_7001;
modify CABIN_CREEK.parent wecc240_psse_G_7001;
modify BRUSH_GENERATION_FACILITY.parent wecc240_psse_G_7001;
modify RAY_D_NIXON.parent wecc240_psse_G_7001;
modify CEDAR_POINT_WIND.parent wecc240_psse_G_7001;
modify GOLDEN_WEST_POWER_PARTNERS_LLC.parent wecc240_psse_G_7001;
modify CEDAR_CREEK_II.parent wecc240_psse_G_6302;
modify FOUNTAIN_VALLEY_POWER_FACILITY.parent wecc240_psse_G_7001;
modify MARTIN_DRAKE.parent wecc240_psse_G_7001;
modify LOGAN_WIND_ENERGY.parent wecc240_psse_G_6302;
modify LIMON_III_WIND_LLC.parent wecc240_psse_G_7001;
modify MOUNT_ELBERT.parent wecc240_psse_G_7001;
modify LIMON_WIND_I.parent wecc240_psse_G_7001;
modify LIMON_WIND_II.parent wecc240_psse_G_7001;
modify PEETZ_TABLE_WIND_ENERGY.parent wecc240_psse_G_6302;
modify ARAPAHOE_COMBUSTION_TURBINE_PROJECT.parent wecc240_psse_G_7001;
modify NORTHERN_COLORADO_WIND_LLC.parent wecc240_psse_G_6302;
object pypower.gen {
    name wecc240_psse_G_1004;
    bus 4;
    status IN_SERVICE;
}
modify MORROW_POINT.parent wecc240_psse_G_1004;
modify COLORADO_GREEN_HOLDINGS_LLC.parent wecc240_psse_G_7001;
modify LIMON_GENERATING_STATION.parent wecc240_psse_G_7001;
modify FRANK_KNUTSON.parent wecc240_psse_G_7001;
modify CAROUSEL_WIND_FARM_LLC.parent wecc240_psse_G_7001;
modify VALMONT_COMBUSTION_TURBINE_PROJECT.parent wecc240_psse_G_6302;
modify COMANCHE_SOLAR.parent wecc240_psse_G_7001;
modify PLAINS_END_II_LLC.parent wecc240_psse_G_7001;
modify PLAINS_END.parent wecc240_psse_G_7001;
modify FORT_LUPTON.parent wecc240_psse_G_6302;
modify COLORADO_HIGHLANDS_WIND.parent wecc240_psse_G_6302;
modify FLATIRON.parent wecc240_psse_G_6302;
modify BLUE_MESA.parent wecc240_psse_G_1004;
modify RIFLE_GENERATING_STATION.parent wecc240_psse_G_7002;
modify TWIN_BUTTES_WIND_PROJECT.parent wecc240_psse_G_7001;
object pypower.gen {
    name wecc240_psse_G_4004;
    bus 162;
    status IN_SERVICE;
}
modify TWIN_BUTTES_II_WIND.parent wecc240_psse_G_4004;
modify SPRING_CANYON_EXPANSION_WIND_ENERGY_CENTER.parent wecc240_psse_G_6302;
modify GEORGE_BIRDSALL.parent wecc240_psse_G_7001;
modify PEAK_VIEW_WIND_FARM.parent wecc240_psse_G_7001;
modify SPRING_CANYON.parent wecc240_psse_G_6302;
modify BUSCH_RANCH_II_WIND_FARM.parent wecc240_psse_G_7001;
modify VALMONT.parent wecc240_psse_G_6302;
modify ALAMOSA.parent wecc240_psse_G_7001;
modify HOOPER_SOLAR.parent wecc240_psse_G_7001;
modify KIT_CARSON_WINDPOWER.parent wecc240_psse_G_7001;
modify TITAN_SOLAR.parent wecc240_psse_G_7001;
modify ESTES.parent wecc240_psse_G_6302;
modify POLE_HILL.parent wecc240_psse_G_6302;
modify THERMO_GREELEY.parent wecc240_psse_G_6302;
modify GRAZING_YAK_SOLAR.parent wecc240_psse_G_7001;
modify SAN_LUIS_VALLEY_SOLAR_RANCH.parent wecc240_psse_G_7001;
modify COLORADO_ENERGY_NATIONS_COMPANY.parent wecc240_psse_G_7001;
modify UNIVERSITY_OF_COLORADO.parent wecc240_psse_G_6302;
modify SAN_ISABEL_SOLAR_LLC.parent wecc240_psse_G_7001;
modify COGENTRIX_OF_ALAMOSA.parent wecc240_psse_G_7001;
modify BISON_SOLAR_LLC.parent wecc240_psse_G_6302;
modify RIDGE_CREST_WIND_PARTNERS.parent wecc240_psse_G_6302;
modify BUSCH_RANCH_WIND_ENERGY_FARM.parent wecc240_psse_G_7001;
modify CRYSTAL.parent wecc240_psse_G_1004;
object pypower.gen {
    name wecc240_psse_G_6503;
    bus 224;
    status IN_SERVICE;
}
modify FRUITA.parent wecc240_psse_G_6503;
modify TESLA.parent wecc240_psse_G_7001;
modify GREEN_MOUNTAIN.parent wecc240_psse_G_7002;
modify GREATER_SANDHILL_I.parent wecc240_psse_G_7001;
modify SR_PLATTE_SOLAR_FARM.parent wecc240_psse_G_6302;
modify METRO_WASTEWATER_RECLAMATION_DISTRICT.parent wecc240_psse_G_7001;
modify SHOSHONE.parent wecc240_psse_G_7002;
modify SR_JENKINS_FT_LUPTON.parent wecc240_psse_G_6302;
modify VICTORY_SOLAR_LLC.parent wecc240_psse_G_7001;
modify EAGLE_VALLEY_CLEAN_ENERGY_LLC_BIOMASS.parent wecc240_psse_G_7002;
modify TOWAOC.parent wecc240_psse_G_1004;
modify AIRPORT_INDUSTRIAL.parent wecc240_psse_G_7001;
modify ROCKY_FORD.parent wecc240_psse_G_7001;
modify CLEAR_SPRING_RANCH_PV_PROJECT.parent wecc240_psse_G_7001;
object pypower.gen {
    name wecc240_psse_G_4003;
    bus 161;
    status IN_SERVICE;
}
modify BROWNLEE.parent wecc240_psse_G_4003;
object pypower.gen {
    name wecc240_psse_G_4103;
    bus 182;
    status IN_SERVICE;
}
modify DWORSHAK.parent wecc240_psse_G_4103;
modify LANGLEY_GULCH_POWER_PLANT.parent wecc240_psse_G_4003;
modify RATHDRUM_POWER_LLC.parent wecc240_psse_G_4103;
object pypower.gen {
    name wecc240_psse_G_6101;
    bus 198;
    status IN_SERVICE;
}
modify EVANDER_ANDREWS_POWER_COMPLEX.parent wecc240_psse_G_6101;
modify CABINET_GORGE.parent wecc240_psse_G_4103;
object pypower.gen {
    name wecc240_psse_G_6305;
    bus 214;
    status IN_SERVICE;
}
modify PALISADES.parent wecc240_psse_G_6305;
modify BENNETT_MOUNTAIN.parent wecc240_psse_G_6101;
modify RATHDRUM.parent wecc240_psse_G_4103;
object pypower.gen {
    name wecc240_psse_G_6103;
    bus 200;
    status IN_SERVICE;
}
modify GOSHEN_PHASE_II.parent wecc240_psse_G_6103;
modify MEADOW_CREEK_PROJECT_COMPANY.parent wecc240_psse_G_6103;
modify CLEARWATER_PAPER_IPP_LEWISTON.parent wecc240_psse_G_4103;
modify LUCKY_PEAK_POWER_PLANT_PROJECT.parent wecc240_psse_G_6101;
modify AMERICAN_FALLS.parent wecc240_psse_G_6103;
modify C_J_STRIKE.parent wecc240_psse_G_6101;
modify GRAND_VIEW_SOLAR_TWO.parent wecc240_psse_G_6101;
modify ROCKLAND_WIND_FARM.parent wecc240_psse_G_6103;
modify BLISS.parent wecc240_psse_G_6101;
modify WOLVERINE_CREEK.parent wecc240_psse_G_6103;
modify LOWER_SALMON.parent wecc240_psse_G_6101;
modify MILNER_HYDRO.parent wecc240_psse_G_6101;
modify HORSE_BUTTE_WIND_I_LLC.parent wecc240_psse_G_6103;
modify TWIN_FALLS.parent wecc240_psse_G_6101;
modify ALBENI_FALLS.parent wecc240_psse_G_4103;
modify ID_SOLAR.parent wecc240_psse_G_6101;
modify HIGH_MESA_ENERGY_LLC.parent wecc240_psse_G_6101;
modify ANDERSON_RANCH.parent wecc240_psse_G_6101;
object pypower.gen {
    name wecc240_psse_G_5003;
    bus 194;
    status IN_SERVICE;
}
modify SMITH_FALLS_HYDRO_PROJECT.parent wecc240_psse_G_5003;
object pypower.gen {
    name wecc240_psse_G_6501;
    bus 222;
    status IN_SERVICE;
}
modify GRACE.parent wecc240_psse_G_6501;
modify ONEIDA.parent wecc240_psse_G_6501;
modify MINIDOKA.parent wecc240_psse_G_6103;
object pypower.gen {
    name wecc240_psse_G_6403;
    bus 219;
    status IN_SERVICE;
}
modify SWAN_FALLS.parent wecc240_psse_G_6403;
modify GEM_STATE.parent wecc240_psse_G_6103;
modify MAINLINE_WINDFARM.parent wecc240_psse_G_6101;
modify TWO_PONDS_WINDFARM.parent wecc240_psse_G_6101;
modify COLD_SPRINGS_WINDFARM.parent wecc240_psse_G_6101;
modify HAMMETT_HILL_WINDFARM.parent wecc240_psse_G_6101;
modify RYEGRASS_WINDFARM.parent wecc240_psse_G_6101;
modify DESERT_MEADOW_WINDFARM.parent wecc240_psse_G_6101;
modify POWER_COUNTY_WIND_PARK_NORTH.parent wecc240_psse_G_6103;
modify POWER_COUNTY_WIND_PARK_SOUTH.parent wecc240_psse_G_6103;
modify CAMP_REED.parent wecc240_psse_G_6101;
modify SAWTOOTH_WIND_PROJECT.parent wecc240_psse_G_6101;
modify BURLEY_BUTTE_WINDPARK.parent wecc240_psse_G_6101;
modify PAYNES_FERRY.parent wecc240_psse_G_6101;
modify HOT_SPRINGS_WINDFARM_LLC.parent wecc240_psse_G_6101;
modify SALMON_FALLS_WIND_PARK.parent wecc240_psse_G_6101;
modify YAHOO_CREEK.parent wecc240_psse_G_6101;
modify BENNETT_CREEK_WINDFARM_LLC.parent wecc240_psse_G_6101;
modify MT_HOME_SOLAR_1_LLC.parent wecc240_psse_G_6101;
modify AMERICAN_FALLS_SOLAR_II.parent wecc240_psse_G_6103;
modify AMERICAN_FALLS_SOLAR.parent wecc240_psse_G_6103;
modify ORCHARD_RANCH_SOLAR.parent wecc240_psse_G_6101;
modify SIMCOE_SOLAR.parent wecc240_psse_G_6101;
modify MURPHY_FLAT_SOLAR.parent wecc240_psse_G_6403;
modify MILNER_DAM_WIND_PARK_LLC.parent wecc240_psse_G_6101;
modify CASSIA_GULCH_WIND_PARK_LLC.parent wecc240_psse_G_6101;
modify RAFT_RIVER_GEOTHERMAL_POWER_PLANT.parent wecc240_psse_G_6103;
modify UPPER_SALMON_A.parent wecc240_psse_G_6101;
modify TUANA_SPRINGS.parent wecc240_psse_G_6101;
modify UPPER_SALMON_B.parent wecc240_psse_G_6101;
modify SIMPLOT_LEASING_DON_PLANT.parent wecc240_psse_G_6103;
modify ARROWROCK_HYDROELECTRIC_PROJECT.parent wecc240_psse_G_6101;
modify SODA.parent wecc240_psse_G_6501;
modify POST_FALLS.parent wecc240_psse_G_4103;
modify OREGON_TRAIL_WIND_PARK.parent wecc240_psse_G_6101;
modify LOWER_MALAD.parent wecc240_psse_G_6101;
modify CASCADE.parent wecc240_psse_G_6101;
modify THOUSAND_SPRINGS_WIND_PARK.parent wecc240_psse_G_6101;
modify GOLDEN_VALLEY_WIND_PARK_LLC.parent wecc240_psse_G_6101;
modify SHOSHONE_FALLS.parent wecc240_psse_G_6101;
modify FOSSIL_GULCH.parent wecc240_psse_G_6101;
modify PILGRIM_STAGE_WIND_PARK.parent wecc240_psse_G_6101;
modify CASSIA_WIND_FARM_LLC.parent wecc240_psse_G_6101;
modify TUANA_GULCH_WIND_PARK.parent wecc240_psse_G_6101;
modify RUPERT_COGEN_PROJECT.parent wecc240_psse_G_6103;
modify GLENNS_FERRY_COGEN_FACILITY.parent wecc240_psse_G_6101;
modify AMALGAMATED_SUGAR_TWIN_FALLS.parent wecc240_psse_G_6101;
modify BLACK_CANYON.parent wecc240_psse_G_4003;
object pypower.gen {
    name wecc240_psse_G_6201;
    bus 203;
    status IN_SERVICE;
}
modify COLSTRIP.parent wecc240_psse_G_6201;
modify NOXON_RAPIDS.parent wecc240_psse_G_4103;
modify LIBBY.parent wecc240_psse_G_4103;
object pypower.gen {
    name wecc240_psse_G_6202;
    bus 204;
    status IN_SERVICE;
}
modify HUNGRY_HORSE.parent wecc240_psse_G_6202;
modify YELLOWTAIL.parent wecc240_psse_G_6201;
modify KERR.parent wecc240_psse_G_6202;
modify DAVE_GATES_GENERATING_STATION.parent wecc240_psse_G_6202;
object pypower.gen {
    name wecc240_psse_G_6205;
    bus 207;
    status IN_SERVICE;
}
modify NATURENER_RIM_ROCK_ENERGY.parent wecc240_psse_G_6205;
modify FORT_PECK.parent wecc240_psse_G_6201;
modify JUDITH_GAP_WIND_ENERGY_CENTER.parent wecc240_psse_G_6205;
modify HARDIN_GENERATOR_PROJECT.parent wecc240_psse_G_6201;
modify NATURENER_GLACIER_WIND_ENERGY_1.parent wecc240_psse_G_6205;
modify NATURENER_GLACIER_WIND_ENERGY_2.parent wecc240_psse_G_6205;
modify THOMPSON_FALLS.parent wecc240_psse_G_4103;
modify CULBERTSON_GENERATION_STATION.parent wecc240_psse_G_6201;
modify GLENDIVE_GT.parent wecc240_psse_G_6201;
modify STILLWATER_WIND_LLC.parent wecc240_psse_G_6205;
modify LEWIS_CLARK.parent wecc240_psse_G_6201;
modify YELLOWSTONE_ENERGY_LP.parent wecc240_psse_G_6201;
modify MORONY.parent wecc240_psse_G_6205;
modify COCHRANE.parent wecc240_psse_G_6205;
modify RAINBOW.parent wecc240_psse_G_6205;
modify BASIN_CREEK_PLANT.parent wecc240_psse_G_6202;
modify RYAN.parent wecc240_psse_G_6205;
modify CANYON_FERRY.parent wecc240_psse_G_6205;
modify COLSTRIP_ENERGY_LP.parent wecc240_psse_G_6201;
modify SPION_KOP_WIND_FARM.parent wecc240_psse_G_6205;
modify HOLTER.parent wecc240_psse_G_6205;
modify OREG_2_INC.parent wecc240_psse_G_6201;
modify DIAMOND_WILLOW_WIND_FACILITY.parent wecc240_psse_G_6201;
modify OREG_1_INC.parent wecc240_psse_G_6201;
modify GREENFIELD_WIND_-_MT.parent wecc240_psse_G_6205;
modify BIG_TIMBER_WIND_FARM.parent wecc240_psse_G_6205;
modify BLACK_EAGLE.parent wecc240_psse_G_6205;
modify MILES_CITY_GT.parent wecc240_psse_G_6201;
modify HAUSER.parent wecc240_psse_G_6205;
modify GORDON_BUTTE_WIND_LLC.parent wecc240_psse_G_6205;
modify TURNBULL_HYDRO.parent wecc240_psse_G_6205;
modify MYSTIC.parent wecc240_psse_G_6205;
modify MUSSELSHELL_WIND_PROJECT.parent wecc240_psse_G_6205;
modify FAIRFIELD_WIND.parent wecc240_psse_G_6205;
modify MUSSELSHELL_WIND_PROJECT_TWO_LLC.parent wecc240_psse_G_6205;
object pypower.gen {
    name wecc240_psse_G_1001;
    bus 1;
    status IN_SERVICE;
}
modify SAN_JUAN.parent wecc240_psse_G_1001;
modify FOUR_CORNERS.parent wecc240_psse_G_1001;
modify HOBBS_GENERATING_STATION.parent wecc240_psse_G_7001;
modify LUNA_ENERGY_FACILITY.parent wecc240_psse_G_1101;
modify CUNNINGHAM.parent wecc240_psse_G_7001;
modify RIO_GRANDE.parent wecc240_psse_G_1101;
modify AFTON_GENERATING_STATION.parent wecc240_psse_G_1101;
modify MADDOX.parent wecc240_psse_G_7001;
modify NEW_MEXICO_WIND_ENERGY_CENTER.parent wecc240_psse_G_7001;
modify PYRAMID.parent wecc240_psse_G_1101;
modify VALENCIA_ENERGY_FACILITY.parent wecc240_psse_G_1001;
modify REEVES.parent wecc240_psse_G_1004;
modify RIO_BRAVO.parent wecc240_psse_G_1004;
modify SAN_JUAN_MESA.parent wecc240_psse_G_7001;
modify RED_MESA_WIND_LLC.parent wecc240_psse_G_1001;
modify HIGH_LONESOME_MESA_LLC.parent wecc240_psse_G_1004;
modify ARAGONNE_WIND_LLC.parent wecc240_psse_G_7001;
modify LORDSBURG_GENERATING.parent wecc240_psse_G_1101;
modify CAPROCK_WIND_FARM.parent wecc240_psse_G_7001;
modify BLUFFVIEW.parent wecc240_psse_G_1004;
modify MACHO_SPRINGS.parent wecc240_psse_G_1101;
modify MACHO_SPRINGS_POWER_I.parent wecc240_psse_G_1101;
modify LCEC_GENERATION_LLVC.parent wecc240_psse_G_7001;
modify LA_LUZ_ENERGY_CENTER.parent wecc240_psse_G_1001;
modify CIMARRON_SOLAR_FACILITY.parent wecc240_psse_G_7001;
modify NAVAJO_DAM.parent wecc240_psse_G_1004;
modify ELEPHANT_BUTTE.parent wecc240_psse_G_1101;
modify WILDCAT_WIND.parent wecc240_psse_G_7001;
modify QUAY_COUNTY.parent wecc240_psse_G_7001;
modify RATON.parent wecc240_psse_G_7001;
modify ROADRUNNER_SOLAR.parent wecc240_psse_G_1101;
modify ABIQUIU_DAM.parent wecc240_psse_G_1004;
modify FORD_UTILITIES_CENTER.parent wecc240_psse_G_1004;
modify LAS_CRUCES_CENTENNIAL_SOLAR_FARM.parent wecc240_psse_G_1101;
modify SUNE_EPE2_LLC.parent wecc240_psse_G_1101;
modify SPS5_HOPI.parent wecc240_psse_G_1004;
modify SPS4_MONUMENT.parent wecc240_psse_G_7001;
modify SPS3_LEA.parent wecc240_psse_G_7001;
modify SPS2_JAL.parent wecc240_psse_G_7001;
modify SPS1_DOLLARHIDE.parent wecc240_psse_G_7001;
modify SUNE_EPE1_LLC.parent wecc240_psse_G_1101;
object pypower.gen {
    name wecc240_psse_G_4005;
    bus 163;
    status IN_SERVICE;
}
modify JOHN_DAY.parent wecc240_psse_G_4005;
object pypower.gen {
    name wecc240_psse_G_4006;
    bus 164;
    status IN_SERVICE;
}
modify THE_DALLES.parent wecc240_psse_G_4006;
modify BONNEVILLE.parent wecc240_psse_G_4006;
object pypower.gen {
    name wecc240_psse_G_4102;
    bus 181;
    status IN_SERVICE;
}
modify MCNARY.parent wecc240_psse_G_4102;
modify HERMISTON_POWER_PARTNERSHIP.parent wecc240_psse_G_4102;
modify HERMISTON_GENERATING_PLANT.parent wecc240_psse_G_4102;
object pypower.gen {
    name wecc240_psse_G_4202;
    bus 187;
    status IN_SERVICE;
}
modify BEAVER.parent wecc240_psse_G_4202;
object pypower.gen {
    name wecc240_psse_G_4001;
    bus 159;
    status IN_SERVICE;
}
modify KLAMATH_COGENERATION_PLANT.parent wecc240_psse_G_4001;
modify CARTY_GENERATING_STATION.parent wecc240_psse_G_4102;
modify PORT_WESTWARD.parent wecc240_psse_G_4202;
modify BIGLOW_CANYON_WIND_FARM.parent wecc240_psse_G_4005;
modify HELLS_CANYON.parent wecc240_psse_G_4003;
modify ROUND_BUTTE.parent wecc240_psse_G_4004;
modify KLONDIKE_WINDPOWER_III_PHASE_2.parent wecc240_psse_G_4005;
modify KLONDIKE_WINDPOWER_III_PHASE_1.parent wecc240_psse_G_4005;
modify COYOTE_SPRINGS.parent wecc240_psse_G_4102;
modify HORSESHOE_BEND_WIND_LLC.parent wecc240_psse_G_4005;
modify SOUTH_HURLBURT_WIND_LLC.parent wecc240_psse_G_4005;
modify COYOTE_SPRINGS_II.parent wecc240_psse_G_4102;
modify NORTH_HURLBURT_WIND_LLC.parent wecc240_psse_G_4005;
modify PORT_WESTWARD_UNIT_2.parent wecc240_psse_G_4202;
modify LEANING_JUNIPER_WIND_POWER_II.parent wecc240_psse_G_4005;
modify MONTAGUE_WIND_POWER_FACILITY_LLC.parent wecc240_psse_G_4005;
modify OXBOW.parent wecc240_psse_G_4003;
modify FPL_ENERGY_VANSYCLE_LLC_OR.parent wecc240_psse_G_4102;
object pypower.gen {
    name wecc240_psse_G_4203;
    bus 188;
    status IN_SERVICE;
}
modify LOOKOUT_POINT.parent wecc240_psse_G_4203;
modify KLAMATH_EXPANSION_PROJECT.parent wecc240_psse_G_4001;
modify CARMEN_SMITH.parent wecc240_psse_G_4004;
modify LEANING_JUNIPER.parent wecc240_psse_G_4005;
modify PELTON.parent wecc240_psse_G_4004;
modify ARLINGTON_WIND_POWER_PROJECT.parent wecc240_psse_G_4005;
modify HAY_CANYON_WIND_POWER_LLC.parent wecc240_psse_G_4005;
modify ELKHORN_VALLEY_WIND_FARM.parent wecc240_psse_G_4003;
modify DETROIT.parent wecc240_psse_G_4203;
modify VANSYCLE_II_WIND_ENERGY_CENTER.parent wecc240_psse_G_4102;
modify STAR_POINT_WIND_PROJECT_LLC.parent wecc240_psse_G_4005;
modify PEBBLE_SPRINGS_WIND_LLC.parent wecc240_psse_G_4005;
modify JOHN_C_BOYLE.parent wecc240_psse_G_4204;
modify WHEAT_FIELD_WIND_POWER_PROJECT.parent wecc240_psse_G_4005;
modify GREEN_PETER.parent wecc240_psse_G_4203;
modify KLONDIKE_WINDPOWER_II.parent wecc240_psse_G_4005;
modify WILLOW_CREEK_ENERGY_CENTER.parent wecc240_psse_G_4005;
modify EURUS_COMBINE_HILLS_TURBINE_RANCH_2.parent wecc240_psse_G_4102;
modify IP_SPRINGFIELD_OREGON.parent wecc240_psse_G_4203;
modify GALA_SOLAR.parent wecc240_psse_G_4004;
modify GALA_SOLAR_2.parent wecc240_psse_G_4005;
modify DILLARD_COMPLEX.parent wecc240_psse_G_4204;
object pypower.gen {
    name wecc240_psse_G_4007;
    bus 165;
    status IN_SERVICE;
}
modify OAK_GROVE.parent wecc240_psse_G_4007;
modify CONDON_WINDPOWER_LLC.parent wecc240_psse_G_4005;
modify LOST_CREEK.parent wecc240_psse_G_4204;
modify AIRPORT_SOLAR.parent wecc240_psse_G_4001;
modify COMBINE_HILLS_I.parent wecc240_psse_G_4102;
modify TOKETEE_FALLS.parent wecc240_psse_G_4204;
modify NORTH_FORK.parent wecc240_psse_G_4007;
modify BIOMASS_ONE_LP.parent wecc240_psse_G_4204;
modify LEMOLO_2.parent wecc240_psse_G_4204;
modify GEORGIA-PACIFIC_TOLEDO_MILL.parent wecc240_psse_G_4203;
modify GEORGIA-PACIFIC_WAUNA_MILL.parent wecc240_psse_G_4202;
modify NEAL_HOT_SPRINGS_GEOTHERMAL_PROJECT.parent wecc240_psse_G_4003;
modify PROSPECT_2.parent wecc240_psse_G_4204;
modify LEMOLO_1.parent wecc240_psse_G_4203;
modify HILLS_CREEK.parent wecc240_psse_G_4203;
modify COUGAR.parent wecc240_psse_G_4203;
modify CLEARWATER_2.parent wecc240_psse_G_4204;
modify VANSYCLE.parent wecc240_psse_G_4102;
modify KLONDIKE_WIND_POWER.parent wecc240_psse_G_4005;
modify PHP_1.parent wecc240_psse_G_4006;
modify EVERGREEN_BIOPOWER_LLC.parent wecc240_psse_G_4203;
modify FOSTER.parent wecc240_psse_G_4203;
modify SENECA_SUSTAINABLE_ENERGY_LLC.parent wecc240_psse_G_4203;
modify WARM_SPRINGS_POWER_ENTERPRISES.parent wecc240_psse_G_4004;
modify FARADAY.parent wecc240_psse_G_4007;
modify RIVER_MILL.parent wecc240_psse_G_4007;
modify BIG_CLIFF.parent wecc240_psse_G_4203;
modify SLIDE_CREEK.parent wecc240_psse_G_4203;
modify GREEN_SPRINGS.parent wecc240_psse_G_4204;
modify SULLIVAN.parent wecc240_psse_G_4203;
modify DEXTER.parent wecc240_psse_G_4203;
modify CLEARWATER_1.parent wecc240_psse_G_4204;
modify COVANTA_MARION_INC.parent wecc240_psse_G_4203;
modify WASTE_MANAGEMENT_COLUMBIA_RIDGE_LFGTE.parent wecc240_psse_G_4005;
modify STONE_CREEK.parent wecc240_psse_G_4007;
modify PHP_2.parent wecc240_psse_G_4006;
modify FISH_CREEK.parent wecc240_psse_G_4204;
modify UNIV_OF_OREGON_CENTRAL_POWER_STATION.parent wecc240_psse_G_4203;
modify SODA_SPRINGS.parent wecc240_psse_G_4203;
modify VALE_AIR_SOLAR_CENTER_LLC.parent wecc240_psse_G_4003;
modify OR_SOLAR_3_LLC.parent wecc240_psse_G_4001;
modify THUNDEREGG_SOLAR_CENTER_LLC.parent wecc240_psse_G_4003;
modify ELBE_SOLAR_CENTER.parent wecc240_psse_G_4004;
modify OR_SOLAR_6_LLC.parent wecc240_psse_G_4001;
modify PROSPECTOR_WINDFARM_BURNT_RIVER.parent wecc240_psse_G_4003;
modify WILLOW_SPRING_WINDFARM.parent wecc240_psse_G_4003;
modify GARRETT_SOLAR.parent wecc240_psse_G_4001;
modify OPEN_RANGE_SOLAR_CENTER_LLC.parent wecc240_psse_G_4003;
modify CHOPIN_WIND_LLC.parent wecc240_psse_G_4102;
modify FOUR_MILE_CANYON_WINDFARM_LLC.parent wecc240_psse_G_4102;
modify FOUR_CORNERS_WINDFARM_LLC.parent wecc240_psse_G_4102;
modify ADAMS_SOLAR_CENTER.parent wecc240_psse_G_4004;
modify DURBIN_CREEK_WINDFARM_BURNT_CREEK.parent wecc240_psse_G_4003;
modify BENSON_CREEK_WINDFARM_BURNT_RIVER.parent wecc240_psse_G_4003;
modify OR_SOLAR_8_LLC.parent wecc240_psse_G_4001;
modify BEAR_CREEK_SOLAR_CENTER.parent wecc240_psse_G_4004;
modify WYEAST_SOLAR.parent wecc240_psse_G_4005;
modify JEFF_CREEK_WINDFARM_BURN_RIVER.parent wecc240_psse_G_4003;
object pypower.gen {
    name wecc240_psse_G_2604;
    bus 57;
    status IN_SERVICE;
}
modify INTERMOUNTAIN_POWER_PROJECT.parent wecc240_psse_G_2604;
object pypower.gen {
    name wecc240_psse_G_6507;
    bus 228;
    status IN_SERVICE;
}
modify HUNTER.parent wecc240_psse_G_6507;
object pypower.gen {
    name wecc240_psse_G_6502;
    bus 223;
    status IN_SERVICE;
}
modify LAKE_SIDE_POWER_PLANT.parent wecc240_psse_G_6502;
object pypower.gen {
    name wecc240_psse_G_6508;
    bus 229;
    status IN_SERVICE;
}
modify HUNTINGTON.parent wecc240_psse_G_6508;
object pypower.gen {
    name wecc240_psse_G_6504;
    bus 225;
    status IN_SERVICE;
}
modify CURRANT_CREEK.parent wecc240_psse_G_6504;
modify BONANZA.parent wecc240_psse_G_6503;
object pypower.gen {
    name wecc240_psse_G_6509;
    bus 230;
    status IN_SERVICE;
}
modify GADSBY.parent wecc240_psse_G_6509;
modify WEST_VALLEY_GENERATION_PROJECT.parent wecc240_psse_G_6509;
modify MILFORD_WIND_CORRIDOR_I_LLC.parent wecc240_psse_G_2604;
modify FLAMING_GORGE.parent wecc240_psse_G_6503;
modify NEBO_POWER_STATION.parent wecc240_psse_G_6504;
modify MILFORD_WIND_CORRIDOR_STAGE_II_LLC.parent wecc240_psse_G_2604;
modify ESCALANTE_SOLAR_I_LLC.parent wecc240_psse_G_2604;
object pypower.gen {
    name wecc240_psse_G_1302;
    bus 14;
    status IN_SERVICE;
}
modify ENTERPRISE_SOLAR_LLC.parent wecc240_psse_G_1302;
modify THREE_PEAKS_POWER.parent wecc240_psse_G_6507;
modify ESCALANTE_SOLAR_II_LLC.parent wecc240_psse_G_2604;
modify GRANITE_MOUNTAIN_SOLAR_EAST_LLC.parent wecc240_psse_G_6507;
modify UTAH_RED_HILLS_RENEWABLE_ENERGY_PARK.parent wecc240_psse_G_6507;
modify IRON_SPRINGS_SOLAR_LLC.parent wecc240_psse_G_6507;
modify ESCALANTE_SOLAR_III_LLC.parent wecc240_psse_G_2604;
modify MILLCREEK_POWER_GENERATION.parent wecc240_psse_G_1302;
object pypower.gen {
    name wecc240_psse_G_6505;
    bus 226;
    status IN_SERVICE;
}
modify LATIGO_WIND_PARK.parent wecc240_psse_G_6505;
modify SUNNYSIDE_COGEN_ASSOCIATES.parent wecc240_psse_G_6508;
modify SAGE_SOLAR_I-III.parent wecc240_psse_G_6305;
modify GRANITE_MOUNTAIN_SOLAR_WEST_LLC.parent wecc240_psse_G_6507;
modify PAVANT_SOLAR_II_LLC.parent wecc240_psse_G_2604;
modify PAVANT_SOLAR_LLC.parent wecc240_psse_G_6507;
modify US_MAGNESIUM.parent wecc240_psse_G_6502;
modify BLUNDELL.parent wecc240_psse_G_6507;
modify MURRAY_TURBINE.parent wecc240_psse_G_6509;
modify KENNECOTT_POWER_PLANT.parent wecc240_psse_G_6509;
modify WHITEHEAD.parent wecc240_psse_G_6508;
modify BOUNTIFUL_CITY.parent wecc240_psse_G_6509;
modify TESORO_SLC_COGENERATION_PLANT.parent wecc240_psse_G_6509;
modify CUTLER.parent wecc240_psse_G_6501;
modify ENEL_COVE_FORT.parent wecc240_psse_G_6507;
modify PAVANT_SOLAR_III.parent wecc240_psse_G_2604;
modify SPANISH_FORK_WIND_PARK_2_LLC.parent wecc240_psse_G_6508;
modify BYU_CENTRAL_HEATING_PLANT.parent wecc240_psse_G_6508;
modify LOGAN_CITY.parent wecc240_psse_G_6501;
modify HURRICANE_CITY_POWER.parent wecc240_psse_G_1302;
modify HEBER_CITY.parent wecc240_psse_G_6508;
modify THERMO_NO_1.parent wecc240_psse_G_6507;
modify JORDANELLE_DAM_HYDROELECTRIC_PROJECT.parent wecc240_psse_G_6509;
modify PROVO_POWER_PLANT.parent wecc240_psse_G_6508;
modify BLOOMINGTON_POWER_PLANT.parent wecc240_psse_G_1302;
object pypower.gen {
    name wecc240_psse_G_4101;
    bus 180;
    status IN_SERVICE;
}
modify GRAND_COULEE.parent wecc240_psse_G_4101;
modify CHIEF_JOSEPH.parent wecc240_psse_G_4101;
modify TRANSALTA_CENTRALIA_GENERATION.parent wecc240_psse_G_4202;
modify ROCKY_REACH.parent wecc240_psse_G_4102;
modify COLUMBIA_GENERATING_STATION.parent wecc240_psse_G_4102;
modify BOUNDARY.parent wecc240_psse_G_5003;
modify WANAPUM.parent wecc240_psse_G_4102;
modify PRIEST_RAPIDS.parent wecc240_psse_G_4102;
modify LOWER_MONUMENTAL.parent wecc240_psse_G_4102;
modify LITTLE_GOOSE.parent wecc240_psse_G_4103;
modify LOWER_GRANITE.parent wecc240_psse_G_4103;
modify WELLS.parent wecc240_psse_G_4101;
modify CHEHALIS_GENERATING_FACILITY.parent wecc240_psse_G_4202;
modify GRAYS_HARBOR_ENERGY_FACILITY.parent wecc240_psse_G_4202;
modify ROCK_ISLAND.parent wecc240_psse_G_4102;
modify ICE_HARBOR.parent wecc240_psse_G_4102;
object pypower.gen {
    name wecc240_psse_G_4201;
    bus 186;
    status IN_SERVICE;
}
modify ROSS.parent wecc240_psse_G_4201;
modify LOWER_SNAKE_RIVER_WIND_ENERGY_PROJECT.parent wecc240_psse_G_4103;
modify MINT_FARM_GENERATING_STATION.parent wecc240_psse_G_4202;
modify FREDERICKSON_POWER_LP.parent wecc240_psse_G_4202;
modify MOSSYROCK.parent wecc240_psse_G_4202;
object pypower.gen {
    name wecc240_psse_G_5001;
    bus 192;
    status IN_SERVICE;
}
modify FERNDALE_GENERATING_STATION.parent wecc240_psse_G_5001;
modify GOLDENDALE_GENERATING_STATION.parent wecc240_psse_G_4005;
modify WILD_HORSE.parent wecc240_psse_G_4102;
modify TUCANNON_RIVER_WIND_FARM.parent wecc240_psse_G_4103;
modify WINDY_FLATS_WIND_PROJECT.parent wecc240_psse_G_4005;
modify RIVER_ROAD_GEN_PLANT.parent wecc240_psse_G_4006;
modify SWIFT_1.parent wecc240_psse_G_4202;
modify MARENGO_WIND_PLANT.parent wecc240_psse_G_4103;
modify GORGE.parent wecc240_psse_G_4201;
modify WHITE_CREEK_WIND_FARM.parent wecc240_psse_G_4005;
modify BIG_HORN_WIND_PROJECT.parent wecc240_psse_G_4005;
modify DIABLO.parent wecc240_psse_G_4201;
modify FREDERICKSON.parent wecc240_psse_G_4202;
modify FPL_ENERGY_VANSYCLE_LLC_WA.parent wecc240_psse_G_4102;
modify ENCOGEN.parent wecc240_psse_G_5001;
modify WHITEHORN.parent wecc240_psse_G_5001;
modify MAYFIELD.parent wecc240_psse_G_4202;
modify HOPKINS_RIDGE_WIND.parent wecc240_psse_G_4103;
modify JUNIPER_CANYON_I_WIND_PROJECT.parent wecc240_psse_G_4005;
modify MARCH_POINT_COGENERATION.parent wecc240_psse_G_4201;
modify TUOLUMNE_WIND_PROJECT.parent wecc240_psse_G_4005;
modify MERWIN.parent wecc240_psse_G_4202;
modify YALE.parent wecc240_psse_G_4202;
modify SUMAS_POWER_PLANT.parent wecc240_psse_G_5001;
modify H_M_JACKSON.parent wecc240_psse_G_4201;
modify LOWER_BAKER.parent wecc240_psse_G_4201;
modify PALOUSE.parent wecc240_psse_G_4103;
modify UPPER_BAKER.parent wecc240_psse_G_4201;
modify GOODNOE_HILLS.parent wecc240_psse_G_4005;
modify SAGEBRUSH_POWER_PARTNERS.parent wecc240_psse_G_4202;
modify HARVEST_WIND_PROJECT.parent wecc240_psse_G_4005;
modify NINE_CANYON.parent wecc240_psse_G_4102;
modify SUMMER_FALLS_POWER_PLANT.parent wecc240_psse_G_4101;
modify VANTAGE_WIND_ENERGY_LLC.parent wecc240_psse_G_4102;
modify BOX_CANYON.parent wecc240_psse_G_5003;
modify CUSHMAN_2.parent wecc240_psse_G_4202;
modify LONG_LAKE.parent wecc240_psse_G_4103;
modify COWLITZ_FALLS.parent wecc240_psse_G_4202;
modify LAGRANDE.parent wecc240_psse_G_4202;
modify SIMPSON_TACOMA_KRAFT_BIOMASS.parent wecc240_psse_G_4202;
modify WEYERHAEUSER_LONGVIEW_WA.parent wecc240_psse_G_4202;
modify NORTHEAST.parent wecc240_psse_G_4103;
modify CONSUMER_PRODUCTS_CAMAS_LLC.parent wecc240_psse_G_4006;
modify CHELAN.parent wecc240_psse_G_4101;
modify KETTLE_FALLS_GENERATING_STATION.parent wecc240_psse_G_4101;
modify ALDER.parent wecc240_psse_G_4202;
modify LINDEN_WIND_ENERGY_PROJECT.parent wecc240_psse_G_4005;
modify BIG_HORN_WIND_II.parent wecc240_psse_G_4005;
modify LONGVIEW_FIBRE.parent wecc240_psse_G_4202;
modify CUSHMAN_1.parent wecc240_psse_G_4202;
modify LITTLE_FALLS.parent wecc240_psse_G_4103;
modify SNOQUALMIE_2.parent wecc240_psse_G_4202;
modify NINE_MILE.parent wecc240_psse_G_4103;
modify ROOSEVELT_BIOGAS_1.parent wecc240_psse_G_4005;
modify CEDAR_FALLS.parent wecc240_psse_G_4202;
modify SIERRA_PACIFIC_BURLINGTON_FACILITY.parent wecc240_psse_G_4201;
modify PACKWOOD.parent wecc240_psse_G_4202;
modify MAIN_CANAL_HEADWORKS.parent wecc240_psse_G_4101;
modify WHEELABRATOR_SPOKANE.parent wecc240_psse_G_4103;
modify BOULDER_PARK.parent wecc240_psse_G_4103;
modify TWIN_FALLS_HYDRO.parent wecc240_psse_G_4202;
modify ELECTRON.parent wecc240_psse_G_4202;
modify ADAMS_NIELSON_SOLAR.parent wecc240_psse_G_4102;
modify SIERRA_PACIFIC_ABERDEEN.parent wecc240_psse_G_4202;
modify UPRIVER_DAM_HYDRO_PLANT.parent wecc240_psse_G_4103;
modify SOUTH_FORK_TOLT.parent wecc240_psse_G_4201;
modify UNIVERSITY_OF_WASHINGTON_POWER_PLANT.parent wecc240_psse_G_4201;
modify MONROE_STREET.parent wecc240_psse_G_4103;
modify TIETON_DAM_HYDRO_ELECTRIC_PROJECT.parent wecc240_psse_G_4202;
modify ROZA.parent wecc240_psse_G_4102;
modify WYNOOCHEE.parent wecc240_psse_G_4202;
modify SNOQUALMIE.parent wecc240_psse_G_4202;
modify CHANDLER.parent wecc240_psse_G_4102;
modify KOMA_KULSHAN_ASSOCIATES.parent wecc240_psse_G_4201;
modify YELM.parent wecc240_psse_G_4202;
modify UPPER_FALLS.parent wecc240_psse_G_4103;
modify MCNARY_DAM_FISH_ATTRACTION_PROJECT.parent wecc240_psse_G_4102;
modify SDS_LUMBER_GORGE_ENERGY_DIVISION.parent wecc240_psse_G_4006;
object pypower.gen {
    name wecc240_psse_G_6301;
    bus 210;
    status IN_SERVICE;
}
modify JIM_BRIDGER.parent wecc240_psse_G_6301;
modify LARAMIE_RIVER_STATION.parent wecc240_psse_G_6302;
modify DAVE_JOHNSTON.parent wecc240_psse_G_6302;
modify NAUGHTON.parent wecc240_psse_G_6305;
modify DRY_FORK_STATION.parent wecc240_psse_G_6201;
modify WYODAK.parent wecc240_psse_G_6201;
modify EKOLA_FLATS.parent wecc240_psse_G_6302;
modify TOP_OF_THE_WORLD_WINDPOWER_PROJECT.parent wecc240_psse_G_6302;
modify GLENROCK.parent wecc240_psse_G_6302;
modify SEVEN_MILE_HILL.parent wecc240_psse_G_6302;
modify WYOMING_WIND_ENERGY_CENTER.parent wecc240_psse_G_6305;
modify SHUTE_CREEK_FACILITY.parent wecc240_psse_G_6305;
modify CHEYENNE_PRAIRIE_GENERATING_STATION.parent wecc240_psse_G_6302;
modify NEIL_SIMPSON_II.parent wecc240_psse_G_6201;
modify HIGH_PLAINS.parent wecc240_psse_G_6302;
modify WYGEN_III.parent wecc240_psse_G_6201;
modify ROLLING_HILLS.parent wecc240_psse_G_6302;
modify DUNLAP.parent wecc240_psse_G_6302;
modify CAMPBELL_HILL_WINDPOWER.parent wecc240_psse_G_6302;
modify WYGEN_2.parent wecc240_psse_G_6201;
modify SWEETWATER_SOLAR.parent wecc240_psse_G_6305;
modify WYGEN_1.parent wecc240_psse_G_6201;
modify MOUNTAIN_WIND_POWER_II_LLC.parent wecc240_psse_G_6305;
modify PIONEER_WIND_PARK_LLC.parent wecc240_psse_G_6302;
modify FREMONT_CANYON.parent wecc240_psse_G_6302;
modify MOUNTAIN_WIND_POWER_LLC.parent wecc240_psse_G_6305;
modify SEMINOE.parent wecc240_psse_G_6302;
modify ROCK_RIVER_I_LLC.parent wecc240_psse_G_6302;
modify SILVER_SAGE_WINDPOWER.parent wecc240_psse_G_6302;
modify ALCOVA.parent wecc240_psse_G_6302;
modify FOOTE_CREEK_I.parent wecc240_psse_G_6302;
modify FMC_WESTVACO.parent wecc240_psse_G_6305;
modify NEIL_SIMPSON_GAS_TURBINE_2.parent wecc240_psse_G_6201;
modify GLENDO.parent wecc240_psse_G_6302;
modify KORTES.parent wecc240_psse_G_6302;
modify MCFADDEN_RIDGE.parent wecc240_psse_G_6302;
modify GENERAL_CHEMICAL.parent wecc240_psse_G_6305;
modify HAPPY_JACK_WINDPOWER_PROJECT.parent wecc240_psse_G_6302;
modify BARBER_CREEK.parent wecc240_psse_G_6201;
modify HARTZOG.parent wecc240_psse_G_6201;
modify ARVADA.parent wecc240_psse_G_6201;
modify BUFFALO_BILL.parent wecc240_psse_G_6301;
modify CASPER_WIND_FARM.parent wecc240_psse_G_6302;
modify BOYSEN.parent wecc240_psse_G_6301;
modify SIMPLOT_PHOSPHATES.parent wecc240_psse_G_6301;
modify FONTENELLE.parent wecc240_psse_G_6305;
