module pypower;
object pypower.gen
{
    name "wecc240_psse_G_2201";
    parent "wecc240_psse_N_2201";
    Pmax 2011.9 MW;
    Qmax 402.4 MW;
    Qmin -402.4 MW;
    status IN_SERVICE;
    object gencost
    {
        model POLYNOMIAL;
        startup 0.0 $;
        shutdown 0.0 $;
        costs "0.0,0.0,0.0";
    };
}
object pypower.powerplant
{
    // OTAY_MESA_GENERATING_PROJECT_2: cap=688.5, cf=0.342, units=1
    name "wecc240_psse_G_2201_CC";
    parent "wecc240_psse_G_2201";
    latitude 32.68;
    longitude -117.0;
    generator CC;
    operating_capacity 688.5 MW;
    startup_cost 35.0;
    shutdown_cost 0.0;
    fixed_cost 500.0;
    variable_cost 50.0;
    scarcity_cost 0.001;
}

object pypower.powerplant
{
    // CALPEAK_POWER_BORDER_PEAKER_PLANT: cap=60.5, cf=0.03, units=1
    // CHULA_VISTA_I: cap=44.0, cf=0.022, units=1
    // CUYAMACA_PEAK_ENERGY_PLANT: cap=48.7, cf=0.024, units=1
    // EL_CAJON_ENERGY_CENTER: cap=49.9, cf=0.025, units=1
    // LARKSPUR_ENERGY_FACILITY: cap=99.8, cf=0.05, units=1
    // OTAY: cap=10.5, cf=0.005, units=1
    // PIO_PICO_ENERGY_CENTER: cap=321.0, cf=0.16, units=1
    name "wecc240_psse_G_2201_CT";
    parent "wecc240_psse_G_2201";
    latitude 32.68;
    longitude -117.0;
    generator CT;
    operating_capacity 634.4 MW;
    startup_cost 25.0;
    shutdown_cost 0.0;
    fixed_cost 350.0;
    variable_cost 75.0;
    scarcity_cost 0.001;
}

object pypower.gen
{
    name "wecc240_psse_G_2203";
    parent "wecc240_psse_N_2203";
    Pmax 1422.6 MW;
    Qmax 284.5 MW;
    Qmin -284.5 MW;
    status IN_SERVICE;
    object gencost
    {
        model POLYNOMIAL;
        startup 0.0 $;
        shutdown 0.0 $;
        costs "0.0,0.0,0.0";
    };
}
object pypower.powerplant
{
    // GOAL_LINE_LP: cap=51.4, cf=0.036, units=1
    // NAVAL_STATION_ENERGY_FACILITY: cap=55.2, cf=0.039, units=1
    // NORTH_ISLAND_ENERGY_FACILITY: cap=40.3, cf=0.028, units=1
    // NTC_MCRD_ENERGY_FACILITY: cap=25.6, cf=0.018, units=1
    // PALOMAR_ENERGY: cap=559.0, cf=0.393, units=1
    // SAN_DIEGO_STATE_UNIVERSITY: cap=15.1, cf=0.011, units=1
    // UNIVERSITY_OF_CALIFORNIA_SAN_DIEGO: cap=17.8, cf=0.013, units=1
    name "wecc240_psse_G_2203_CC";
    parent "wecc240_psse_G_2203";
    latitude 32.79;
    longitude -117.1;
    generator CC;
    operating_capacity 764.4 MW;
    startup_cost 35.0;
    shutdown_cost 0.0;
    fixed_cost 500.0;
    variable_cost 50.0;
    scarcity_cost 0.001;
}

object pypower.powerplant
{
    // CALPEAK_POWER_ENTERPRISE_PEAKER_PLANT: cap=58.9, cf=0.041, units=1
    // CHILDRENS_HOSPITAL: cap=3.3, cf=0.002, units=1
    // C_P_KELCO_SAN_DIEGO_PLANT: cap=28.0, cf=0.02, units=1
    // ESCONDIDO_POWER_PLANT: cap=49.9, cf=0.035, units=1
    // MIRAMAR_ENERGY_FACILITY: cap=106.0, cf=0.075, units=1
    name "wecc240_psse_G_2203_CT";
    parent "wecc240_psse_G_2203";
    latitude 32.79;
    longitude -117.1;
    generator CT;
    operating_capacity 246.1 MW;
    startup_cost 25.0;
    shutdown_cost 0.0;
    fixed_cost 350.0;
    variable_cost 75.0;
    scarcity_cost 0.001;
}

object pypower.powerplant
{
    // ESCONDIDO_ENERGY_STORAGE: cap=30.0, cf=0.021, units=1
    // UNIVERSITY_OF_CALIFORNIA_SAN_DIEGO: cap=17.8, cf=0.013, units=1
    name "wecc240_psse_G_2203_ES";
    parent "wecc240_psse_G_2203";
    latitude 32.79;
    longitude -117.1;
    generator ES;
    operating_capacity 47.8 MW;
    startup_cost 0.0;
    shutdown_cost 0.0;
    fixed_cost 0.0;
    variable_cost 5.0;
    scarcity_cost 0.0;
}

object pypower.powerplant
{
    // LAKE_HODGES_HYDROELECTRIC_FACILITY: cap=42.0, cf=0.03, units=1
    name "wecc240_psse_G_2203_HT";
    parent "wecc240_psse_G_2203";
    latitude 32.79;
    longitude -117.1;
    generator HT;
    operating_capacity 42.0 MW;
    startup_cost 0.0;
    shutdown_cost 0.0;
    fixed_cost 200.0;
    variable_cost 0.0;
    scarcity_cost 0.001;
}

object pypower.powerplant
{
    // CHILDRENS_HOSPITAL: cap=3.3, cf=0.002, units=1
    name "wecc240_psse_G_2203_IC";
    parent "wecc240_psse_G_2203";
    latitude 32.79;
    longitude -117.1;
    generator IC;
    operating_capacity 3.3 MW;
    startup_cost 0.0;
    shutdown_cost 0.0;
    fixed_cost 0.0;
    variable_cost 50.0;
    scarcity_cost 0.001;
}

object pypower.powerplant
{
    // Desert Green Solar Farm, LLC: cap=6.3, cf=0.0, units=1
    // Genentech-Oceanside Hybrid: cap=4.5, cf=0.0, units=1
    // Granger: cap=3.0, cf=0.0, units=1
    // Jacumba Solar Farm: cap=20.0, cf=0.0, units=1
    // Ocotillo Wells: cap=50.0, cf=0.0, units=1
    // Ramona 1: cap=2.0, cf=0.0, units=1
    // Ramona 2: cap=5.0, cf=0.0, units=1
    // Ramona Solar Energy: cap=3.7, cf=0.0, units=1
    // SDCWA-Twin Oaks: cap=1.1, cf=0.0, units=1
    // Solar Borrego I: cap=26.0, cf=0.0, units=1
    // Vallecitos Water District: cap=1.4, cf=0.0, units=1
    // Valley Center: cap=2.3, cf=0.0, units=1
    // Valley Center 1: cap=2.5, cf=0.0, units=1
    // Valley Center 2: cap=5.0, cf=0.0, units=1
    name "wecc240_psse_G_2203_PV";
    parent "wecc240_psse_G_2203";
    latitude 32.79;
    longitude -117.1;
    generator PV;
    operating_capacity 132.8 MW;
    startup_cost 0.0;
    shutdown_cost 0.0;
    fixed_cost 0.0;
    variable_cost 0.0;
    scarcity_cost 0.0;
}

object pypower.powerplant
{
    // CHILDRENS_HOSPITAL: cap=3.3, cf=0.002, units=1
    name "wecc240_psse_G_2203_ST";
    parent "wecc240_psse_G_2203";
    latitude 32.79;
    longitude -117.1;
    generator ST;
    operating_capacity 3.3 MW;
    startup_cost 6500.0;
    shutdown_cost 0.0;
    fixed_cost 1000.0;
    variable_cost 5.0;
    scarcity_cost 0.001;
}

object pypower.powerplant
{
    // Golden Acorn Casino: cap=1.85, cf=0.0, units=1
    // Kumeyaay Phase I: cap=50.0, cf=0.0, units=25
    // Tule: cap=131.1, cf=0.0, units=57
    name "wecc240_psse_G_2203_WT";
    parent "wecc240_psse_G_2203";
    latitude 32.79;
    longitude -117.1;
    generator WT;
    operating_capacity 182.95 MW;
    startup_cost 0.0;
    shutdown_cost 0.0;
    fixed_cost 0.0;
    variable_cost 0.0;
    scarcity_cost 0.0;
}

object pypower.gen
{
    name "wecc240_psse_G_2503";
    parent "wecc240_psse_N_2503";
    Pmax 1117.6 MW;
    Qmax 223.5 MW;
    Qmin -223.5 MW;
    status IN_SERVICE;
    object gencost
    {
        model POLYNOMIAL;
        startup 0.0 $;
        shutdown 0.0 $;
        costs "0.0,0.0,0.0";
    };
}
object pypower.powerplant
{
    // ENCINA: cap=499.8, cf=0.447, units=1
    // ORANGE_GROVE_PEAKING_FACILITY: cap=118.0, cf=0.106, units=1
    name "wecc240_psse_G_2503_CT";
    parent "wecc240_psse_G_2503";
    latitude 33.37;
    longitude -117.6;
    generator CT;
    operating_capacity 617.8 MW;
    startup_cost 25.0;
    shutdown_cost 0.0;
    fixed_cost 350.0;
    variable_cost 75.0;
    scarcity_cost 0.001;
}

object pypower.powerplant
{
    // ENCINA: cap=499.8, cf=0.447, units=1
    name "wecc240_psse_G_2503_ST";
    parent "wecc240_psse_G_2503";
    latitude 33.37;
    longitude -117.6;
    generator ST;
    operating_capacity 499.8 MW;
    startup_cost 6500.0;
    shutdown_cost 0.0;
    fixed_cost 1000.0;
    variable_cost 5.0;
    scarcity_cost 0.001;
}

object pypower.gen
{
    name "wecc240_psse_G_2610";
    parent "wecc240_psse_N_2610";
    Pmax 1327.9 MW;
    Qmax 265.6 MW;
    Qmin -265.6 MW;
    status IN_SERVICE;
    object gencost
    {
        model POLYNOMIAL;
        startup 0.0 $;
        shutdown 0.0 $;
        costs "0.0,0.0,0.0";
    };
}
object pypower.powerplant
{
    // UCI_FACILITIES_MANAGEMENT_CENTRAL_PLANT: cap=19.0, cf=0.014, units=1
    name "wecc240_psse_G_2610_CC";
    parent "wecc240_psse_G_2610";
    latitude 33.7;
    longitude -117.9;
    generator CC;
    operating_capacity 19.0 MW;
    startup_cost 35.0;
    shutdown_cost 0.0;
    fixed_cost 500.0;
    variable_cost 50.0;
    scarcity_cost 0.001;
}

object pypower.powerplant
{
    // AES_HUNTINGTON_BEACH_LLC: cap=218.0, cf=0.164, units=1
    // BARRE_PEAKER: cap=49.8, cf=0.038, units=1
    // GRS_COYOTE_CANYON: cap=20.0, cf=0.015, units=1
    name "wecc240_psse_G_2610_CT";
    parent "wecc240_psse_G_2610";
    latitude 33.7;
    longitude -117.9;
    generator CT;
    operating_capacity 287.8 MW;
    startup_cost 25.0;
    shutdown_cost 0.0;
    fixed_cost 350.0;
    variable_cost 75.0;
    scarcity_cost 0.001;
}

object pypower.powerplant
{
    // PEBBLY_BEACH: cap=6.3, cf=0.005, units=1
    name "wecc240_psse_G_2610_ES";
    parent "wecc240_psse_G_2610";
    latitude 33.7;
    longitude -117.9;
    generator ES;
    operating_capacity 6.3 MW;
    startup_cost 0.0;
    shutdown_cost 0.0;
    fixed_cost 0.0;
    variable_cost 5.0;
    scarcity_cost 0.0;
}

object pypower.powerplant
{
    // Adelanto Solar II, LLC: cap=7.0, cf=0.0, units=1
    // Adelanto Solar Project: cap=10.0, cf=0.0, units=1
    // Adelanto Solar, LLC: cap=20.0, cf=0.0, units=1
    // Alamo Solar: cap=18.7, cf=0.0, units=1
    // BCE Los Alamitos 1: cap=10.0, cf=0.0, units=1
    // BCE Los Alamitos 2: cap=10.0, cf=0.0, units=1
    // CA Institute for Women: cap=1.0, cf=0.0, units=1
    // Cascade Solar: cap=18.5, cf=0.0, units=1
    // Colton Solar One, LLC: cap=2.5, cf=0.0, units=1
    // Colton Solar Two, LLC: cap=1.0, cf=0.0, units=1
    // Coronus Adelanto West 1: cap=1.5, cf=0.0, units=1
    // Coronus Adelanto West 2: cap=1.5, cf=0.0, units=1
    // Crafton Hills College Solar Farm: cap=1.3, cf=0.0, units=1
    // Expressway Solar A: cap=2.0, cf=0.0, units=1
    // Expressway Solar B: cap=2.0, cf=0.0, units=1
    // Expressway Solar C2: cap=1.5, cf=0.0, units=1
    // Hudson-High Desert Hybrid: cap=100.0, cf=0.0, units=1
    // Industry Solar Power Generation Station 1, LLC: cap=1.5, cf=0.0, units=1
    // Lockhart Solar PV, LLC: cap=85.0, cf=0.0, units=1
    // Lone Valley Solar Park I, LLC: cap=10.0, cf=0.0, units=1
    // Lone Valley Solar Park II, LLC: cap=20.0, cf=0.0, units=1
    // Longboat Solar, LLC: cap=20.0, cf=0.0, units=1
    // Madelyn Solar, LLC: cap=1.0, cf=0.0, units=1
    // Mitchell Solar, LLC: cap=1.5, cf=0.0, units=1
    // Navajo Solar Power Generation Station 1, LLC: cap=1.5, cf=0.0, units=1
    // Newberry Solar 1, LLC: cap=1.5, cf=0.0, units=1
    // Nunn: cap=1.0, cf=0.0, units=1
    // Otoe Solar Power Generation Station 1, LLC: cap=1.5, cf=0.0, units=1
    // PVN Milliken, LLC: cap=3.0, cf=0.0, units=1
    // Phelan Pinon Hills CSD Solar: cap=1.1, cf=0.0, units=1
    // Powhatan Solar Power Generation Station 1, LLC: cap=1.5, cf=0.0, units=1
    // RE Victor Phelan Solar One, LLC: cap=17.5, cf=0.0, units=1
    // Rudy Solar, LLC: cap=1.5, cf=0.0, units=1
    // SCE-Snowline-Duncan Road (North): cap=1.5, cf=0.0, units=1
    // SCE-Snowline-Duncan Road (South): cap=1.0, cf=0.0, units=1
    // SCE-Snowline-White Rd (Central): cap=1.5, cf=0.0, units=1
    // SCE-Snowline-White Road (North): cap=1.5, cf=0.0, units=1
    // SCE-Snowline-White Road (South): cap=1.5, cf=0.0, units=1
    // SEPV 2: cap=2.0, cf=0.0, units=1
    // SEPV 8: cap=12.0, cf=0.0, units=1
    // SEPV9 Power Plant: cap=8.5, cf=0.0, units=1
    // Sheep Creek Community Solar Farm: cap=3.0, cf=0.0, units=1
    // Stateline Solar: cap=299.5, cf=0.0, units=1
    // SunEdison Walmart Apple Valley DC: cap=0.9, cf=0.0, units=1
    // Sunray 2: cap=20.0, cf=0.0, units=1
    // Sunray 3: cap=13.8, cf=0.0, units=1
    // Target Shafter: cap=3.0, cf=0.0, units=1
    // Victor Dry Farm Ranch A: cap=5.0, cf=0.0, units=1
    // Victor Dry Farm Ranch B: cap=5.0, cf=0.0, units=1
    // Victor Mesa Linda B2: cap=1.6, cf=0.0, units=1
    // Victor Mesa Linda C2: cap=1.6, cf=0.0, units=1
    // Victor Mesa Linda D2: cap=1.6, cf=0.0, units=1
    // Victor Valley CC CPV Solar: cap=1.0, cf=0.0, units=1
    // Watts 3115: cap=2.0, cf=0.0, units=1
    name "wecc240_psse_G_2610_PV";
    parent "wecc240_psse_G_2610";
    latitude 33.7;
    longitude -117.9;
    generator PV;
    operating_capacity 765.1 MW;
    startup_cost 0.0;
    shutdown_cost 0.0;
    fixed_cost 0.0;
    variable_cost 0.0;
    scarcity_cost 0.0;
}

object pypower.powerplant
{
    // AES_HUNTINGTON_BEACH_LLC: cap=218.0, cf=0.164, units=1
    // PEBBLY_BEACH: cap=6.3, cf=0.005, units=1
    // PLANT_NO_2_ORANGE_COUNTY: cap=16.0, cf=0.012, units=1
    name "wecc240_psse_G_2610_ST";
    parent "wecc240_psse_G_2610";
    latitude 33.7;
    longitude -117.9;
    generator ST;
    operating_capacity 240.3 MW;
    startup_cost 6500.0;
    shutdown_cost 0.0;
    fixed_cost 1000.0;
    variable_cost 5.0;
    scarcity_cost 0.001;
}

object pypower.powerplant
{
    // Barstow Marine Logistics Base: cap=1.5, cf=0.0, units=1
    // Cemex Black Mountain Quarry: cap=3.0, cf=0.0, units=2
    // Cemex River Plant: cap=3.2, cf=0.0, units=2
    // Inland Empire Utility Agency: cap=1.0, cf=0.0, units=1
    // Victorville Wind Project: cap=0.75, cf=0.0, units=1
    name "wecc240_psse_G_2610_WT";
    parent "wecc240_psse_G_2610";
    latitude 33.7;
    longitude -117.9;
    generator WT;
    operating_capacity 9.45 MW;
    startup_cost 0.0;
    shutdown_cost 0.0;
    fixed_cost 0.0;
    variable_cost 0.0;
    scarcity_cost 0.0;
}

object pypower.gen
{
    name "wecc240_psse_G_2301";
    parent "wecc240_psse_N_2301";
    Pmax 610.5 MW;
    Qmax 122.1 MW;
    Qmin -122.1 MW;
    status IN_SERVICE;
    object gencost
    {
        model POLYNOMIAL;
        startup 0.0 $;
        shutdown 0.0 $;
        costs "0.0,0.0,0.0";
    };
}
object pypower.powerplant
{
    // EL_CENTRO: cap=129.4, cf=0.212, units=1
    name "wecc240_psse_G_2301_CC";
    parent "wecc240_psse_G_2301";
    latitude 32.86;
    longitude -115.6;
    generator CC;
    operating_capacity 129.4 MW;
    startup_cost 35.0;
    shutdown_cost 0.0;
    fixed_cost 500.0;
    variable_cost 50.0;
    scarcity_cost 0.001;
}

object pypower.powerplant
{
    // ROCKWOOD: cap=24.9, cf=0.041, units=1
    name "wecc240_psse_G_2301_CT";
    parent "wecc240_psse_G_2301";
    latitude 32.86;
    longitude -115.6;
    generator CT;
    operating_capacity 24.9 MW;
    startup_cost 25.0;
    shutdown_cost 0.0;
    fixed_cost 350.0;
    variable_cost 75.0;
    scarcity_cost 0.001;
}

object pypower.powerplant
{
    // EL_CENTRO: cap=129.4, cf=0.212, units=1
    name "wecc240_psse_G_2301_ES";
    parent "wecc240_psse_G_2301";
    latitude 32.86;
    longitude -115.6;
    generator ES;
    operating_capacity 129.4 MW;
    startup_cost 0.0;
    shutdown_cost 0.0;
    fixed_cost 0.0;
    variable_cost 5.0;
    scarcity_cost 0.0;
}

object pypower.powerplant
{
    // EL_CENTRO: cap=129.4, cf=0.212, units=1
    // HEBER_GEOTHERMAL: cap=62.5, cf=0.102, units=1
    // ROCKWOOD: cap=24.9, cf=0.041, units=1
    // SALTON_SEA_POWER_GEN_CO_-_UNIT_2: cap=20.0, cf=0.033, units=1
    // SALTON_SEA_POWER_GEN_CO_UNIT_1: cap=10.0, cf=0.016, units=1
    // SECOND_IMPERIAL_GEOTHERMAL: cap=80.0, cf=0.131, units=1
    name "wecc240_psse_G_2301_ST";
    parent "wecc240_psse_G_2301";
    latitude 32.86;
    longitude -115.6;
    generator ST;
    operating_capacity 326.8 MW;
    startup_cost 6500.0;
    shutdown_cost 0.0;
    fixed_cost 1000.0;
    variable_cost 5.0;
    scarcity_cost 0.001;
}

object pypower.gen
{
    name "wecc240_psse_G_2100";
    parent "wecc240_psse_N_2100";
    Pmax 4064.3 MW;
    Qmax 812.9 MW;
    Qmin -812.9 MW;
    status IN_SERVICE;
    object gencost
    {
        model POLYNOMIAL;
        startup 0.0 $;
        shutdown 0.0 $;
        costs "0.0,0.0,0.0";
    };
}
object pypower.powerplant
{
    // YUMA_COGENERATION_ASSOCIATES: cap=62.6, cf=0.015, units=1
    name "wecc240_psse_G_2100_CC";
    parent "wecc240_psse_G_2100";
    latitude 32.97;
    longitude -115.4;
    generator CC;
    operating_capacity 62.6 MW;
    startup_cost 35.0;
    shutdown_cost 0.0;
    fixed_cost 500.0;
    variable_cost 50.0;
    scarcity_cost 0.001;
}

object pypower.powerplant
{
    // NILAND_GAS_TURBINE_PLANT: cap=121.0, cf=0.03, units=1
    // YUCCA: cap=212.5, cf=0.052, units=1
    name "wecc240_psse_G_2100_CT";
    parent "wecc240_psse_G_2100";
    latitude 32.97;
    longitude -115.4;
    generator CT;
    operating_capacity 333.5 MW;
    startup_cost 25.0;
    shutdown_cost 0.0;
    fixed_cost 350.0;
    variable_cost 75.0;
    scarcity_cost 0.001;
}

object pypower.powerplant
{
    // DROP_2_CA: cap=10.0, cf=0.002, units=1
    // DROP_4: cap=19.6, cf=0.005, units=1
    // PILOT_KNOB: cap=33.0, cf=0.008, units=1
    name "wecc240_psse_G_2100_HT";
    parent "wecc240_psse_G_2100";
    latitude 32.97;
    longitude -115.4;
    generator HT;
    operating_capacity 62.6 MW;
    startup_cost 0.0;
    shutdown_cost 0.0;
    fixed_cost 200.0;
    variable_cost 0.0;
    scarcity_cost 0.001;
}

object pypower.powerplant
{
    // Agua Caliente Solar Project: cap=290.0, cf=0.0, units=1
    // Arizona Western College PV: cap=5.7, cf=0.0, units=1
    // Calipatria Solar Farm: cap=20.0, cf=0.0, units=1
    // Calipatria State Prison: cap=6.0, cf=0.0, units=1
    // Campo Verde Solar: cap=147.4, cf=0.0, units=1
    // Centinela Solar Energy: cap=170.0, cf=0.0, units=1
    // Centinela State Prison: cap=6.0, cf=0.0, units=1
    // Citizens Imperial Solar: cap=30.0, cf=0.0, units=1
    // Community Solar 1: cap=6.0, cf=0.0, units=1
    // Crown Cooling Facility: cap=1.0, cf=0.0, units=1
    // Drew Solar LLC: cap=100.0, cf=0.0, units=1
    // Foothills Solar Plant Hybrid: cap=37.44, cf=0.0, units=1
    // Heber Solar: cap=10.0, cf=0.0, units=1
    // Hyder II Hybrid: cap=14.0, cf=0.0, units=1
    // Hyder Solar Hybrid: cap=16.0, cf=0.0, units=1
    // IVC Solar: cap=3.0, cf=0.0, units=1
    // Imperial Solar Energy Center South: cap=130.0, cf=0.0, units=1
    // Imperial Solar Energy Center West: cap=148.7, cf=0.0, units=1
    // Imperial Valley Solar Co (IVSC) 2, LLC: cap=20.01, cf=0.0, units=1
    // Imperial Valley Solar Company 1, LLC: cap=23.0, cf=0.0, units=1
    // Imperial Valley Solar, LLC: cap=206.72, cf=0.0, units=1
    // Midway Solar Farm I: cap=50.0, cf=0.0, units=1
    // Midway Solar Farm II: cap=30.0, cf=0.0, units=1
    // Midway Solar Farm III: cap=20.0, cf=0.0, units=1
    // Mount Signal Solar Farm II: cap=153.5, cf=0.0, units=1
    // Mount Signal Solar Farm V: cap=252.3, cf=0.0, units=1
    // SEPV Imperial Dixieland East: cap=1.9, cf=0.0, units=1
    // SEPV Imperial Dixieland West: cap=2.9, cf=0.0, units=1
    // Seville 1: cap=20.0, cf=0.0, units=1
    // Seville 2: cap=30.0, cf=0.0, units=1
    // Sol Orchard El Centro PV: cap=20.0, cf=0.0, units=1
    // Solar Gen 2 Solar Facility: cap=155.1, cf=0.0, units=1
    // Titan Solar 1 (CA): cap=75.0, cf=0.0, units=1
    // USG 1: cap=1.0, cf=0.0, units=1
    // USG 2: cap=1.0, cf=0.0, units=1
    // Valencia 1 Solar CA: cap=3.0, cf=0.0, units=1
    // Valencia 2: cap=3.0, cf=0.0, units=1
    // Valencia 3: cap=3.0, cf=0.0, units=1
    // Wistaria Ranch Solar: cap=100.0, cf=0.0, units=1
    // Wister Solar: cap=20.0, cf=0.0, units=1
    name "wecc240_psse_G_2100_PV";
    parent "wecc240_psse_G_2100";
    latitude 32.97;
    longitude -115.4;
    generator PV;
    operating_capacity 2332.67 MW;
    startup_cost 0.0;
    shutdown_cost 0.0;
    fixed_cost 0.0;
    variable_cost 0.0;
    scarcity_cost 0.0;
}

object pypower.powerplant
{
    // CE_LEATHERS: cap=45.5, cf=0.011, units=1
    // CE_TURBO_LLC: cap=11.5, cf=0.003, units=1
    // DEL_RANCH_COMPANY: cap=45.5, cf=0.011, units=1
    // ELMORE_COMPANY: cap=45.5, cf=0.011, units=1
    // GENESIS_SOLAR_ENERGY_PROJECT: cap=250.0, cf=0.062, units=1
    // GEO_EAST_MESA_III: cap=29.6, cf=0.007, units=1
    // JOHN_L_FEATHERSTONE_PLANT: cap=55.0, cf=0.014, units=1
    // NORTH_BRAWLEY_GEOTHERMAL_PLANT: cap=64.0, cf=0.016, units=1
    // ORMESA_I: cap=26.4, cf=0.006, units=1
    // ORMESA_II: cap=24.0, cf=0.006, units=1
    // SALTON_SEA_POWER_GEN_CO_-_UNIT_3: cap=53.9, cf=0.013, units=1
    // SALTON_SEA_POWER_GEN_CO_-_UNIT_4: cap=47.5, cf=0.012, units=1
    // SALTON_SEA_POWER_LLC_-_UNIT_5: cap=58.3, cf=0.014, units=1
    // VULCAN-BN_GEOTHERMAL_POWER_COMPANY: cap=39.6, cf=0.01, units=1
    // YUCCA: cap=212.5, cf=0.052, units=1
    name "wecc240_psse_G_2100_ST";
    parent "wecc240_psse_G_2100";
    latitude 32.97;
    longitude -115.4;
    generator ST;
    operating_capacity 1008.8 MW;
    startup_cost 6500.0;
    shutdown_cost 0.0;
    fixed_cost 1000.0;
    variable_cost 5.0;
    scarcity_cost 0.001;
}

object pypower.powerplant
{
    // Ocotillo Wind I: cap=264.18, cf=0.0, units=112
    name "wecc240_psse_G_2100_WT";
    parent "wecc240_psse_G_2100";
    latitude 32.97;
    longitude -115.4;
    generator WT;
    operating_capacity 264.18 MW;
    startup_cost 0.0;
    shutdown_cost 0.0;
    fixed_cost 0.0;
    variable_cost 0.0;
    scarcity_cost 0.0;
}

object pypower.gen
{
    name "wecc240_psse_G_1401";
    parent "wecc240_psse_N_1401";
    Pmax 11527.2 MW;
    Qmax 2305.4 MW;
    Qmin -2305.4 MW;
    status IN_SERVICE;
    object gencost
    {
        model POLYNOMIAL;
        startup 0.0 $;
        shutdown 0.0 $;
        costs "0.0,0.0,0.0";
    };
}
object pypower.powerplant
{
    // ARLINGTON_VALLEY_ENERGY_FACILITY: cap=713.0, cf=0.062, units=1
    // GILA_RIVER_POWER_BLOCK_2: cap=619.0, cf=0.054, units=1
    // GILA_RIVER_POWER_BLOCK_3: cap=619.0, cf=0.054, units=1
    // GILA_RIVER_POWER_STATION: cap=619.0, cf=0.054, units=1
    // HARQUAHALA_GENERATING_PROJECT: cap=1325.1, cf=0.115, units=1
    // MESQUITE_GENERATING_STATION_BLOCK_1: cap=691.6, cf=0.06, units=1
    // MESQUITE_GENERATING_STATION_BLOCK_2: cap=691.6, cf=0.06, units=1
    // RED_HAWK: cap=1140.3, cf=0.099, units=1
    // SUNDEVIL_POWER_HOLDINGS_-_GILA_RIVER: cap=619.0, cf=0.054, units=1
    name "wecc240_psse_G_1401_CC";
    parent "wecc240_psse_G_1401";
    latitude 33.52;
    longitude -113.2;
    generator CC;
    operating_capacity 7037.6 MW;
    startup_cost 35.0;
    shutdown_cost 0.0;
    fixed_cost 500.0;
    variable_cost 50.0;
    scarcity_cost 0.001;
}

object pypower.powerplant
{
    // SOLANA_GENERATING_STATION: cap=280.0, cf=0.024, units=1
    name "wecc240_psse_G_1401_ES";
    parent "wecc240_psse_G_1401";
    latitude 33.52;
    longitude -113.2;
    generator ES;
    operating_capacity 280.0 MW;
    startup_cost 0.0;
    shutdown_cost 0.0;
    fixed_cost 0.0;
    variable_cost 5.0;
    scarcity_cost 0.0;
}

object pypower.powerplant
{
    // PALO_VERDE: cap=4209.6, cf=0.365, units=1
    name "wecc240_psse_G_1401_ST";
    parent "wecc240_psse_G_1401";
    latitude 33.52;
    longitude -113.2;
    generator ST;
    operating_capacity 4209.6 MW;
    startup_cost 6500.0;
    shutdown_cost 0.0;
    fixed_cost 1000.0;
    variable_cost 5.0;
    scarcity_cost 0.001;
}

object pypower.gen
{
    name "wecc240_psse_G_3601";
    parent "wecc240_psse_N_3601";
    Pmax 201.3 MW;
    Qmax 40.3 MW;
    Qmin -40.3 MW;
    status IN_SERVICE;
    object gencost
    {
        model POLYNOMIAL;
        startup 0.0 $;
        shutdown 0.0 $;
        costs "0.0,0.0,0.0";
    };
}
object pypower.powerplant
{
    // HUMBOLDT_BAY: cap=83.5, cf=0.415, units=1
    name "wecc240_psse_G_3601_IC";
    parent "wecc240_psse_G_3601";
    latitude 40.8;
    longitude -124.2;
    generator IC;
    operating_capacity 83.5 MW;
    startup_cost 0.0;
    shutdown_cost 0.0;
    fixed_cost 0.0;
    variable_cost 50.0;
    scarcity_cost 0.001;
}

object pypower.powerplant
{
    // Redwood Coast Airport Microgrid: cap=1.8, cf=0.0, units=1
    name "wecc240_psse_G_3601_PV";
    parent "wecc240_psse_G_3601";
    latitude 40.8;
    longitude -124.2;
    generator PV;
    operating_capacity 1.8 MW;
    startup_cost 0.0;
    shutdown_cost 0.0;
    fixed_cost 0.0;
    variable_cost 0.0;
    scarcity_cost 0.0;
}

object pypower.powerplant
{
    // EEL_RIVER_POWER: cap=32.5, cf=0.161, units=1
    // HUMBOLDT_BAY: cap=83.5, cf=0.415, units=1
    name "wecc240_psse_G_3601_ST";
    parent "wecc240_psse_G_3601";
    latitude 40.8;
    longitude -124.2;
    generator ST;
    operating_capacity 116.0 MW;
    startup_cost 6500.0;
    shutdown_cost 0.0;
    fixed_cost 1000.0;
    variable_cost 5.0;
    scarcity_cost 0.001;
}

object pypower.gen
{
    name "wecc240_psse_G_2407";
    parent "wecc240_psse_N_2407";
    Pmax 6834.4 MW;
    Qmax 1366.9 MW;
    Qmin -1366.9 MW;
    status IN_SERVICE;
    object gencost
    {
        model POLYNOMIAL;
        startup 0.0 $;
        shutdown 0.0 $;
        costs "0.0,0.0,0.0";
    };
}
object pypower.powerplant
{
    // CARSON_COGENERATION: cap=55.8, cf=0.008, units=1
    // HARBOR: cap=274.1, cf=0.04, units=1
    // HARBOR_COGEN: cap=107.4, cf=0.016, units=1
    // HAYNES: cap=579.7, cf=0.085, units=1
    // LONG_BEACH_GENERATION_LLC: cap=126.0, cf=0.018, units=1
    // WATSON_COGENERATION: cap=405.0, cf=0.059, units=1
    // WHEELABRATOR_NORWALK_ENERGY: cap=30.7, cf=0.004, units=1
    name "wecc240_psse_G_2407_CC";
    parent "wecc240_psse_G_2407";
    latitude 33.88;
    longitude -118.2;
    generator CC;
    operating_capacity 1578.7 MW;
    startup_cost 35.0;
    shutdown_cost 0.0;
    fixed_cost 500.0;
    variable_cost 50.0;
    scarcity_cost 0.001;
}

object pypower.powerplant
{
    // AES_ALAMITOS_LLC: cap=961.0, cf=0.141, units=1
    // CENTER_PEAKER: cap=29.9, cf=0.004, units=1
    // EXXONMOBIL_OIL_TORRANCE_REFINERY: cap=49.2, cf=0.008, units=2
    // HARBOR: cap=274.1, cf=0.04, units=1
    // HAYNES: cap=579.7, cf=0.085, units=1
    // LONG_BEACH_GENERATION_LLC: cap=126.0, cf=0.018, units=1
    // SOUTHEAST_RESOURCE_RECOVERY: cap=35.6, cf=0.005, units=1
    // TESORO_WILMINGTON_CALCINER: cap=34.0, cf=0.005, units=1
    // THUMS: cap=57.4, cf=0.008, units=1
    // WILMINGTON_HYDROGEN_PLANT: cap=31.9, cf=0.005, units=1
    name "wecc240_psse_G_2407_CT";
    parent "wecc240_psse_G_2407";
    latitude 33.88;
    longitude -118.2;
    generator CT;
    operating_capacity 2178.8 MW;
    startup_cost 25.0;
    shutdown_cost 0.0;
    fixed_cost 350.0;
    variable_cost 75.0;
    scarcity_cost 0.001;
}

object pypower.powerplant
{
    // CENTER_PEAKER: cap=29.9, cf=0.004, units=1
    name "wecc240_psse_G_2407_ES";
    parent "wecc240_psse_G_2407";
    latitude 33.88;
    longitude -118.2;
    generator ES;
    operating_capacity 29.9 MW;
    startup_cost 0.0;
    shutdown_cost 0.0;
    fixed_cost 0.0;
    variable_cost 5.0;
    scarcity_cost 0.0;
}

object pypower.powerplant
{
    // AES_ALAMITOS_LLC: cap=961.0, cf=0.141, units=1
    // AES_REDONDO_BEACH_LLC: cap=1316.4, cf=0.193, units=1
    // EQUILON_LOS_ANGELES_REFINING: cap=83.0, cf=0.012, units=1
    // HAYNES: cap=579.7, cf=0.085, units=1
    // LOS_ANGELES_REFINERY_WILMINGTON: cap=68.5, cf=0.01, units=1
    // TOTAL_ENERGY_FACILITIES: cap=38.4, cf=0.006, units=1
    name "wecc240_psse_G_2407_ST";
    parent "wecc240_psse_G_2407";
    latitude 33.88;
    longitude -118.2;
    generator ST;
    operating_capacity 3047.0 MW;
    startup_cost 6500.0;
    shutdown_cost 0.0;
    fixed_cost 1000.0;
    variable_cost 5.0;
    scarcity_cost 0.001;
}

object pypower.gen
{
    name "wecc240_psse_G_2613";
    parent "wecc240_psse_N_2613";
    Pmax 1661.0 MW;
    Qmax 332.2 MW;
    Qmin -332.2 MW;
    status IN_SERVICE;
    object gencost
    {
        model POLYNOMIAL;
        startup 0.0 $;
        shutdown 0.0 $;
        costs "0.0,0.0,0.0";
    };
}
object pypower.powerplant
{
    // CIVIC_CENTER: cap=34.5, cf=0.021, units=1
    // EL_SEGUNDO_COGEN: cap=180.1, cf=0.108, units=1
    // EL_SEGUNDO_ENERGY_CENTER_LLC: cap=537.4, cf=0.324, units=1
    // SCATTERGOOD: cap=292.0, cf=0.176, units=1
    name "wecc240_psse_G_2613_CC";
    parent "wecc240_psse_G_2613";
    latitude 34.04;
    longitude -118.2;
    generator CC;
    operating_capacity 1044.0 MW;
    startup_cost 35.0;
    shutdown_cost 0.0;
    fixed_cost 500.0;
    variable_cost 50.0;
    scarcity_cost 0.001;
}

object pypower.powerplant
{
    // SCATTERGOOD: cap=292.0, cf=0.176, units=1
    name "wecc240_psse_G_2613_CT";
    parent "wecc240_psse_G_2613";
    latitude 34.04;
    longitude -118.2;
    generator CT;
    operating_capacity 292.0 MW;
    startup_cost 25.0;
    shutdown_cost 0.0;
    fixed_cost 350.0;
    variable_cost 75.0;
    scarcity_cost 0.001;
}

object pypower.powerplant
{
    // HYPERION_TREATMENT_PLANT_CHP_PLANT: cap=33.0, cf=0.02, units=1
    // SCATTERGOOD: cap=292.0, cf=0.176, units=1
    name "wecc240_psse_G_2613_ST";
    parent "wecc240_psse_G_2613";
    latitude 34.04;
    longitude -118.2;
    generator ST;
    operating_capacity 325.0 MW;
    startup_cost 6500.0;
    shutdown_cost 0.0;
    fixed_cost 1000.0;
    variable_cost 5.0;
    scarcity_cost 0.001;
}

object pypower.gen
{
    name "wecc240_psse_G_2605";
    parent "wecc240_psse_N_2605";
    Pmax 141.8 MW;
    Qmax 28.4 MW;
    Qmin -28.4 MW;
    status IN_SERVICE;
    object gencost
    {
        model POLYNOMIAL;
        startup 0.0 $;
        shutdown 0.0 $;
        costs "0.0,0.0,0.0";
    };
}
object pypower.powerplant
{
    // MALBURG: cap=130.0, cf=0.917, units=1
    name "wecc240_psse_G_2605_CC";
    parent "wecc240_psse_G_2605";
    latitude 34.02;
    longitude -118.2;
    generator CC;
    operating_capacity 130.0 MW;
    startup_cost 35.0;
    shutdown_cost 0.0;
    fixed_cost 500.0;
    variable_cost 50.0;
    scarcity_cost 0.001;
}

object pypower.powerplant
{
    // H_GONZALES: cap=11.8, cf=0.083, units=1
    name "wecc240_psse_G_2605_CT";
    parent "wecc240_psse_G_2605";
    latitude 34.02;
    longitude -118.2;
    generator CT;
    operating_capacity 11.8 MW;
    startup_cost 25.0;
    shutdown_cost 0.0;
    fixed_cost 350.0;
    variable_cost 75.0;
    scarcity_cost 0.001;
}

object pypower.gen
{
    name "wecc240_psse_G_2618";
    parent "wecc240_psse_N_2618";
    Pmax 1866.1 MW;
    Qmax 373.2 MW;
    Qmin -373.2 MW;
    status IN_SERVICE;
    object gencost
    {
        model POLYNOMIAL;
        startup 0.0 $;
        shutdown 0.0 $;
        costs "0.0,0.0,0.0";
    };
}
object pypower.powerplant
{
    // OLS_ENERGY_CAMARILLO: cap=31.1, cf=0.017, units=1
    name "wecc240_psse_G_2618_CC";
    parent "wecc240_psse_G_2618";
    latitude 34.24;
    longitude -118.5;
    generator CC;
    operating_capacity 31.1 MW;
    startup_cost 35.0;
    shutdown_cost 0.0;
    fixed_cost 500.0;
    variable_cost 50.0;
    scarcity_cost 0.001;
}

object pypower.powerplant
{
    // CALABASAS_GAS_TO_ENERGY_FACILITY: cap=13.8, cf=0.007, units=1
    // E_F_OXNARD_ENERGY_FACILITY: cap=48.5, cf=0.026, units=1
    // MCGRATH_PEAKER: cap=49.8, cf=0.027, units=1
    // OXNARD: cap=68.7, cf=0.037, units=1
    // OXNARD_PAPER_MILL: cap=29.0, cf=0.016, units=1
    name "wecc240_psse_G_2618_CT";
    parent "wecc240_psse_G_2618";
    latitude 34.24;
    longitude -118.5;
    generator CT;
    operating_capacity 209.8 MW;
    startup_cost 25.0;
    shutdown_cost 0.0;
    fixed_cost 350.0;
    variable_cost 75.0;
    scarcity_cost 0.001;
}

object pypower.powerplant
{
    // HOUWELING_NURSERIES: cap=13.2, cf=0.007, units=1
    name "wecc240_psse_G_2618_IC";
    parent "wecc240_psse_G_2618";
    latitude 34.24;
    longitude -118.5;
    generator IC;
    operating_capacity 13.2 MW;
    startup_cost 0.0;
    shutdown_cost 0.0;
    fixed_cost 0.0;
    variable_cost 50.0;
    scarcity_cost 0.001;
}

object pypower.powerplant
{
    // ORMOND_BEACH: cap=1612.0, cf=0.864, units=1
    name "wecc240_psse_G_2618_ST";
    parent "wecc240_psse_G_2618";
    latitude 34.24;
    longitude -118.5;
    generator ST;
    operating_capacity 1612.0 MW;
    startup_cost 6500.0;
    shutdown_cost 0.0;
    fixed_cost 1000.0;
    variable_cost 5.0;
    scarcity_cost 0.001;
}

object pypower.gen
{
    name "wecc240_psse_G_2405";
    parent "wecc240_psse_N_2405";
    Pmax 76.8 MW;
    Qmax 15.4 MW;
    Qmin -15.4 MW;
    status IN_SERVICE;
    object gencost
    {
        model POLYNOMIAL;
        startup 0.0 $;
        shutdown 0.0 $;
        costs "0.0,0.0,0.0";
    };
}
object pypower.powerplant
{
    // BERRY_PLACERITA_COGEN: cap=42.8, cf=0.557, units=1
    // SUNSHINE_GAS_PRODUCERS: cap=23.0, cf=0.299, units=1
    name "wecc240_psse_G_2405_CT";
    parent "wecc240_psse_G_2405";
    latitude 34.32;
    longitude -118.5;
    generator CT;
    operating_capacity 65.8 MW;
    startup_cost 25.0;
    shutdown_cost 0.0;
    fixed_cost 350.0;
    variable_cost 75.0;
    scarcity_cost 0.001;
}

object pypower.powerplant
{
    // FOOTHILL: cap=11.0, cf=0.143, units=1
    name "wecc240_psse_G_2405_HT";
    parent "wecc240_psse_G_2405";
    latitude 34.32;
    longitude -118.5;
    generator HT;
    operating_capacity 11.0 MW;
    startup_cost 0.0;
    shutdown_cost 0.0;
    fixed_cost 200.0;
    variable_cost 0.0;
    scarcity_cost 0.001;
}

object pypower.gen
{
    name "wecc240_psse_G_2410";
    parent "wecc240_psse_N_2410";
    Pmax 111.3 MW;
    Qmax 22.3 MW;
    Qmin -22.3 MW;
    status IN_SERVICE;
    object gencost
    {
        model POLYNOMIAL;
        startup 0.0 $;
        shutdown 0.0 $;
        costs "0.0,0.0,0.0";
    };
}
object pypower.powerplant
{
    // SAN_FRANCISQUITO_1: cap=69.3, cf=0.623, units=1
    // SAN_FRANCISQUITO_2: cap=42.0, cf=0.377, units=1
    name "wecc240_psse_G_2410_HT";
    parent "wecc240_psse_G_2410";
    latitude 34.44;
    longitude -118.6;
    generator HT;
    operating_capacity 111.3 MW;
    startup_cost 0.0;
    shutdown_cost 0.0;
    fixed_cost 200.0;
    variable_cost 0.0;
    scarcity_cost 0.001;
}

object pypower.gen
{
    name "wecc240_psse_G_2602";
    parent "wecc240_psse_N_2602";
    Pmax 1181.7 MW;
    Qmax 236.3 MW;
    Qmin -236.3 MW;
    status IN_SERVICE;
    object gencost
    {
        model POLYNOMIAL;
        startup 0.0 $;
        shutdown 0.0 $;
        costs "0.0,0.0,0.0";
    };
}
object pypower.powerplant
{
    // MAGNOLIA_POWER_PROJECT: cap=387.6, cf=0.328, units=1
    // UCLA_SO_CAMPUS_COGEN_PROJECT: cap=43.0, cf=0.036, units=1
    // VALLEY_CA: cap=230.2, cf=0.195, units=1
    name "wecc240_psse_G_2602_CC";
    parent "wecc240_psse_G_2602";
    latitude 34.18;
    longitude -118.4;
    generator CC;
    operating_capacity 660.8 MW;
    startup_cost 35.0;
    shutdown_cost 0.0;
    fixed_cost 500.0;
    variable_cost 50.0;
    scarcity_cost 0.001;
}

object pypower.powerplant
{
    // LAKE_ONE: cap=60.5, cf=0.051, units=1
    // VALLEY_CA: cap=230.2, cf=0.195, units=1
    name "wecc240_psse_G_2602_CT";
    parent "wecc240_psse_G_2602";
    latitude 34.18;
    longitude -118.4;
    generator CT;
    operating_capacity 290.7 MW;
    startup_cost 25.0;
    shutdown_cost 0.0;
    fixed_cost 350.0;
    variable_cost 75.0;
    scarcity_cost 0.001;
}

object pypower.powerplant
{
    // VALLEY_CA: cap=230.2, cf=0.195, units=1
    name "wecc240_psse_G_2602_ST";
    parent "wecc240_psse_G_2602";
    latitude 34.18;
    longitude -118.4;
    generator ST;
    operating_capacity 230.2 MW;
    startup_cost 6500.0;
    shutdown_cost 0.0;
    fixed_cost 1000.0;
    variable_cost 5.0;
    scarcity_cost 0.001;
}

object pypower.gen
{
    name "wecc240_psse_G_2609";
    parent "wecc240_psse_N_2609";
    Pmax 1795.8 MW;
    Qmax 359.2 MW;
    Qmin -359.2 MW;
    status IN_SERVICE;
    object gencost
    {
        model POLYNOMIAL;
        startup 0.0 $;
        shutdown 0.0 $;
        costs "0.0,0.0,0.0";
    };
}
object pypower.powerplant
{
    // GRAYSON: cap=100.3, cf=0.056, units=1
    name "wecc240_psse_G_2609_CC";
    parent "wecc240_psse_G_2609";
    latitude 34.15;
    longitude -118.3;
    generator CC;
    operating_capacity 100.3 MW;
    startup_cost 35.0;
    shutdown_cost 0.0;
    fixed_cost 500.0;
    variable_cost 50.0;
    scarcity_cost 0.001;
}

object pypower.powerplant
{
    // GRAYSON: cap=100.3, cf=0.056, units=1
    name "wecc240_psse_G_2609_CT";
    parent "wecc240_psse_G_2609";
    latitude 34.15;
    longitude -118.3;
    generator CT;
    operating_capacity 100.3 MW;
    startup_cost 25.0;
    shutdown_cost 0.0;
    fixed_cost 350.0;
    variable_cost 75.0;
    scarcity_cost 0.001;
}

object pypower.powerplant
{
    // AV Solar Ranch One: cap=241.5, cf=0.0, units=1
    // AVS Lancaster 1: cap=3.7, cf=0.0, units=1
    // Alpine Solar: cap=66.0, cf=0.0, units=1
    // Antelope Big Sky Ranch: cap=20.0, cf=0.0, units=1
    // Antelope DSR 1: cap=50.0, cf=0.0, units=1
    // Antelope DSR 2: cap=5.0, cf=0.0, units=1
    // Antelope DSR 3: cap=20.0, cf=0.0, units=1
    // Antelope Expansion 1B: cap=17.0, cf=0.0, units=1
    // Antelope Expansion 2: cap=105.0, cf=0.0, units=1
    // Antelope Expansion 3A: cap=15.0, cf=0.0, units=1
    // Antelope Expansion 3B: cap=5.0, cf=0.0, units=1
    // Arrache 4006: cap=2.0, cf=0.0, units=1
    // Arrache 4013: cap=1.5, cf=0.0, units=1
    // Arrache 8083: cap=4.0, cf=0.0, units=1
    // Bayshore Solar A, LLC: cap=20.0, cf=0.0, units=1
    // Bayshore Solar B, LLC: cap=20.0, cf=0.0, units=1
    // Bayshore Solar C, LLC: cap=20.0, cf=0.0, units=1
    // Bolthouse S&P and Rowen Farms Solar: cap=1.2, cf=0.0, units=1
    // CSP Los Angeles: cap=2.3, cf=0.0, units=1
    // Castaic Lake Phase II: cap=3.5, cf=0.0, units=1
    // Central Antelope Dry Ranch B, LLC: cap=3.0, cf=0.0, units=1
    // Central Antelope Dry Ranch C: cap=20.0, cf=0.0, units=1
    // Division 1: cap=1.5, cf=0.0, units=1
    // Division 2: cap=1.0, cf=0.0, units=1
    // Elevation Solar C: cap=40.0, cf=0.0, units=1
    // Green Beanworks B PV: cap=3.0, cf=0.0, units=1
    // Green Beanworks C PV: cap=3.0, cf=0.0, units=1
    // Green Beanworks D PV: cap=3.0, cf=0.0, units=1
    // Heliocentric: cap=1.3, cf=0.0, units=1
    // Horn: cap=1.5, cf=0.0, units=1
    // Irwindale Brew Yard, LLC: cap=2.5, cf=0.0, units=1
    // Kettering Solar 1: cap=1.0, cf=0.0, units=1
    // Kettering Solar 2: cap=1.0, cf=0.0, units=1
    // L-8 Solar Project: cap=1.3, cf=0.0, units=1
    // Lancaster: cap=3.0, cf=0.0, units=1
    // Lancaster Baptist Church: cap=1.0, cf=0.0, units=1
    // Lancaster Dry Farm Ranch B: cap=5.0, cf=0.0, units=1
    // Lancaster Little Rock: cap=5.0, cf=0.0, units=1
    // Lancaster WAD B: cap=3.0, cf=0.0, units=1
    // Las Virgenes: cap=3.0, cf=0.0, units=1
    // Las Virgenes Municipal Water District: cap=1.0, cf=0.0, units=1
    // Little Rock Pham Solar: cap=3.0, cf=0.0, units=1
    // Ma: cap=1.5, cf=0.0, units=1
    // Maclay Solar Project: cap=2.2, cf=0.0, units=1
    // Morgan Lancaster 1: cap=1.5, cf=0.0, units=1
    // North Lancaster Ranch: cap=20.0, cf=0.0, units=1
    // Occidental College Solar Project: cap=1.0, cf=0.0, units=1
    // One Ten Partners PV: cap=2.0, cf=0.0, units=1
    // Portal Ridge Solar B, LLC: cap=20.0, cf=0.0, units=1
    // Portal Ridge Solar C, LLC: cap=11.4, cf=0.0, units=1
    // Radiance Solar 4: cap=1.5, cf=0.0, units=1
    // Radiance Solar 5: cap=1.5, cf=0.0, units=1
    // Rodeo Solar C2: cap=1.5, cf=0.0, units=1
    // Rodeo Solar D2: cap=1.5, cf=0.0, units=1
    // Rutan: cap=4.0, cf=0.0, units=1
    // SEPV 1: cap=2.0, cf=0.0, units=1
    // SEPV 18: cap=2.0, cf=0.0, units=1
    // SEPV Palmdale East: cap=9.98, cf=0.0, units=1
    // San Pablo Raceway: cap=100.0, cf=0.0, units=1
    // Sierra Solar Greenworks: cap=20.0, cf=0.0, units=1
    // Solar Oasis, LLC: cap=20.0, cf=0.0, units=1
    // Solar Star 1: cap=314.4, cf=0.0, units=1
    // Solar Star California, XLIV, LLC: cap=9.5, cf=0.0, units=1
    // Solverde 1: cap=85.0, cf=0.0, units=1
    // Summer North Solar: cap=6.49, cf=0.0, units=1
    // Summer Solar A2: cap=1.5, cf=0.0, units=1
    // Summer Solar B2: cap=1.5, cf=0.0, units=1
    // Summer Solar C2: cap=1.5, cf=0.0, units=1
    // Summer Solar D2: cap=1.0, cf=0.0, units=1
    // Summer Solar, LLC: cap=20.0, cf=0.0, units=1
    // TA-Acacia, LLC: cap=19.7, cf=0.0, units=1
    // TA-High Desert, LLC: cap=20.0, cf=0.0, units=1
    // US-TOPCO (Soccer Center): cap=3.0, cf=0.0, units=1
    // Vinam: cap=1.5, cf=0.0, units=1
    // Western Antelope Blue Sky B: cap=20.0, cf=0.0, units=1
    // Western Antelope Blue Sky Ranch A: cap=19.95, cf=0.0, units=1
    // Western Antelope Dry Ranch: cap=10.0, cf=0.0, units=1
    // Weymouth Solar Plant: cap=3.0, cf=0.0, units=1
    name "wecc240_psse_G_2609_PV";
    parent "wecc240_psse_G_2609";
    latitude 34.15;
    longitude -118.3;
    generator PV;
    operating_capacity 1491.42 MW;
    startup_cost 0.0;
    shutdown_cost 0.0;
    fixed_cost 0.0;
    variable_cost 0.0;
    scarcity_cost 0.0;
}

object pypower.powerplant
{
    // GRAYSON: cap=100.3, cf=0.056, units=1
    name "wecc240_psse_G_2609_ST";
    parent "wecc240_psse_G_2609";
    latitude 34.15;
    longitude -118.3;
    generator ST;
    operating_capacity 100.3 MW;
    startup_cost 6500.0;
    shutdown_cost 0.0;
    fixed_cost 1000.0;
    variable_cost 5.0;
    scarcity_cost 0.001;
}

object pypower.powerplant
{
    // California State Prison Los Angeles County: cap=1.85, cf=0.0, units=1
    // Lake Palmdale: cap=0.95, cf=0.0, units=1
    // San Clemente Island: cap=0.675, cf=0.0, units=3
    name "wecc240_psse_G_2609_WT";
    parent "wecc240_psse_G_2609";
    latitude 34.15;
    longitude -118.3;
    generator WT;
    operating_capacity 3.475 MW;
    startup_cost 0.0;
    shutdown_cost 0.0;
    fixed_cost 0.0;
    variable_cost 0.0;
    scarcity_cost 0.0;
}

object pypower.gen
{
    name "wecc240_psse_G_2406";
    parent "wecc240_psse_N_2406";
    Pmax 278.6 MW;
    Qmax 55.7 MW;
    Qmin -55.7 MW;
    status IN_SERVICE;
    object gencost
    {
        model POLYNOMIAL;
        startup 0.0 $;
        shutdown 0.0 $;
        costs "0.0,0.0,0.0";
    };
}
object pypower.powerplant
{
    // CALIFORNIA_INSTITUTE_OF_TECHNOLOGY: cap=13.0, cf=0.047, units=1
    // GLENARM: cap=132.8, cf=0.477, units=1
    name "wecc240_psse_G_2406_CC";
    parent "wecc240_psse_G_2406";
    latitude 34.15;
    longitude -118.2;
    generator CC;
    operating_capacity 145.8 MW;
    startup_cost 35.0;
    shutdown_cost 0.0;
    fixed_cost 500.0;
    variable_cost 50.0;
    scarcity_cost 0.001;
}

object pypower.powerplant
{
    // GLENARM: cap=132.8, cf=0.477, units=1
    name "wecc240_psse_G_2406_CT";
    parent "wecc240_psse_G_2406";
    latitude 34.15;
    longitude -118.2;
    generator CT;
    operating_capacity 132.8 MW;
    startup_cost 25.0;
    shutdown_cost 0.0;
    fixed_cost 350.0;
    variable_cost 75.0;
    scarcity_cost 0.001;
}

object pypower.gen
{
    name "wecc240_psse_G_2608";
    parent "wecc240_psse_N_2608";
    Pmax 2558.5 MW;
    Qmax 511.7 MW;
    Qmin -511.7 MW;
    status IN_SERVICE;
    object gencost
    {
        model POLYNOMIAL;
        startup 0.0 $;
        shutdown 0.0 $;
        costs "0.0,0.0,0.0";
    };
}
object pypower.powerplant
{
    // PASTORIA_ENERGY_FACILITY_LLC: cap=779.0, cf=0.304, units=1
    name "wecc240_psse_G_2608_CC";
    parent "wecc240_psse_G_2608";
    latitude 34.59;
    longitude -118.7;
    generator CC;
    operating_capacity 779.0 MW;
    startup_cost 35.0;
    shutdown_cost 0.0;
    fixed_cost 500.0;
    variable_cost 50.0;
    scarcity_cost 0.001;
}

object pypower.powerplant
{
    // ALAMO: cap=19.6, cf=0.008, units=1
    // CASTAIC: cap=1682.0, cf=0.657, units=1
    // W_E_WARNE: cap=74.2, cf=0.029, units=1
    name "wecc240_psse_G_2608_HT";
    parent "wecc240_psse_G_2608";
    latitude 34.59;
    longitude -118.7;
    generator HT;
    operating_capacity 1775.8 MW;
    startup_cost 0.0;
    shutdown_cost 0.0;
    fixed_cost 200.0;
    variable_cost 0.0;
    scarcity_cost 0.001;
}

object pypower.powerplant
{
    // California State Univ at Channel Islands: cap=3.7, cf=0.0, units=1
    name "wecc240_psse_G_2608_PV";
    parent "wecc240_psse_G_2608";
    latitude 34.59;
    longitude -118.7;
    generator PV;
    operating_capacity 3.7 MW;
    startup_cost 0.0;
    shutdown_cost 0.0;
    fixed_cost 0.0;
    variable_cost 0.0;
    scarcity_cost 0.0;
}

object pypower.gen
{
    name "wecc240_psse_G_2902";
    parent "wecc240_psse_N_2902";
    Pmax 434.8 MW;
    Qmax 87.0 MW;
    Qmin -87.0 MW;
    status IN_SERVICE;
    object gencost
    {
        model POLYNOMIAL;
        startup 0.0 $;
        shutdown 0.0 $;
        costs "0.0,0.0,0.0";
    };
}
object pypower.powerplant
{
    // US_BORAX: cap=48.2, cf=0.111, units=1
    name "wecc240_psse_G_2902_CT";
    parent "wecc240_psse_G_2902";
    latitude 35.05;
    longitude -118.2;
    generator CT;
    operating_capacity 48.2 MW;
    startup_cost 25.0;
    shutdown_cost 0.0;
    fixed_cost 350.0;
    variable_cost 75.0;
    scarcity_cost 0.001;
}

object pypower.powerplant
{
    // ISABELLA_HYDRO_PROJECT: cap=11.8, cf=0.027, units=1
    // KERN_RIVER_3: cap=40.1, cf=0.092, units=1
    name "wecc240_psse_G_2902_HT";
    parent "wecc240_psse_G_2902";
    latitude 35.05;
    longitude -118.2;
    generator HT;
    operating_capacity 51.9 MW;
    startup_cost 0.0;
    shutdown_cost 0.0;
    fixed_cost 200.0;
    variable_cost 0.0;
    scarcity_cost 0.001;
}

object pypower.powerplant
{
    // ARGUS_COGEN_PLANT: cap=62.5, cf=0.144, units=1
    // COSO_ENERGY_DEVELOPERS: cap=90.0, cf=0.207, units=1
    // COSO_FINANCE_PARTNERS: cap=92.2, cf=0.212, units=1
    // COSO_POWER_DEVELOPERS: cap=90.0, cf=0.207, units=1
    name "wecc240_psse_G_2902_ST";
    parent "wecc240_psse_G_2902";
    latitude 35.05;
    longitude -118.2;
    generator ST;
    operating_capacity 334.7 MW;
    startup_cost 6500.0;
    shutdown_cost 0.0;
    fixed_cost 1000.0;
    variable_cost 5.0;
    scarcity_cost 0.001;
}

object pypower.gen
{
    name "wecc240_psse_G_3801";
    parent "wecc240_psse_N_3801";
    Pmax 2323.0 MW;
    Qmax 464.6 MW;
    Qmin -464.6 MW;
    status IN_SERVICE;
    object gencost
    {
        model POLYNOMIAL;
        startup 0.0 $;
        shutdown 0.0 $;
        costs "0.0,0.0,0.0";
    };
}
object pypower.powerplant
{
    // DIABLO_CANYON: cap=2323.0, cf=1.0, units=1
    name "wecc240_psse_G_3801_ST";
    parent "wecc240_psse_G_3801";
    latitude 35.23;
    longitude -120.9;
    generator ST;
    operating_capacity 2323.0 MW;
    startup_cost 6500.0;
    shutdown_cost 0.0;
    fixed_cost 1000.0;
    variable_cost 5.0;
    scarcity_cost 0.001;
}

object pypower.gen
{
    name "wecc240_psse_G_3806";
    parent "wecc240_psse_N_3806";
    Pmax 885.7 MW;
    Qmax 177.1 MW;
    Qmin -177.1 MW;
    status IN_SERVICE;
    object gencost
    {
        model POLYNOMIAL;
        startup 0.0 $;
        shutdown 0.0 $;
        costs "0.0,0.0,0.0";
    };
}
object pypower.powerplant
{
    // SALINAS_RIVER_COGENERATION: cap=38.9, cf=0.044, units=1
    name "wecc240_psse_G_3806_CT";
    parent "wecc240_psse_G_3806";
    latitude 35.38;
    longitude -120.9;
    generator CT;
    operating_capacity 38.9 MW;
    startup_cost 25.0;
    shutdown_cost 0.0;
    fixed_cost 350.0;
    variable_cost 75.0;
    scarcity_cost 0.001;
}

object pypower.powerplant
{
    // Atascadero State Hospital: cap=1.1, cf=0.0, units=1
    // CA-DGS-California Men's Colony: cap=2.2, cf=0.0, units=1
    // California Valley Solar Ranch: cap=250.0, cf=0.0, units=1
    // Firestone Walker Brewery-Phase 1: cap=1.6, cf=0.0, units=1
    // Stenner Creek Solar: cap=4.5, cf=0.0, units=1
    // Topaz Solar Farm: cap=585.9, cf=0.0, units=1
    // Vintner Solar: cap=1.5, cf=0.0, units=1
    name "wecc240_psse_G_3806_PV";
    parent "wecc240_psse_G_3806";
    latitude 35.38;
    longitude -120.9;
    generator PV;
    operating_capacity 846.8 MW;
    startup_cost 0.0;
    shutdown_cost 0.0;
    fixed_cost 0.0;
    variable_cost 0.0;
    scarcity_cost 0.0;
}

object pypower.gen
{
    name "wecc240_psse_G_3802";
    parent "wecc240_psse_N_3802";
    Pmax 111.6 MW;
    Qmax 22.3 MW;
    Qmin -22.3 MW;
    status IN_SERVICE;
    object gencost
    {
        model POLYNOMIAL;
        startup 0.0 $;
        shutdown 0.0 $;
        costs "0.0,0.0,0.0";
    };
}
object pypower.powerplant
{
    // COALINGA_25D_COGEN: cap=13.6, cf=0.122, units=1
    // HENRIETTA_PEAKER: cap=98.0, cf=0.878, units=1
    name "wecc240_psse_G_3802_CT";
    parent "wecc240_psse_G_3802";
    latitude 36.14;
    longitude -120.1;
    generator CT;
    operating_capacity 111.6 MW;
    startup_cost 25.0;
    shutdown_cost 0.0;
    fixed_cost 350.0;
    variable_cost 75.0;
    scarcity_cost 0.001;
}

object pypower.gen
{
    name "wecc240_psse_G_3803";
    parent "wecc240_psse_N_3803";
    Pmax 11226.1 MW;
    Qmax 2245.2 MW;
    Qmin -2245.2 MW;
    status IN_SERVICE;
    object gencost
    {
        model POLYNOMIAL;
        startup 0.0 $;
        shutdown 0.0 $;
        costs "0.0,0.0,0.0";
    };
}
object pypower.powerplant
{
    // ELK_HILLS_POWER_LLC: cap=623.0, cf=0.055, units=1
    // LA_PALOMA_GENERATING_LLC: cap=1200.0, cf=0.107, units=1
    // SUNRISE_POWER_LLC: cap=605.4, cf=0.054, units=1
    // WESTERN_POWER_STEAM_INC: cap=13.8, cf=0.001, units=1
    name "wecc240_psse_G_3803_CC";
    parent "wecc240_psse_G_3803";
    latitude 35.41;
    longitude -119.5;
    generator CC;
    operating_capacity 2442.2 MW;
    startup_cost 35.0;
    shutdown_cost 0.0;
    fixed_cost 500.0;
    variable_cost 50.0;
    scarcity_cost 0.001;
}

object pypower.powerplant
{
    // BADGER_CREEK_LIMITED: cap=46.0, cf=0.004, units=1
    // BEAR_MOUNTAIN_COGEN: cap=46.0, cf=0.004, units=1
    // BERRY_COGEN: cap=38.7, cf=0.003, units=1
    // BERRY_COGEN_TANNE_HILLS_18: cap=17.6, cf=0.002, units=1
    // CHALK_CLIFF_COGEN: cap=46.0, cf=0.004, units=1
    // CYMRIC_36W_COGEN: cap=12.4, cf=0.001, units=1
    // DOUBLE_C: cap=49.8, cf=0.004, units=1
    // ELLWOOD: cap=58.0, cf=0.005, units=1
    // HIGH_SIERRA: cap=49.8, cf=0.004, units=1
    // KERN_FRONT: cap=49.8, cf=0.004, units=1
    // KERN_RIVER_COGENERATION: cap=300.0, cf=0.027, units=1
    // KERN_RIVER_EASTRIDGE_COGEN: cap=48.8, cf=0.004, units=1
    // LIVE_OAK_COGEN: cap=46.0, cf=0.004, units=1
    // LOST_HILLS_COGENERATION_PLANT: cap=10.5, cf=0.001, units=1
    // MCKITTRICK_COGEN: cap=12.0, cf=0.001, units=1
    // MCKITTRICK_COGEN_FACILITY: cap=46.0, cf=0.004, units=1
    // MIDWAY_SUNSET_COGEN: cap=234.0, cf=0.021, units=1
    // SOUTHEAST_KERN_RIVER_COGEN: cap=30.8, cf=0.003, units=1
    // SOUTH_BELRIDGE_COGENERATION_FACILITY: cap=94.2, cf=0.008, units=1
    // SYCAMORE_COGENERATION: cap=300.0, cf=0.027, units=1
    // TAFT_26C_COGEN: cap=12.4, cf=0.001, units=1
    // WELLHEAD_POWER_DELANO_LLC: cap=48.5, cf=0.004, units=1
    // WESTERN_POWER_STEAM_INC: cap=13.8, cf=0.001, units=1
    name "wecc240_psse_G_3803_CT";
    parent "wecc240_psse_G_3803";
    latitude 35.41;
    longitude -119.5;
    generator CT;
    operating_capacity 1611.1 MW;
    startup_cost 25.0;
    shutdown_cost 0.0;
    fixed_cost 350.0;
    variable_cost 75.0;
    scarcity_cost 0.001;
}

object pypower.powerplant
{
    // KERN_RIVER_1: cap=26.4, cf=0.002, units=1
    name "wecc240_psse_G_3803_HT";
    parent "wecc240_psse_G_3803";
    latitude 35.41;
    longitude -119.5;
    generator HT;
    operating_capacity 26.4 MW;
    startup_cost 0.0;
    shutdown_cost 0.0;
    fixed_cost 200.0;
    variable_cost 0.0;
    scarcity_cost 0.001;
}

object pypower.powerplant
{
    // Adobe Solar: cap=19.57, cf=0.0, units=1
    // Algonquin SKIC 10 Solar, LLC: cap=10.0, cf=0.0, units=1
    // Algonquin SKIC 20 Solar, LLC: cap=22.0, cf=0.0, units=1
    // Bakersfield 111: cap=1.4, cf=0.0, units=1
    // Bakersfield Industrial PV 1: cap=1.0, cf=0.0, units=1
    // Bakersfield PV 1: cap=5.25, cf=0.0, units=1
    // Beacon Solar Plant Site 2: cap=45.0, cf=0.0, units=1
    // Beacon Solar Plant Site 5: cap=36.0, cf=0.0, units=1
    // Berrenda Mesa Water District: cap=6.4, cf=0.0, units=1
    // BigBeau Solar, LLC: cap=128.0, cf=0.0, units=1
    // Blackwell Solar Park: cap=20.0, cf=0.0, units=1
    // CDCR (CA)-Wasco State Prison: cap=1.5, cf=0.0, units=1
    // Cal City Solar 1: cap=3.0, cf=0.0, units=1
    // Calibrant Bakersfield, LLC: cap=1.3, cf=0.0, units=1
    // California City: cap=1.9, cf=0.0, units=1
    // Castor Solar: cap=1.5, cf=0.0, units=1
    // Catalina Solar 2, LLC: cap=18.4, cf=0.0, units=1
    // Catalina Solar, LLC: cap=110.0, cf=0.0, units=1
    // Chevron-Lost Hills Hybrid: cap=29.0, cf=0.0, units=1
    // City of Rosamond (CA): cap=1.0, cf=0.0, units=1
    // Coronal Lost Hills: cap=20.0, cf=0.0, units=1
    // Cottonwood Solar, LLC (Goose Lake): cap=12.0, cf=0.0, units=1
    // Cuyama Solar, LLC: cap=40.0, cf=0.0, units=1
    // Delano Land 1: cap=1.0, cf=0.0, units=1
    // EAFB-North Base: cap=1.1, cf=0.0, units=1
    // Eagle Creek: cap=3.0, cf=0.0, units=1
    // Edwards Air Force Base: cap=3.0, cf=0.0, units=1
    // Edwards Sanborn E1A: cap=149.3, cf=0.0, units=1
    // Edwards Sanborn E2: cap=137.8, cf=0.0, units=1
    // Edwards Sanborn E3: cap=27.4, cf=0.0, units=1
    // Edwards Sanborn S1: cap=44.6, cf=0.0, units=1
    // Edwards Sanborn S3: cap=37.7, cf=0.0, units=1
    // Edwards Sanborn S4: cap=41.2, cf=0.0, units=1
    // Gaskell West 1 Solar Facility: cap=20.0, cf=0.0, units=1
    // Golden Field Solar III, LLC: cap=192.0, cf=0.0, units=1
    // Golden Fields Solar I, LLC: cap=54.0, cf=0.0, units=1
    // Hayworth Solar: cap=26.66, cf=0.0, units=1
    // Hecate Energy Beacon Solar 1: cap=56.0, cf=0.0, units=1
    // Hecate Energy Beacon Solar 3: cap=56.0, cf=0.0, units=1
    // Hecate Energy Beacon Solar 4: cap=50.0, cf=0.0, units=1
    // Improvement Dst No. 4: cap=1.1, cf=0.0, units=1
    // Kern Valley SP: cap=3.0, cf=0.0, units=1
    // Kingbird A Solar, LLC: cap=20.0, cf=0.0, units=1
    // Kingbird B Solar, LLC: cap=20.0, cf=0.0, units=1
    // Lost Hills/Blackwell: cap=32.0, cf=0.0, units=1
    // Maricopa West Solar PV, LLC: cap=20.0, cf=0.0, units=1
    // Morelos del Sol: cap=15.0, cf=0.0, units=1
    // Naval Air Weapons Station China Lake: cap=11.12, cf=0.0, units=1
    // Nickel 1 Solar Facility: cap=1.5, cf=0.0, units=1
    // North Kern State Prison Phase II: cap=4.0, cf=0.0, units=1
    // North Rosamond Solar, LLC: cap=150.0, cf=0.0, units=1
    // Orion Solar I: cap=12.0, cf=0.0, units=1
    // Orion Solar II: cap=8.0, cf=0.0, units=1
    // Pine Tree Solar Project: cap=8.5, cf=0.0, units=1
    // Pumpjack Solar I: cap=20.0, cf=0.0, units=1
    // RE Astoria: cap=100.0, cf=0.0, units=1
    // RE Astoria 2: cap=75.0, cf=0.0, units=1
    // RE Barren Ridge 1: cap=62.0, cf=0.0, units=1
    // RE Camelot, LLC: cap=45.0, cf=0.0, units=1
    // RE Columbia 3, LLC: cap=10.0, cf=0.0, units=1
    // RE Columbia Two, LLC: cap=15.0, cf=0.0, units=1
    // RE Garland: cap=180.0, cf=0.0, units=1
    // RE Garland A: cap=20.0, cf=0.0, units=1
    // RE Gaskell West 2, LLC: cap=45.0, cf=0.0, units=1
    // RE Gaskell West 3, LLC: cap=20.0, cf=0.0, units=1
    // RE Gaskell West 4, LLC: cap=20.0, cf=0.0, units=1
    // RE Gaskell West 5, LLC: cap=20.0, cf=0.0, units=1
    // RE Old River One, LLC: cap=19.65, cf=0.0, units=1
    // RE Rio Grande Solar, LLC: cap=5.0, cf=0.0, units=1
    // RE Rosamond One, LLC: cap=20.0, cf=0.0, units=1
    // RE Rosamond Two, LLC: cap=20.0, cf=0.0, units=1
    // Rabbitbrush Solar, LLC: cap=100.0, cf=0.0, units=1
    // Redcrest Solar Farm: cap=16.66, cf=0.0, units=1
    // Redwood 4 Solar Farm: cap=20.0, cf=0.0, units=1
    // Regulus Solar Project: cap=60.0, cf=0.0, units=1
    // Rio Bravo Solar 1, LLC: cap=19.5, cf=0.0, units=1
    // Rio Bravo Solar II, LLC: cap=19.5, cf=0.0, units=1
    // SEPV Mojave West: cap=20.0, cf=0.0, units=1
    // Shafter Solar, LLC: cap=20.0, cf=0.0, units=1
    // Solar Star 2: cap=279.5, cf=0.0, units=1
    // Solar Star California, XLI, LLC: cap=54.0, cf=0.0, units=1
    // Springbok 3 Solar Farm Hybrid: cap=90.0, cf=0.0, units=1
    // Springbok Solar Farm 1: cap=105.0, cf=0.0, units=1
    // Springbok Solar Farm 2: cap=155.0, cf=0.0, units=1
    // Valentine Solar, LLC: cap=111.2, cf=0.0, units=1
    // Vandenberg Solar Project: cap=20.6, cf=0.0, units=1
    // Wheeler Ridge: cap=4.5, cf=0.0, units=1
    // Wildwood Solar I, LLC: cap=20.0, cf=0.0, units=1
    // Wildwood Solar II: cap=14.7, cf=0.0, units=1
    // Willow Spring Solar, LLC: cap=100.0, cf=0.0, units=1
    // Windhub Solar A, LLC: cap=20.0, cf=0.0, units=1
    // Wonderful Huller & Shellling: cap=1.5, cf=0.0, units=1
    // Wonderful Lost Hills: cap=16.7, cf=0.0, units=1
    // Wonderful Orchards-Belridge: cap=5.0, cf=0.0, units=1
    // Wonderful Orchards-Westside: cap=5.0, cf=0.0, units=1
    // Woodmere Solar Farm: cap=14.99, cf=0.0, units=1
    name "wecc240_psse_G_3803_PV";
    parent "wecc240_psse_G_3803";
    latitude 35.41;
    longitude -119.5;
    generator PV;
    operating_capacity 3731.2 MW;
    startup_cost 0.0;
    shutdown_cost 0.0;
    fixed_cost 0.0;
    variable_cost 0.0;
    scarcity_cost 0.0;
}

object pypower.powerplant
{
    // MT_POSO_COGENERATION: cap=62.0, cf=0.006, units=1
    name "wecc240_psse_G_3803_ST";
    parent "wecc240_psse_G_3803";
    latitude 35.41;
    longitude -119.5;
    generator ST;
    operating_capacity 62.0 MW;
    startup_cost 6500.0;
    shutdown_cost 0.0;
    fixed_cost 1000.0;
    variable_cost 5.0;
    scarcity_cost 0.001;
}

object pypower.powerplant
{
    // 251 Wind: cap=0.28500000000000003, cf=0.0, units=3
    // Alite Wind Farm: cap=24.0, cf=0.0, units=8
    // Alta I: cap=151.5, cf=0.0, units=101
    // Alta II: cap=123.0, cf=0.0, units=41
    // Alta III: cap=150.0, cf=0.0, units=50
    // Alta IV: cap=111.0, cf=0.0, units=37
    // Alta V: cap=168.0, cf=0.0, units=56
    // Alta VI (partial): cap=138.0, cf=0.0, units=46
    // Alta VIII (partial): cap=174.0, cf=0.0, units=58
    // Alta X: cap=136.8, cf=0.0, units=48
    // Alta XI: cap=91.35, cf=0.0, units=49
    // Brookfield Tehachapi 1 (CCDLP): cap=78.0, cf=0.0, units=26
    // Brookfield Tehachapi 2: cap=24.0, cf=0.0, units=8
    // Cameron Ridge: cap=11.899999999999999, cf=0.0, units=17
    // Coram (Tehachapi 3): cap=1.5, cf=0.0, units=1
    // Coram Energy LLC: cap=10.5, cf=0.0, units=7
    // Difwind 6: cap=19.008, cf=0.0, units=176
    // H & S - Tehachapi: cap=1.89, cf=0.0, units=21
    // Manzana Winds: cap=189.0, cf=0.0, units=126
    // Mustang Hills: cap=18.0, cf=0.0, units=6
    // North Sky River: cap=162.0, cf=0.0, units=100
    // Oak Creek Energy Systems: cap=4.923, cf=0.0, units=11
    // Oak Creek Wind Power Phase 2: cap=23.099999999999998, cf=0.0, units=33
    // Oasis Repowering: cap=55.2, cf=0.0, units=16
    // Pacific Wind: cap=143.5, cf=0.0, units=70
    // Pine Tree Wind Farm: cap=120.0, cf=0.0, units=80
    // Pine Tree extension: cap=15.0, cf=0.0, units=10
    // Pinyon Pines I: cap=177.0, cf=0.0, units=59
    // Pinyon Pines II: cap=111.0, cf=0.0, units=37
    // Point Wind Plant: cap=57.6, cf=0.0, units=16
    // Rising Tree North: cap=99.0, cf=0.0, units=30
    // Rising Tree South: cap=99.0, cf=0.0, units=30
    // Sky River: cap=0.225, cf=0.0, units=1
    // Sky River Repower: cap=58.699999999999996, cf=0.0, units=21
    // Strauss Wind: cap=95.25, cf=0.0, units=27
    // Tehachapi Hills: cap=0.72, cf=0.0, units=8
    // Tehachapi Hills (85A): cap=0.18, cf=0.0, units=2
    // Tehachapi Hills (85B): cap=1.44, cf=0.0, units=16
    // Tehachapi Windplant I: cap=8.71, cf=0.0, units=134
    // Tehachapi Windplant II: cap=7.92, cf=0.0, units=12
    // Voyager II: cap=193.5, cf=0.0, units=54
    // Voyager Wind: cap=131.1, cf=0.0, units=38
    // Wind Wall: cap=44.85, cf=0.0, units=13
    // Windland: cap=1.5, cf=0.0, units=1
    // Windstar: cap=120.0, cf=0.0, units=60
    name "wecc240_psse_G_3803_WT";
    parent "wecc240_psse_G_3803";
    latitude 35.41;
    longitude -119.5;
    generator WT;
    operating_capacity 3353.151 MW;
    startup_cost 0.0;
    shutdown_cost 0.0;
    fixed_cost 0.0;
    variable_cost 0.0;
    scarcity_cost 0.0;
}

object pypower.gen
{
    name "wecc240_psse_G_3105";
    parent "wecc240_psse_N_3105";
    Pmax 17.9 MW;
    Qmax 3.6 MW;
    Qmin -3.6 MW;
    status IN_SERVICE;
    object gencost
    {
        model POLYNOMIAL;
        startup 0.0 $;
        shutdown 0.0 $;
        costs "0.0,0.0,0.0";
    };
}
object pypower.powerplant
{
    // PARNASSUS_CENTRAL_UTILITY_PLANT: cap=13.4, cf=0.749, units=1
    name "wecc240_psse_G_3105_CC";
    parent "wecc240_psse_G_3105";
    latitude 37.76;
    longitude -122.4;
    generator CC;
    operating_capacity 13.4 MW;
    startup_cost 35.0;
    shutdown_cost 0.0;
    fixed_cost 500.0;
    variable_cost 50.0;
    scarcity_cost 0.001;
}

object pypower.powerplant
{
    // Sunset Reservoir North Basin: cap=4.5, cf=0.0, units=1
    name "wecc240_psse_G_3105_PV";
    parent "wecc240_psse_G_3105";
    latitude 37.76;
    longitude -122.4;
    generator PV;
    operating_capacity 4.5 MW;
    startup_cost 0.0;
    shutdown_cost 0.0;
    fixed_cost 0.0;
    variable_cost 0.0;
    scarcity_cost 0.0;
}

object pypower.gen
{
    name "wecc240_psse_G_3101";
    parent "wecc240_psse_N_3101";
    Pmax 437.1 MW;
    Qmax 87.4 MW;
    Qmin -87.4 MW;
    status IN_SERVICE;
    object gencost
    {
        model POLYNOMIAL;
        startup 0.0 $;
        shutdown 0.0 $;
        costs "0.0,0.0,0.0";
    };
}
object pypower.powerplant
{
    // RICHMOND_COGEN: cap=77.8, cf=0.178, units=1
    name "wecc240_psse_G_3101_CC";
    parent "wecc240_psse_G_3101";
    latitude 37.79;
    longitude -122.4;
    generator CC;
    operating_capacity 77.8 MW;
    startup_cost 35.0;
    shutdown_cost 0.0;
    fixed_cost 500.0;
    variable_cost 50.0;
    scarcity_cost 0.001;
}

object pypower.powerplant
{
    // ALAMEDA: cap=54.8, cf=0.125, units=1
    name "wecc240_psse_G_3101_CT";
    parent "wecc240_psse_G_3101";
    latitude 37.79;
    longitude -122.4;
    generator CT;
    operating_capacity 54.8 MW;
    startup_cost 25.0;
    shutdown_cost 0.0;
    fixed_cost 350.0;
    variable_cost 75.0;
    scarcity_cost 0.001;
}

object pypower.powerplant
{
    // Silveira Ranch Road Solar: cap=3.0, cf=0.0, units=1
    name "wecc240_psse_G_3101_PV";
    parent "wecc240_psse_G_3101";
    latitude 37.79;
    longitude -122.4;
    generator PV;
    operating_capacity 3.0 MW;
    startup_cost 0.0;
    shutdown_cost 0.0;
    fixed_cost 0.0;
    variable_cost 0.0;
    scarcity_cost 0.0;
}

object pypower.powerplant
{
    // DYNEGY_OAKLAND_POWER_PLANT: cap=223.5, cf=0.511, units=1
    // RICHMOND_COGEN: cap=77.8, cf=0.178, units=1
    name "wecc240_psse_G_3101_ST";
    parent "wecc240_psse_G_3101";
    latitude 37.79;
    longitude -122.4;
    generator ST;
    operating_capacity 301.3 MW;
    startup_cost 6500.0;
    shutdown_cost 0.0;
    fixed_cost 1000.0;
    variable_cost 5.0;
    scarcity_cost 0.001;
}

object pypower.powerplant
{
    // McEvoy Ranch: cap=0.225, cf=0.0, units=1
    name "wecc240_psse_G_3101_WT";
    parent "wecc240_psse_G_3101";
    latitude 37.79;
    longitude -122.4;
    generator WT;
    operating_capacity 0.225 MW;
    startup_cost 0.0;
    shutdown_cost 0.0;
    fixed_cost 0.0;
    variable_cost 0.0;
    scarcity_cost 0.0;
}

object pypower.gen
{
    name "wecc240_psse_G_3902";
    parent "wecc240_psse_N_3902";
    Pmax 2024.9 MW;
    Qmax 405.0 MW;
    Qmin -405.0 MW;
    status IN_SERVICE;
    object gencost
    {
        model POLYNOMIAL;
        startup 0.0 $;
        shutdown 0.0 $;
        costs "0.0,0.0,0.0";
    };
}
object pypower.powerplant
{
    // DYNEGY_MOSS_LANDING_POWER_PLANT: cap=699.0, cf=0.345, units=1
    // KING_CITY_POWER_PLANT: cap=133.2, cf=0.066, units=1
    name "wecc240_psse_G_3902_CC";
    parent "wecc240_psse_G_3902";
    latitude 36.74;
    longitude -121.7;
    generator CC;
    operating_capacity 832.2 MW;
    startup_cost 35.0;
    shutdown_cost 0.0;
    fixed_cost 500.0;
    variable_cost 50.0;
    scarcity_cost 0.001;
}

object pypower.powerplant
{
    // KING_CITY_PEAKING: cap=47.3, cf=0.023, units=1
    name "wecc240_psse_G_3902_CT";
    parent "wecc240_psse_G_3902";
    latitude 36.74;
    longitude -121.7;
    generator CT;
    operating_capacity 47.3 MW;
    startup_cost 25.0;
    shutdown_cost 0.0;
    fixed_cost 350.0;
    variable_cost 75.0;
    scarcity_cost 0.001;
}

object pypower.powerplant
{
    // CA Flats Solar 130, LLC: cap=130.0, cf=0.0, units=1
    // CA Flats Solar 150, LLC: cap=150.0, cf=0.0, units=1
    // D'Arrigo Brothers-Phase 4: cap=1.7, cf=0.0, units=1
    // Enerparc CA1, LLC: cap=1.5, cf=0.0, units=1
    // Graniterock Quarry: cap=4.4, cf=0.0, units=1
    // Hollister Solar, LLC: cap=1.5, cf=0.0, units=1
    // Monterey Regional Water Pollution Control Agency: cap=1.0, cf=0.0, units=1
    // Panoche Valley Solar Farm: cap=140.0, cf=0.0, units=1
    name "wecc240_psse_G_3902_PV";
    parent "wecc240_psse_G_3902";
    latitude 36.74;
    longitude -121.7;
    generator PV;
    operating_capacity 430.1 MW;
    startup_cost 0.0;
    shutdown_cost 0.0;
    fixed_cost 0.0;
    variable_cost 0.0;
    scarcity_cost 0.0;
}

object pypower.powerplant
{
    // DYNEGY_MOSS_LANDING_POWER_PLANT: cap=699.0, cf=0.345, units=1
    name "wecc240_psse_G_3902_ST";
    parent "wecc240_psse_G_3902";
    latitude 36.74;
    longitude -121.7;
    generator ST;
    operating_capacity 699.0 MW;
    startup_cost 6500.0;
    shutdown_cost 0.0;
    fixed_cost 1000.0;
    variable_cost 5.0;
    scarcity_cost 0.001;
}

object pypower.powerplant
{
    // City of Soledad Water Reclamation Facility: cap=1.85, cf=0.0, units=1
    // Correctional Training Facility: cap=1.7, cf=0.0, units=1
    // Dole Fresh Vegetables: cap=5.64, cf=0.0, units=2
    // Mann Packing: cap=1.7, cf=0.0, units=1
    // Salinas Valley State Prison: cap=1.7, cf=0.0, units=1
    // Scheid Vineyards: cap=1.85, cf=0.0, units=1
    // Taylor Farms: cap=1.85, cf=0.0, units=1
    name "wecc240_psse_G_3902_WT";
    parent "wecc240_psse_G_3902";
    latitude 36.74;
    longitude -121.7;
    generator WT;
    operating_capacity 16.29 MW;
    startup_cost 0.0;
    shutdown_cost 0.0;
    fixed_cost 0.0;
    variable_cost 0.0;
    scarcity_cost 0.0;
}

object pypower.gen
{
    name "wecc240_psse_G_3301";
    parent "wecc240_psse_N_3301";
    Pmax 900.0 MW;
    Qmax 180.0 MW;
    Qmin -180.0 MW;
    status IN_SERVICE;
    object gencost
    {
        model POLYNOMIAL;
        startup 0.0 $;
        shutdown 0.0 $;
        costs "0.0,0.0,0.0";
    };
}
object pypower.powerplant
{
    // GILROY_POWER_PLANT: cap=130.0, cf=0.144, units=1
    // METCALF_ENERGY_CENTER: cap=635.0, cf=0.706, units=1
    name "wecc240_psse_G_3301_CC";
    parent "wecc240_psse_G_3301";
    latitude 37.22;
    longitude -121.7;
    generator CC;
    operating_capacity 765.0 MW;
    startup_cost 35.0;
    shutdown_cost 0.0;
    fixed_cost 500.0;
    variable_cost 50.0;
    scarcity_cost 0.001;
}

object pypower.powerplant
{
    // GILROY_PEAKING_ENERGY_CENTER: cap=135.0, cf=0.15, units=1
    name "wecc240_psse_G_3301_CT";
    parent "wecc240_psse_G_3301";
    latitude 37.22;
    longitude -121.7;
    generator CT;
    operating_capacity 135.0 MW;
    startup_cost 25.0;
    shutdown_cost 0.0;
    fixed_cost 350.0;
    variable_cost 75.0;
    scarcity_cost 0.001;
}

object pypower.gen
{
    name "wecc240_psse_G_3901";
    parent "wecc240_psse_N_3901";
    Pmax 1174.7 MW;
    Qmax 234.9 MW;
    Qmin -234.9 MW;
    status IN_SERVICE;
    object gencost
    {
        model POLYNOMIAL;
        startup 0.0 $;
        shutdown 0.0 $;
        costs "0.0,0.0,0.0";
    };
}
object pypower.powerplant
{
    // WALNUT_ENERGY_CENTER: cap=300.6, cf=0.256, units=1
    name "wecc240_psse_G_3901_CC";
    parent "wecc240_psse_G_3901";
    latitude 37.05;
    longitude -121.0;
    generator CC;
    operating_capacity 300.6 MW;
    startup_cost 35.0;
    shutdown_cost 0.0;
    fixed_cost 500.0;
    variable_cost 50.0;
    scarcity_cost 0.001;
}

object pypower.powerplant
{
    // COVANTA_STANISLAUS_ENERGY: cap=24.0, cf=0.02, units=1
    // WALNUT: cap=49.8, cf=0.042, units=1
    name "wecc240_psse_G_3901_CT";
    parent "wecc240_psse_G_3901";
    latitude 37.05;
    longitude -121.0;
    generator CT;
    operating_capacity 73.8 MW;
    startup_cost 25.0;
    shutdown_cost 0.0;
    fixed_cost 350.0;
    variable_cost 75.0;
    scarcity_cost 0.001;
}

object pypower.powerplant
{
    // ONEILL: cap=25.2, cf=0.021, units=1
    // W_R_GIANELLI: cap=424.0, cf=0.361, units=1
    name "wecc240_psse_G_3901_HT";
    parent "wecc240_psse_G_3901";
    latitude 37.05;
    longitude -121.0;
    generator HT;
    operating_capacity 449.2 MW;
    startup_cost 0.0;
    shutdown_cost 0.0;
    fixed_cost 200.0;
    variable_cost 0.0;
    scarcity_cost 0.001;
}

object pypower.powerplant
{
    // 2097 Helton Solar Project: cap=1.5, cf=0.0, units=1
    // Merced 1 PV: cap=3.0, cf=0.0, units=1
    // Merced Solar, LLC: cap=1.5, cf=0.0, units=1
    // Mission Solar, LLC: cap=1.5, cf=0.0, units=1
    // Quinto Solar PV Project: cap=105.1, cf=0.0, units=1
    // Sun Harvest Solar NDP1: cap=1.5, cf=0.0, units=1
    // Vega Solar: cap=20.0, cf=0.0, units=1
    // Wright Solar Park: cap=200.0, cf=0.0, units=1
    name "wecc240_psse_G_3901_PV";
    parent "wecc240_psse_G_3901";
    latitude 37.05;
    longitude -121.0;
    generator PV;
    operating_capacity 334.1 MW;
    startup_cost 0.0;
    shutdown_cost 0.0;
    fixed_cost 0.0;
    variable_cost 0.0;
    scarcity_cost 0.0;
}

object pypower.powerplant
{
    // Dinosaur Point: cap=17.009999999999998, cf=0.0, units=162
    name "wecc240_psse_G_3901_WT";
    parent "wecc240_psse_G_3901";
    latitude 37.05;
    longitude -121.0;
    generator WT;
    operating_capacity 17.01 MW;
    startup_cost 0.0;
    shutdown_cost 0.0;
    fixed_cost 0.0;
    variable_cost 0.0;
    scarcity_cost 0.0;
}

object pypower.gen
{
    name "wecc240_psse_G_3304";
    parent "wecc240_psse_N_3304";
    Pmax 34.0 MW;
    Qmax 6.8 MW;
    Qmin -6.8 MW;
    status IN_SERVICE;
    object gencost
    {
        model POLYNOMIAL;
        startup 0.0 $;
        shutdown 0.0 $;
        costs "0.0,0.0,0.0";
    };
}
object pypower.powerplant
{
    // JEFFERSON_SMURFIT_SANTA_CLARA_MILL: cap=27.0, cf=0.794, units=1
    name "wecc240_psse_G_3304_CC";
    parent "wecc240_psse_G_3304";
    latitude 37.32;
    longitude -122.1;
    generator CC;
    operating_capacity 27.0 MW;
    startup_cost 35.0;
    shutdown_cost 0.0;
    fixed_cost 500.0;
    variable_cost 50.0;
    scarcity_cost 0.001;
}

object pypower.powerplant
{
    // Guadalupe Solar Farm: cap=1.7, cf=0.0, units=1
    // Hellyer Solar Farm: cap=2.2, cf=0.0, units=1
    // Malech Solar Farm: cap=3.1, cf=0.0, units=1
    name "wecc240_psse_G_3304_PV";
    parent "wecc240_psse_G_3304";
    latitude 37.32;
    longitude -122.1;
    generator PV;
    operating_capacity 7.0 MW;
    startup_cost 0.0;
    shutdown_cost 0.0;
    fixed_cost 0.0;
    variable_cost 0.0;
    scarcity_cost 0.0;
}

object pypower.gen
{
    name "wecc240_psse_G_3103";
    parent "wecc240_psse_N_3103";
    Pmax 11.4 MW;
    Qmax 2.3 MW;
    Qmin -2.3 MW;
    status IN_SERVICE;
    object gencost
    {
        model POLYNOMIAL;
        startup 0.0 $;
        shutdown 0.0 $;
        costs "0.0,0.0,0.0";
    };
}
object pypower.powerplant
{
    // AMERESCO_OX_MOUNTAIN: cap=11.4, cf=1.0, units=1
    name "wecc240_psse_G_3103_CT";
    parent "wecc240_psse_G_3103";
    latitude 37.58;
    longitude -122.3;
    generator CT;
    operating_capacity 11.4 MW;
    startup_cost 25.0;
    shutdown_cost 0.0;
    fixed_cost 350.0;
    variable_cost 75.0;
    scarcity_cost 0.001;
}

object pypower.gen
{
    name "wecc240_psse_G_3305";
    parent "wecc240_psse_N_3305";
    Pmax 655.0 MW;
    Qmax 131.0 MW;
    Qmin -131.0 MW;
    status IN_SERVICE;
    object gencost
    {
        model POLYNOMIAL;
        startup 0.0 $;
        shutdown 0.0 $;
        costs "0.0,0.0,0.0";
    };
}
object pypower.powerplant
{
    // RUSSELL_CITY_ENERGY_CENTER: cap=655.0, cf=1.0, units=1
    name "wecc240_psse_G_3305_CC";
    parent "wecc240_psse_G_3305";
    latitude 37.49;
    longitude -122.1;
    generator CC;
    operating_capacity 655.0 MW;
    startup_cost 35.0;
    shutdown_cost 0.0;
    fixed_cost 500.0;
    variable_cost 50.0;
    scarcity_cost 0.001;
}

object pypower.gen
{
    name "wecc240_psse_G_3203";
    parent "wecc240_psse_N_3203";
    Pmax 798.4 MW;
    Qmax 159.7 MW;
    Qmin -159.7 MW;
    status IN_SERVICE;
    object gencost
    {
        model POLYNOMIAL;
        startup 0.0 $;
        shutdown 0.0 $;
        costs "0.0,0.0,0.0";
    };
}
object pypower.powerplant
{
    // AGNEWS_POWER_PLANT: cap=32.0, cf=0.04, units=1
    // DONALD_VON_RAESFELD_POWER_PLANT: cap=154.0, cf=0.193, units=1
    // LOS_ESTEROS_CRITICAL_ENERGY_CENTER: cap=306.1, cf=0.383, units=1
    name "wecc240_psse_G_3203_CC";
    parent "wecc240_psse_G_3203";
    latitude 37.5;
    longitude -122.0;
    generator CC;
    operating_capacity 492.1 MW;
    startup_cost 35.0;
    shutdown_cost 0.0;
    fixed_cost 500.0;
    variable_cost 50.0;
    scarcity_cost 0.001;
}

object pypower.powerplant
{
    // GIANERA: cap=64.6, cf=0.081, units=1
    name "wecc240_psse_G_3203_CT";
    parent "wecc240_psse_G_3203";
    latitude 37.5;
    longitude -122.0;
    generator CT;
    operating_capacity 64.6 MW;
    startup_cost 25.0;
    shutdown_cost 0.0;
    fixed_cost 350.0;
    variable_cost 75.0;
    scarcity_cost 0.001;
}

object pypower.powerplant
{
    // SJ_SC_WPCP: cap=5.5, cf=0.007, units=1
    name "wecc240_psse_G_3203_IC";
    parent "wecc240_psse_G_3203";
    latitude 37.5;
    longitude -122.0;
    generator IC;
    operating_capacity 5.5 MW;
    startup_cost 0.0;
    shutdown_cost 0.0;
    fixed_cost 0.0;
    variable_cost 50.0;
    scarcity_cost 0.001;
}

object pypower.powerplant
{
    // City of Hayward WWTP: cap=1.6, cf=0.0, units=1
    // Whitethorn Solar, LLC: cap=3.3, cf=0.0, units=1
    name "wecc240_psse_G_3203_PV";
    parent "wecc240_psse_G_3203";
    latitude 37.5;
    longitude -122.0;
    generator PV;
    operating_capacity 4.9 MW;
    startup_cost 0.0;
    shutdown_cost 0.0;
    fixed_cost 0.0;
    variable_cost 0.0;
    scarcity_cost 0.0;
}

object pypower.powerplant
{
    // SJ_SC_WPCP: cap=5.5, cf=0.007, units=1
    name "wecc240_psse_G_3203_ST";
    parent "wecc240_psse_G_3203";
    latitude 37.5;
    longitude -122.0;
    generator ST;
    operating_capacity 5.5 MW;
    startup_cost 6500.0;
    shutdown_cost 0.0;
    fixed_cost 1000.0;
    variable_cost 5.0;
    scarcity_cost 0.001;
}

object pypower.powerplant
{
    // Diablo Winds: cap=20.46, cf=0.0, units=31
    // Golden Hills: cap=81.6, cf=0.0, units=48
    // Golden Hills North: cap=46.0, cf=0.0, units=20
    // Patterson Pass: cap=8.58, cf=0.0, units=132
    // Patterson Wind: cap=4.745, cf=0.0, units=73
    // Summit Wind Repowering: cap=62.1, cf=0.0, units=23
    // Vasco (repower): cap=2.3, cf=0.0, units=1
    name "wecc240_psse_G_3203_WT";
    parent "wecc240_psse_G_3203";
    latitude 37.5;
    longitude -122.0;
    generator WT;
    operating_capacity 225.785 MW;
    startup_cost 0.0;
    shutdown_cost 0.0;
    fixed_cost 0.0;
    variable_cost 0.0;
    scarcity_cost 0.0;
}

object pypower.gen
{
    name "wecc240_psse_G_3205";
    parent "wecc240_psse_N_3205";
    Pmax 358.1 MW;
    Qmax 71.6 MW;
    Qmin -71.6 MW;
    status IN_SERVICE;
    object gencost
    {
        model POLYNOMIAL;
        startup 0.0 $;
        shutdown 0.0 $;
        costs "0.0,0.0,0.0";
    };
}
object pypower.powerplant
{
    // CROCKETT_COGEN_PROJECT: cap=247.4, cf=0.691, units=1
    // PE_BERKELEY: cap=28.5, cf=0.08, units=1
    name "wecc240_psse_G_3205_CC";
    parent "wecc240_psse_G_3205";
    latitude 37.91;
    longitude -122.2;
    generator CC;
    operating_capacity 275.9 MW;
    startup_cost 35.0;
    shutdown_cost 0.0;
    fixed_cost 500.0;
    variable_cost 50.0;
    scarcity_cost 0.001;
}

object pypower.powerplant
{
    // PHILLIPS_66_CARBON_PLANT: cap=27.3, cf=0.076, units=1
    // PHILLIPS_66_RODEO_REFINERY: cap=54.9, cf=0.153, units=1
    name "wecc240_psse_G_3205_ST";
    parent "wecc240_psse_G_3205";
    latitude 37.91;
    longitude -122.2;
    generator ST;
    operating_capacity 82.2 MW;
    startup_cost 6500.0;
    shutdown_cost 0.0;
    fixed_cost 1000.0;
    variable_cost 5.0;
    scarcity_cost 0.001;
}

object pypower.gen
{
    name "wecc240_psse_G_3903";
    parent "wecc240_psse_N_3903";
    Pmax 535.7 MW;
    Qmax 107.1 MW;
    Qmin -107.1 MW;
    status IN_SERVICE;
    object gencost
    {
        model POLYNOMIAL;
        startup 0.0 $;
        shutdown 0.0 $;
        costs "0.0,0.0,0.0";
    };
}
object pypower.powerplant
{
    // TRACY_COMBINED_CYCLE_POWER_PLANT: cap=336.1, cf=0.627, units=1
    name "wecc240_psse_G_3903_CC";
    parent "wecc240_psse_G_3903";
    latitude 37.71;
    longitude -121.6;
    generator CC;
    operating_capacity 336.1 MW;
    startup_cost 35.0;
    shutdown_cost 0.0;
    fixed_cost 500.0;
    variable_cost 50.0;
    scarcity_cost 0.001;
}

object pypower.powerplant
{
    // MARIPOSA_ENERGY_PROJECT: cap=199.6, cf=0.373, units=1
    name "wecc240_psse_G_3903_CT";
    parent "wecc240_psse_G_3903";
    latitude 37.71;
    longitude -121.6;
    generator CT;
    operating_capacity 199.6 MW;
    startup_cost 25.0;
    shutdown_cost 0.0;
    fixed_cost 350.0;
    variable_cost 75.0;
    scarcity_cost 0.001;
}

object pypower.gen
{
    name "wecc240_psse_G_8002";
    parent "wecc240_psse_N_8002";
    Pmax 573.9 MW;
    Qmax 114.8 MW;
    Qmin -114.8 MW;
    status IN_SERVICE;
    object gencost
    {
        model POLYNOMIAL;
        startup 0.0 $;
        shutdown 0.0 $;
        costs "0.0,0.0,0.0";
    };
}
object pypower.powerplant
{
    // LODI_ENERGY_CENTER: cap=288.9, cf=0.503, units=1
    name "wecc240_psse_G_8002_CC";
    parent "wecc240_psse_G_8002";
    latitude 37.75;
    longitude -121.4;
    generator CC;
    operating_capacity 288.9 MW;
    startup_cost 35.0;
    shutdown_cost 0.0;
    fixed_cost 500.0;
    variable_cost 50.0;
    scarcity_cost 0.001;
}

object pypower.powerplant
{
    // COMBUSTION_TURBINE_PROJECT_NO_2: cap=50.0, cf=0.087, units=1
    // RIPON_GENERATION_STATION: cap=121.0, cf=0.211, units=1
    // RIPON_MILL: cap=49.5, cf=0.086, units=1
    name "wecc240_psse_G_8002_CT";
    parent "wecc240_psse_G_8002";
    latitude 37.75;
    longitude -121.4;
    generator CT;
    operating_capacity 220.5 MW;
    startup_cost 25.0;
    shutdown_cost 0.0;
    fixed_cost 350.0;
    variable_cost 75.0;
    scarcity_cost 0.001;
}

object pypower.powerplant
{
    // Bear Creek Solar: cap=1.5, cf=0.0, units=1
    // Foothill Sanitary Landfill-Solar Array: cap=3.5, cf=0.0, units=1
    // Kettleman Solar Project: cap=1.0, cf=0.0, units=1
    // Manteca Land PV: cap=1.0, cf=0.0, units=1
    name "wecc240_psse_G_8002_PV";
    parent "wecc240_psse_G_8002";
    latitude 37.75;
    longitude -121.4;
    generator PV;
    operating_capacity 7.0 MW;
    startup_cost 0.0;
    shutdown_cost 0.0;
    fixed_cost 0.0;
    variable_cost 0.0;
    scarcity_cost 0.0;
}

object pypower.powerplant
{
    // STOCKTON_BIOMASS: cap=54.0, cf=0.094, units=1
    name "wecc240_psse_G_8002_ST";
    parent "wecc240_psse_G_8002";
    latitude 37.75;
    longitude -121.4;
    generator ST;
    operating_capacity 54.0 MW;
    startup_cost 6500.0;
    shutdown_cost 0.0;
    fixed_cost 1000.0;
    variable_cost 5.0;
    scarcity_cost 0.001;
}

object pypower.powerplant
{
    // Safeway Tracy: cap=2.0, cf=0.0, units=2
    // Teichert Aggregates: cap=1.5, cf=0.0, units=1
    name "wecc240_psse_G_8002_WT";
    parent "wecc240_psse_G_8002";
    latitude 37.75;
    longitude -121.4;
    generator WT;
    operating_capacity 3.5 MW;
    startup_cost 0.0;
    shutdown_cost 0.0;
    fixed_cost 0.0;
    variable_cost 0.0;
    scarcity_cost 0.0;
}

object pypower.gen
{
    name "wecc240_psse_G_3501";
    parent "wecc240_psse_N_3501";
    Pmax 1786.2 MW;
    Qmax 357.2 MW;
    Qmin -357.2 MW;
    status IN_SERVICE;
    object gencost
    {
        model POLYNOMIAL;
        startup 0.0 $;
        shutdown 0.0 $;
        costs "0.0,0.0,0.0";
    };
}
object pypower.powerplant
{
    // American Canyon Solar: cap=3.0, cf=0.0, units=1
    // Cloverdale Solar Center: cap=1.0, cf=0.0, units=1
    // Cloverdale Solar I: cap=1.5, cf=0.0, units=1
    // Dissigno Healdsburg FPV, LLC: cap=3.0, cf=0.0, units=1
    // Lavio Solar: cap=1.0, cf=0.0, units=1
    // Soscol Ferry Solar: cap=2.0, cf=0.0, units=1
    // Stage Gulch Solar: cap=0.8, cf=0.0, units=1
    // Windsor Floating Solar: cap=1.5, cf=0.0, units=1
    name "wecc240_psse_G_3501_PV";
    parent "wecc240_psse_G_3501";
    latitude 38.5;
    longitude -122.8;
    generator PV;
    operating_capacity 13.8 MW;
    startup_cost 0.0;
    shutdown_cost 0.0;
    fixed_cost 0.0;
    variable_cost 0.0;
    scarcity_cost 0.0;
}

object pypower.powerplant
{
    // AIDLIN_GEOTHERMAL_POWER_PLANT: cap=25.0, cf=0.014, units=1
    // CALISTOGA_POWER_PLANT: cap=176.4, cf=0.099, units=1
    // GEOTHERMAL_1: cap=110.0, cf=0.062, units=1
    // GEOTHERMAL_2: cap=110.0, cf=0.062, units=1
    // GEYSERS_UNIT_5-20: cap=1273.0, cf=0.713, units=1
    // SONOMA_CALIFORNIA_GEOTHERMAL: cap=78.0, cf=0.044, units=1
    name "wecc240_psse_G_3501_ST";
    parent "wecc240_psse_G_3501";
    latitude 38.5;
    longitude -122.8;
    generator ST;
    operating_capacity 1772.4 MW;
    startup_cost 6500.0;
    shutdown_cost 0.0;
    fixed_cost 1000.0;
    variable_cost 5.0;
    scarcity_cost 0.001;
}

object pypower.gen
{
    name "wecc240_psse_G_3201";
    parent "wecc240_psse_N_3201";
    Pmax 418.9 MW;
    Qmax 83.8 MW;
    Qmin -83.8 MW;
    status IN_SERVICE;
    object gencost
    {
        model POLYNOMIAL;
        startup 0.0 $;
        shutdown 0.0 $;
        costs "0.0,0.0,0.0";
    };
}
object pypower.powerplant
{
    // FOSTER_WHEELER_MARTINEZ: cap=113.5, cf=0.271, units=1
    // MARTINEZ_REFINING: cap=50.0, cf=0.119, units=1
    name "wecc240_psse_G_3201_CC";
    parent "wecc240_psse_G_3201";
    latitude 37.98;
    longitude -122.0;
    generator CC;
    operating_capacity 163.5 MW;
    startup_cost 35.0;
    shutdown_cost 0.0;
    fixed_cost 500.0;
    variable_cost 50.0;
    scarcity_cost 0.001;
}

object pypower.powerplant
{
    // VALERO_REFINERY_COGENERATION_UNIT_1: cap=51.0, cf=0.122, units=1
    name "wecc240_psse_G_3201_CT";
    parent "wecc240_psse_G_3201";
    latitude 37.98;
    longitude -122.0;
    generator CT;
    operating_capacity 51.0 MW;
    startup_cost 25.0;
    shutdown_cost 0.0;
    fixed_cost 350.0;
    variable_cost 75.0;
    scarcity_cost 0.001;
}

object pypower.powerplant
{
    // Bio-Rad: cap=2.4, cf=0.0, units=1
    // Byron Highway Solar: cap=5.0, cf=0.0, units=1
    // CSD 2-Freedom High: cap=1.1, cf=0.0, units=1
    // CSD 2-Heritage High: cap=1.3, cf=0.0, units=1
    // California PV Energy at ISD WWTP: cap=1.0, cf=0.0, units=1
    // Columbia Solar Energy, LLC: cap=19.2, cf=0.0, units=1
    // Marin Clean Energy Solar One: cap=10.5, cf=0.0, units=1
    name "wecc240_psse_G_3201_PV";
    parent "wecc240_psse_G_3201";
    latitude 37.98;
    longitude -122.0;
    generator PV;
    operating_capacity 40.5 MW;
    startup_cost 0.0;
    shutdown_cost 0.0;
    fixed_cost 0.0;
    variable_cost 0.0;
    scarcity_cost 0.0;
}

object pypower.powerplant
{
    // MARTINEZ_REFINING: cap=50.0, cf=0.119, units=1
    name "wecc240_psse_G_3201_ST";
    parent "wecc240_psse_G_3201";
    latitude 37.98;
    longitude -122.0;
    generator ST;
    operating_capacity 50.0 MW;
    startup_cost 6500.0;
    shutdown_cost 0.0;
    fixed_cost 1000.0;
    variable_cost 5.0;
    scarcity_cost 0.001;
}

object pypower.powerplant
{
    // Buena Vista: cap=38.0, cf=0.0, units=38
    // Vasco (repower): cap=75.89999999999999, cf=0.0, units=33
    name "wecc240_psse_G_3201_WT";
    parent "wecc240_psse_G_3201";
    latitude 37.98;
    longitude -122.0;
    generator WT;
    operating_capacity 113.9 MW;
    startup_cost 0.0;
    shutdown_cost 0.0;
    fixed_cost 0.0;
    variable_cost 0.0;
    scarcity_cost 0.0;
}

object pypower.gen
{
    name "wecc240_psse_G_3204";
    parent "wecc240_psse_N_3204";
    Pmax 3163.5 MW;
    Qmax 632.7 MW;
    Qmin -632.7 MW;
    status IN_SERVICE;
    object gencost
    {
        model POLYNOMIAL;
        startup 0.0 $;
        shutdown 0.0 $;
        costs "0.0,0.0,0.0";
    };
}
object pypower.powerplant
{
    // DELTA_ENERGY_CENTER: cap=943.5, cf=0.298, units=1
    // GATEWAY_GENERATING_STATION: cap=619.7, cf=0.196, units=1
    // LOS_MEDANOS_ENERGY_CENTER: cap=678.3, cf=0.214, units=1
    name "wecc240_psse_G_3204_CC";
    parent "wecc240_psse_G_3204";
    latitude 38.04;
    longitude -121.9;
    generator CC;
    operating_capacity 2241.5 MW;
    startup_cost 35.0;
    shutdown_cost 0.0;
    fixed_cost 500.0;
    variable_cost 50.0;
    scarcity_cost 0.001;
}

object pypower.powerplant
{
    // LAMBIE_ENERGY_CENTER: cap=47.0, cf=0.015, units=1
    // MARSH_LANDING_GENERATING_STATION: cap=828.0, cf=0.262, units=1
    // RIVERVIEW_ENERGY_CENTER: cap=47.0, cf=0.015, units=1
    name "wecc240_psse_G_3204_CT";
    parent "wecc240_psse_G_3204";
    latitude 38.04;
    longitude -121.9;
    generator CT;
    operating_capacity 922.0 MW;
    startup_cost 25.0;
    shutdown_cost 0.0;
    fixed_cost 350.0;
    variable_cost 75.0;
    scarcity_cost 0.001;
}

object pypower.gen
{
    name "wecc240_psse_G_3904";
    parent "wecc240_psse_N_3904";
    Pmax 1349.1 MW;
    Qmax 269.8 MW;
    Qmin -269.8 MW;
    status IN_SERVICE;
    object gencost
    {
        model POLYNOMIAL;
        startup 0.0 $;
        shutdown 0.0 $;
        costs "0.0,0.0,0.0";
    };
}
object pypower.powerplant
{
    // CALPEAK_POWER_VACA_DIXON_PEAKER_PLANT: cap=60.5, cf=0.045, units=1
    // CREED_ENERGY_CENTER: cap=47.0, cf=0.035, units=1
    // GOOSE_HAVEN_ENERGY_CENTER: cap=47.0, cf=0.035, units=1
    // WOLFSKILL_ENERGY_CENTER: cap=47.0, cf=0.035, units=1
    name "wecc240_psse_G_3904_CT";
    parent "wecc240_psse_G_3904";
    latitude 38.41;
    longitude -121.9;
    generator CT;
    operating_capacity 201.5 MW;
    startup_cost 25.0;
    shutdown_cost 0.0;
    fixed_cost 350.0;
    variable_cost 75.0;
    scarcity_cost 0.001;
}

object pypower.powerplant
{
    // MONTICELLO_DAM: cap=11.5, cf=0.009, units=1
    name "wecc240_psse_G_3904_HT";
    parent "wecc240_psse_G_3904";
    latitude 38.41;
    longitude -121.9;
    generator HT;
    operating_capacity 11.5 MW;
    startup_cost 0.0;
    shutdown_cost 0.0;
    fixed_cost 200.0;
    variable_cost 0.0;
    scarcity_cost 0.001;
}

object pypower.powerplant
{
    // CDCR (CA)-Solano State Prison: cap=1.1, cf=0.0, units=1
    // Genentech Vacaville Meter #1: cap=6.1, cf=0.0, units=1
    // Grassland 1&2 Solar Project: cap=2.5, cf=0.0, units=1
    // Grassland 3&4 Solar Project: cap=2.5, cf=0.0, units=1
    // Lake Herman: cap=5.0, cf=0.0, units=1
    // Mariani Packing Vacaville Solar: cap=0.9, cf=0.0, units=1
    // North Bay Solar 1: cap=1.0, cf=0.0, units=1
    // Putah Creek Solar Farm: cap=2.0, cf=0.0, units=1
    // SunEdison Anheuser Busch Fairfield: cap=0.9, cf=0.0, units=1
    // UC Davis South Campus: cap=13.0, cf=0.0, units=1
    // Vaca Dixon Solar Station: cap=2.0, cf=0.0, units=1
    // Vacaville: cap=1.0, cf=0.0, units=1
    // Yolo County Solar Project: cap=1.0, cf=0.0, units=1
    name "wecc240_psse_G_3904_PV";
    parent "wecc240_psse_G_3904";
    latitude 38.41;
    longitude -121.9;
    generator PV;
    operating_capacity 39.0 MW;
    startup_cost 0.0;
    shutdown_cost 0.0;
    fixed_cost 0.0;
    variable_cost 0.0;
    scarcity_cost 0.0;
}

object pypower.powerplant
{
    // Anheuser-Busch Fairfield: cap=3.35, cf=0.0, units=2
    // Cemex Madison: cap=1.5, cf=0.0, units=1
    // High Winds: cap=162.0, cf=0.0, units=90
    // Montezuma: cap=36.8, cf=0.0, units=16
    // Montezuma Winds II: cap=78.19999999999999, cf=0.0, units=34
    // Shiloh II: cap=150.0, cf=0.0, units=75
    // Shiloh III: cap=102.49999999999999, cf=0.0, units=50
    // Shiloh IV: cap=102.49999999999999, cf=0.0, units=50
    // Shiloh Wind Project: cap=159.0, cf=0.0, units=106
    // Solano IV Repower: cap=85.5, cf=0.0, units=19
    // Solano Phase 3: cap=127.8, cf=0.0, units=55
    // Solano Phase IIA: cap=24.0, cf=0.0, units=8
    // Solano Wind Project: cap=63.0, cf=0.0, units=21
    // Superior Farms: cap=1.0, cf=0.0, units=1
    name "wecc240_psse_G_3904_WT";
    parent "wecc240_psse_G_3904";
    latitude 38.41;
    longitude -121.9;
    generator WT;
    operating_capacity 1097.15 MW;
    startup_cost 0.0;
    shutdown_cost 0.0;
    fixed_cost 0.0;
    variable_cost 0.0;
    scarcity_cost 0.0;
}

object pypower.gen
{
    name "wecc240_psse_G_3907";
    parent "wecc240_psse_N_3907";
    Pmax 1710.1 MW;
    Qmax 342.0 MW;
    Qmin -342.0 MW;
    status IN_SERVICE;
    object gencost
    {
        model POLYNOMIAL;
        startup 0.0 $;
        shutdown 0.0 $;
        costs "0.0,0.0,0.0";
    };
}
object pypower.powerplant
{
    // WOODLAND: cap=66.3, cf=0.039, units=1
    name "wecc240_psse_G_3907_CC";
    parent "wecc240_psse_G_3907";
    latitude 38.02;
    longitude -121.0;
    generator CC;
    operating_capacity 66.3 MW;
    startup_cost 35.0;
    shutdown_cost 0.0;
    fixed_cost 500.0;
    variable_cost 50.0;
    scarcity_cost 0.001;
}

object pypower.powerplant
{
    // ALMOND_POWER_PLANT: cap=223.5, cf=0.131, units=1
    // MCCLURE: cap=71.2, cf=0.042, units=1
    // WOODLAND: cap=66.3, cf=0.039, units=1
    name "wecc240_psse_G_3907_CT";
    parent "wecc240_psse_G_3907";
    latitude 38.02;
    longitude -121.0;
    generator CT;
    operating_capacity 361.0 MW;
    startup_cost 25.0;
    shutdown_cost 0.0;
    fixed_cost 350.0;
    variable_cost 75.0;
    scarcity_cost 0.001;
}

object pypower.powerplant
{
    // BEARDSLEY: cap=10.0, cf=0.006, units=1
    // COLLIERVILLE_POWERHOUSE: cap=253.0, cf=0.148, units=1
    // DONNELLS: cap=72.0, cf=0.042, units=1
    // DON_PEDRO: cap=170.8, cf=0.1, units=1
    // MOCCASIN: cap=100.0, cf=0.058, units=1
    // NEW_MELONES: cap=300.0, cf=0.175, units=1
    // SAND_BAR_POWER_PLANT: cap=16.2, cf=0.009, units=1
    // STANISLAUS: cap=81.9, cf=0.048, units=1
    // TULLOCH: cap=24.2, cf=0.014, units=1
    name "wecc240_psse_G_3907_HT";
    parent "wecc240_psse_G_3907";
    latitude 38.02;
    longitude -121.0;
    generator HT;
    operating_capacity 1028.1 MW;
    startup_cost 0.0;
    shutdown_cost 0.0;
    fixed_cost 200.0;
    variable_cost 0.0;
    scarcity_cost 0.001;
}

object pypower.powerplant
{
    // WOODLAND: cap=66.3, cf=0.039, units=1
    name "wecc240_psse_G_3907_IC";
    parent "wecc240_psse_G_3907";
    latitude 38.02;
    longitude -121.0;
    generator IC;
    operating_capacity 66.3 MW;
    startup_cost 0.0;
    shutdown_cost 0.0;
    fixed_cost 0.0;
    variable_cost 50.0;
    scarcity_cost 0.001;
}

object pypower.powerplant
{
    // Axium Modesto Solar: cap=25.8, cf=0.0, units=1
    // Central 40: cap=40.0, cf=0.0, units=1
    // Frontier Solar, LLC: cap=20.0, cf=0.0, units=1
    // Robert O Schulz Solar Farm: cap=1.3, cf=0.0, units=1
    // Sierra Pacific Chinese Camp: cap=3.6, cf=0.0, units=1
    // Sonora 1: cap=1.5, cf=0.0, units=1
    name "wecc240_psse_G_3907_PV";
    parent "wecc240_psse_G_3907";
    latitude 38.02;
    longitude -121.0;
    generator PV;
    operating_capacity 92.2 MW;
    startup_cost 0.0;
    shutdown_cost 0.0;
    fixed_cost 0.0;
    variable_cost 0.0;
    scarcity_cost 0.0;
}

object pypower.powerplant
{
    // MCCLURE: cap=71.2, cf=0.042, units=1
    // PACIFIC-ULTRAPOWER_CHINESE_STATION: cap=25.0, cf=0.015, units=1
    name "wecc240_psse_G_3907_ST";
    parent "wecc240_psse_G_3907";
    latitude 38.02;
    longitude -121.0;
    generator ST;
    operating_capacity 96.2 MW;
    startup_cost 6500.0;
    shutdown_cost 0.0;
    fixed_cost 1000.0;
    variable_cost 5.0;
    scarcity_cost 0.001;
}

object pypower.gen
{
    name "wecc240_psse_G_3908";
    parent "wecc240_psse_N_3908";
    Pmax 883.5 MW;
    Qmax 176.7 MW;
    Qmin -176.7 MW;
    status IN_SERVICE;
    object gencost
    {
        model POLYNOMIAL;
        startup 0.0 $;
        shutdown 0.0 $;
        costs "0.0,0.0,0.0";
    };
}
object pypower.powerplant
{
    // CARSON_ICE-GEN_PROJECT: cap=62.8, cf=0.071, units=1
    // SCA_COGEN_2: cap=96.7, cf=0.109, units=1
    // SPA_COGEN_3: cap=173.9, cf=0.197, units=1
    name "wecc240_psse_G_3908_CC";
    parent "wecc240_psse_G_3908";
    latitude 38.55;
    longitude -121.4;
    generator CC;
    operating_capacity 333.4 MW;
    startup_cost 35.0;
    shutdown_cost 0.0;
    fixed_cost 500.0;
    variable_cost 50.0;
    scarcity_cost 0.001;
}

object pypower.powerplant
{
    // CARSON_ICE-GEN_PROJECT: cap=62.8, cf=0.071, units=1
    // MCCLELLAN_CA: cap=77.0, cf=0.087, units=1
    // SCA_COGEN_2: cap=96.7, cf=0.109, units=1
    name "wecc240_psse_G_3908_CT";
    parent "wecc240_psse_G_3908";
    latitude 38.55;
    longitude -121.4;
    generator CT;
    operating_capacity 236.5 MW;
    startup_cost 25.0;
    shutdown_cost 0.0;
    fixed_cost 350.0;
    variable_cost 75.0;
    scarcity_cost 0.001;
}

object pypower.powerplant
{
    // Aerojet I: cap=3.0, cf=0.0, units=1
    // Aerojet II: cap=2.7, cf=0.0, units=1
    // Depot Park Solar System: cap=3.0, cf=0.0, units=1
    // FAA NorCal TRACON: cap=1.0, cf=0.0, units=1
    // Green Acres Solar Facility 1: cap=2.8, cf=0.0, units=1
    // Green Acres Solar Facility 2: cap=0.9, cf=0.0, units=1
    // Intel Folsom: cap=1.0, cf=0.0, units=1
    // RE Bruceville 1, LLC: cap=5.0, cf=0.0, units=1
    // RE Dillard 1, LLC: cap=3.0, cf=0.0, units=1
    // RE Dillard 2, LLC: cap=3.0, cf=0.0, units=1
    // RE Dillard 3, LLC: cap=3.0, cf=0.0, units=1
    // RE Kammerer 1, LLC: cap=5.0, cf=0.0, units=1
    // RE McKenzie 1, LLC: cap=30.0, cf=0.0, units=1
    // RE McKenzie 2, LLC: cap=5.0, cf=0.0, units=1
    // RE McKenzie 3, LLC: cap=5.0, cf=0.0, units=1
    // RE McKenzie 4, LLC: cap=5.0, cf=0.0, units=1
    // RE McKenzie 5, LLC: cap=5.0, cf=0.0, units=1
    // RE McKenzie 6, LLC: cap=5.0, cf=0.0, units=1
    // Rancho Seco Solar II, LLC: cap=160.0, cf=0.0, units=1
    // Rancho Seco Solar, LLC: cap=10.88, cf=0.0, units=1
    // SCDA Solar 1: cap=6.8, cf=0.0, units=1
    // SMUD at Fleshman: cap=2.9, cf=0.0, units=1
    // SMUD at Grundman: cap=18.0, cf=0.0, units=1
    // SMUD at Lawrence: cap=1.0, cf=0.0, units=1
    // SMUD at Van Conett: cap=2.9, cf=0.0, units=1
    // Sacramento (SMUD): cap=1.5, cf=0.0, units=1
    // Sacramento Fairbain Water Treatment Plant: cap=1.0, cf=0.0, units=1
    // Sacramento Regional County Sanitation PV: cap=3.5, cf=0.0, units=1
    // Sacramento Soleil, LLC: cap=1.0, cf=0.0, units=1
    // Solar Star California II, LLC: cap=2.0, cf=0.0, units=1
    // Wildflower Solar 1: cap=13.7, cf=0.0, units=1
    name "wecc240_psse_G_3908_PV";
    parent "wecc240_psse_G_3908";
    latitude 38.55;
    longitude -121.4;
    generator PV;
    operating_capacity 313.58 MW;
    startup_cost 0.0;
    shutdown_cost 0.0;
    fixed_cost 0.0;
    variable_cost 0.0;
    scarcity_cost 0.0;
}

object pypower.gen
{
    name "wecc240_psse_G_8004";
    parent "wecc240_psse_N_8004";
    Pmax 774.7 MW;
    Qmax 154.9 MW;
    Qmin -154.9 MW;
    status IN_SERVICE;
    object gencost
    {
        model POLYNOMIAL;
        startup 0.0 $;
        shutdown 0.0 $;
        costs "0.0,0.0,0.0";
    };
}
object pypower.powerplant
{
    // COSUMNES: cap=530.0, cf=0.684, units=1
    name "wecc240_psse_G_8004_CC";
    parent "wecc240_psse_G_8004";
    latitude 38.35;
    longitude -121.1;
    generator CC;
    operating_capacity 530.0 MW;
    startup_cost 35.0;
    shutdown_cost 0.0;
    fixed_cost 500.0;
    variable_cost 50.0;
    scarcity_cost 0.001;
}

object pypower.powerplant
{
    // CAMANCHE: cap=10.8, cf=0.014, units=1
    // ELECTRA: cap=102.5, cf=0.132, units=1
    // PARDEE: cap=23.6, cf=0.03, units=1
    // SALT_SPRINGS: cap=42.0, cf=0.054, units=1
    // TIGER_CREEK: cap=52.2, cf=0.067, units=1
    // WEST_POINT_PH: cap=13.6, cf=0.018, units=1
    name "wecc240_psse_G_8004_HT";
    parent "wecc240_psse_G_8004";
    latitude 38.35;
    longitude -121.1;
    generator HT;
    operating_capacity 244.7 MW;
    startup_cost 0.0;
    shutdown_cost 0.0;
    fixed_cost 200.0;
    variable_cost 0.0;
    scarcity_cost 0.001;
}

object pypower.gen
{
    name "wecc240_psse_G_3913";
    parent "wecc240_psse_N_3913";
    Pmax 1140.6 MW;
    Qmax 228.1 MW;
    Qmin -228.1 MW;
    status IN_SERVICE;
    object gencost
    {
        model POLYNOMIAL;
        startup 0.0 $;
        shutdown 0.0 $;
        costs "0.0,0.0,0.0";
    };
}
object pypower.powerplant
{
    // CAMINO: cap=157.8, cf=0.138, units=1
    // EL_DORADO: cap=20.0, cf=0.018, units=1
    // FOLSOM: cap=198.6, cf=0.174, units=1
    // HALSEY: cap=13.6, cf=0.012, units=1
    // JAYBIRD: cap=161.6, cf=0.142, units=1
    // JONES_FORK: cap=10.0, cf=0.009, units=1
    // MIDDLE_FORK: cap=122.4, cf=0.107, units=1
    // NEWCASTLE: cap=12.7, cf=0.011, units=1
    // NIMBUS: cap=13.4, cf=0.012, units=1
    // RALSTON: cap=79.2, cf=0.069, units=1
    // ROBBS_PEAK: cap=25.5, cf=0.022, units=1
    // UNION_VALLEY: cap=38.6, cf=0.034, units=1
    // WHITE_ROCK_SLAB_CREEK: cap=266.5, cf=0.234, units=1
    // WISE: cap=16.4, cf=0.014, units=1
    name "wecc240_psse_G_3913_HT";
    parent "wecc240_psse_G_3913";
    latitude 38.66;
    longitude -121.1;
    generator HT;
    operating_capacity 1136.3 MW;
    startup_cost 0.0;
    shutdown_cost 0.0;
    fixed_cost 200.0;
    variable_cost 0.0;
    scarcity_cost 0.001;
}

object pypower.powerplant
{
    // Deer Creek 2: cap=1.3, cf=0.0, units=1
    // El Dorado County: cap=1.5, cf=0.0, units=1
    // El Dorado Solar, LLC: cap=1.5, cf=0.0, units=1
    name "wecc240_psse_G_3913_PV";
    parent "wecc240_psse_G_3913";
    latitude 38.66;
    longitude -121.1;
    generator PV;
    operating_capacity 4.3 MW;
    startup_cost 0.0;
    shutdown_cost 0.0;
    fixed_cost 0.0;
    variable_cost 0.0;
    scarcity_cost 0.0;
}

object pypower.gen
{
    name "wecc240_psse_G_3910";
    parent "wecc240_psse_N_3910";
    Pmax 28.6 MW;
    Qmax 5.7 MW;
    Qmin -5.7 MW;
    status IN_SERVICE;
    object gencost
    {
        model POLYNOMIAL;
        startup 0.0 $;
        shutdown 0.0 $;
        costs "0.0,0.0,0.0";
    };
}
object pypower.powerplant
{
    // WADHAM_ENERGY_LP: cap=28.6, cf=1.0, units=1
    name "wecc240_psse_G_3910_ST";
    parent "wecc240_psse_G_3910";
    latitude 39.02;
    longitude -122.3;
    generator ST;
    operating_capacity 28.6 MW;
    startup_cost 6500.0;
    shutdown_cost 0.0;
    fixed_cost 1000.0;
    variable_cost 5.0;
    scarcity_cost 0.001;
}

object pypower.gen
{
    name "wecc240_psse_G_3405";
    parent "wecc240_psse_N_3405";
    Pmax 808.6 MW;
    Qmax 161.7 MW;
    Qmin -161.7 MW;
    status IN_SERVICE;
    object gencost
    {
        model POLYNOMIAL;
        startup 0.0 $;
        shutdown 0.0 $;
        costs "0.0,0.0,0.0";
    };
}
object pypower.powerplant
{
    // SUTTER_ENERGY_CENTER: cap=636.0, cf=0.787, units=1
    name "wecc240_psse_G_3405_CC";
    parent "wecc240_psse_G_3405";
    latitude 38.98;
    longitude -121.6;
    generator CC;
    operating_capacity 636.0 MW;
    startup_cost 35.0;
    shutdown_cost 0.0;
    fixed_cost 500.0;
    variable_cost 50.0;
    scarcity_cost 0.001;
}
object pypower.powerplant
{
    // FEATHER_RIVER_ENERGY_CENTER: cap=47.0, cf=0.058, units=1
    // YUBA_CITY_COGEN_PARTNERS: cap=49.0, cf=0.061, units=1
    // YUBA_CITY_ENERGY_CENTER: cap=47.3, cf=0.058, units=1
    name "wecc240_psse_G_3405_CT";
    parent "wecc240_psse_G_3405";
    latitude 38.98;
    longitude -121.6;
    generator CT;
    operating_capacity 143.3 MW;
    startup_cost 25.0;
    shutdown_cost 0.0;
    fixed_cost 350.0;
    variable_cost 75.0;
    scarcity_cost 0.001;
}

object pypower.powerplant
{
    // 2127 Harris Solar Project: cap=1.3, cf=0.0, units=1
    name "wecc240_psse_G_3405_PV";
    parent "wecc240_psse_G_3405";
    latitude 38.98;
    longitude -121.6;
    generator PV;
    operating_capacity 1.3 MW;
    startup_cost 0.0;
    shutdown_cost 0.0;
    fixed_cost 0.0;
    variable_cost 0.0;
    scarcity_cost 0.0;
}

object pypower.powerplant
{
    // WOODLAND_BIOMASS_POWER_LTD: cap=28.0, cf=0.035, units=1
    name "wecc240_psse_G_3405_ST";
    parent "wecc240_psse_G_3405";
    latitude 38.98;
    longitude -121.6;
    generator ST;
    operating_capacity 28.0 MW;
    startup_cost 6500.0;
    shutdown_cost 0.0;
    fixed_cost 1000.0;
    variable_cost 5.0;
    scarcity_cost 0.001;
}

object pypower.gen
{
    name "wecc240_psse_G_3920";
    parent "wecc240_psse_N_3920";
    Pmax 211.1 MW;
    Qmax 42.2 MW;
    Qmin -42.2 MW;
    status IN_SERVICE;
    object gencost
    {
        model POLYNOMIAL;
        startup 0.0 $;
        shutdown 0.0 $;
        costs "0.0,0.0,0.0";
    };
}
object pypower.powerplant
{
    // ROSEVILLE_ENERGY_PARK: cap=164.0, cf=0.777, units=1
    name "wecc240_psse_G_3920_CC";
    parent "wecc240_psse_G_3920";
    latitude 38.94;
    longitude -121.5;
    generator CC;
    operating_capacity 164.0 MW;
    startup_cost 35.0;
    shutdown_cost 0.0;
    fixed_cost 500.0;
    variable_cost 50.0;
    scarcity_cost 0.001;
}

object pypower.powerplant
{
    // RIO_BRAVO_ROCKLIN: cap=27.9, cf=0.132, units=1
    // SIERRA_PACIFIC_LINCOLN_FACILITY: cap=19.2, cf=0.091, units=1
    name "wecc240_psse_G_3920_ST";
    parent "wecc240_psse_G_3920";
    latitude 38.94;
    longitude -121.5;
    generator ST;
    operating_capacity 47.1 MW;
    startup_cost 6500.0;
    shutdown_cost 0.0;
    fixed_cost 1000.0;
    variable_cost 5.0;
    scarcity_cost 0.001;
}

object pypower.gen
{
    name "wecc240_psse_G_3909";
    parent "wecc240_psse_N_3909";
    Pmax 678.2 MW;
    Qmax 135.6 MW;
    Qmin -135.6 MW;
    status IN_SERVICE;
    object gencost
    {
        model POLYNOMIAL;
        startup 0.0 $;
        shutdown 0.0 $;
        costs "0.0,0.0,0.0";
    };
}
object pypower.powerplant
{
    // CHICAGO_PARK: cap=44.0, cf=0.065, units=1
    // COLGATE: cap=315.0, cf=0.464, units=1
    // DRUM_1: cap=49.2, cf=0.073, units=1
    // DRUM_2: cap=53.1, cf=0.078, units=1
    // DUTCH_FLAT: cap=22.0, cf=0.032, units=1
    // DUTCH_FLAT_2: cap=27.3, cf=0.04, units=1
    // NARROWS_2: cap=46.7, cf=0.069, units=1
    // NARROWS_PH: cap=10.2, cf=0.015, units=1
    // ROLLINS: cap=12.1, cf=0.018, units=1
    // SLY_CREEK: cap=12.1, cf=0.018, units=1
    // WOODLEAF: cap=59.0, cf=0.087, units=1
    name "wecc240_psse_G_3909_HT";
    parent "wecc240_psse_G_3909";
    latitude 39.26;
    longitude -121.3;
    generator HT;
    operating_capacity 650.7 MW;
    startup_cost 0.0;
    shutdown_cost 0.0;
    fixed_cost 200.0;
    variable_cost 0.0;
    scarcity_cost 0.001;
}

object pypower.powerplant
{
    // SIERRA_PACIFIC_QUINCY_FACILITY: cap=27.5, cf=0.041, units=1
    name "wecc240_psse_G_3909_ST";
    parent "wecc240_psse_G_3909";
    latitude 39.26;
    longitude -121.3;
    generator ST;
    operating_capacity 27.5 MW;
    startup_cost 6500.0;
    shutdown_cost 0.0;
    fixed_cost 1000.0;
    variable_cost 5.0;
    scarcity_cost 0.001;
}

object pypower.gen
{
    name "wecc240_psse_G_3404";
    parent "wecc240_psse_N_3404";
    Pmax 694.7 MW;
    Qmax 138.9 MW;
    Qmin -138.9 MW;
    status IN_SERVICE;
    object gencost
    {
        model POLYNOMIAL;
        startup 0.0 $;
        shutdown 0.0 $;
        costs "0.0,0.0,0.0";
    };
}
object pypower.powerplant
{
    // CALPEAK_POWER_PANOCHE_PEAKER_PLANT: cap=60.5, cf=0.087, units=1
    // MIDWAY_PEAKING_LLC: cap=139.8, cf=0.201, units=1
    // PANOCHE_ENERGY_CENTER: cap=432.0, cf=0.622, units=1
    // PANOCHE_PEAKER: cap=49.9, cf=0.072, units=1
    name "wecc240_psse_G_3404_CT";
    parent "wecc240_psse_G_3404";
    latitude 36.68;
    longitude -120.5;
    generator CT;
    operating_capacity 682.2 MW;
    startup_cost 25.0;
    shutdown_cost 0.0;
    fixed_cost 350.0;
    variable_cost 75.0;
    scarcity_cost 0.001;
}

object pypower.powerplant
{
    // EL_NIDO_FACILITY: cap=12.5, cf=0.018, units=1
    name "wecc240_psse_G_3404_ST";
    parent "wecc240_psse_G_3404";
    latitude 36.68;
    longitude -120.5;
    generator ST;
    operating_capacity 12.5 MW;
    startup_cost 6500.0;
    shutdown_cost 0.0;
    fixed_cost 1000.0;
    variable_cost 5.0;
    scarcity_cost 0.001;
}

object pypower.gen
{
    name "wecc240_psse_G_3401";
    parent "wecc240_psse_N_3401";
    Pmax 2026.4 MW;
    Qmax 405.3 MW;
    Qmin -405.3 MW;
    status IN_SERVICE;
    object gencost
    {
        model POLYNOMIAL;
        startup 0.0 $;
        shutdown 0.0 $;
        costs "0.0,0.0,0.0";
    };
}
object pypower.powerplant
{
    // FRESNO_COGEN_PARTNERS: cap=41.3, cf=0.02, units=1
    name "wecc240_psse_G_3401_CC";
    parent "wecc240_psse_G_3401";
    latitude 36.85;
    longitude -119.9;
    generator CC;
    operating_capacity 41.3 MW;
    startup_cost 35.0;
    shutdown_cost 0.0;
    fixed_cost 500.0;
    variable_cost 50.0;
    scarcity_cost 0.001;
}

object pypower.powerplant
{
    // FRESNO_COGEN_PARTNERS: cap=41.3, cf=0.02, units=1
    name "wecc240_psse_G_3401_CT";
    parent "wecc240_psse_G_3401";
    latitude 36.85;
    longitude -119.9;
    generator CT;
    operating_capacity 41.3 MW;
    startup_cost 25.0;
    shutdown_cost 0.0;
    fixed_cost 350.0;
    variable_cost 75.0;
    scarcity_cost 0.001;
}

object pypower.powerplant
{
    // A_G_WISHON: cap=12.8, cf=0.006, units=1
    // BIG_CREEK_4: cap=100.0, cf=0.049, units=1
    // DION_R_HOLM: cap=156.8, cf=0.077, units=1
    // EXCHEQUER: cap=94.5, cf=0.047, units=1
    // FRIANT_HYDRO_FACILITY: cap=30.6, cf=0.015, units=1
    // KERCKHOFF_2: cap=139.5, cf=0.069, units=1
    // R_C_KIRKWOOD: cap=115.5, cf=0.057, units=1
    name "wecc240_psse_G_3401_HT";
    parent "wecc240_psse_G_3401";
    latitude 36.85;
    longitude -119.9;
    generator HT;
    operating_capacity 649.7 MW;
    startup_cost 0.0;
    shutdown_cost 0.0;
    fixed_cost 200.0;
    variable_cost 0.0;
    scarcity_cost 0.001;
}

object pypower.powerplant
{
    // CHOWCHILLA_II: cap=49.6, cf=0.024, units=1
    name "wecc240_psse_G_3401_IC";
    parent "wecc240_psse_G_3401";
    latitude 36.85;
    longitude -119.9;
    generator IC;
    operating_capacity 49.6 MW;
    startup_cost 0.0;
    shutdown_cost 0.0;
    fixed_cost 0.0;
    variable_cost 50.0;
    scarcity_cost 0.001;
}

object pypower.powerplant
{
    // 2081 Terzian Solar Project: cap=1.2, cf=0.0, units=1
    // Adera Solar: cap=20.0, cf=0.0, units=1
    // Aspiration G: cap=9.0, cf=0.0, units=1
    // Borden Solar Farm: cap=50.0, cf=0.0, units=1
    // CA - Fresno County - Juvenile Hall: cap=2.8, cf=0.0, units=1
    // CA - Madera USD - Madera South HS: cap=1.2, cf=0.0, units=1
    // CDCR (CA)-Pleasant Valley State Prison: cap=1.2, cf=0.0, units=1
    // CalRenew-1: cap=5.0, cf=0.0, units=1
    // Cantua Solar Station: cap=20.0, cf=0.0, units=1
    // Citizen B: cap=5.0, cf=0.0, units=1
    // City of Madera WWTP: cap=1.0, cf=0.0, units=1
    // DGS Valley State Prison: cap=2.3, cf=0.0, units=1
    // DSH (CA)-Coalinga State Hospital: cap=2.6, cf=0.0, units=1
    // Fifth Standard Solar PV, LLC (Hybrid): cap=150.0, cf=0.0, units=1
    // Firebaugh-CCS-PV-1: cap=1.0, cf=0.0, units=1
    // Five H Farms Solar Array: cap=1.1, cf=0.0, units=1
    // Five Points Solar Park: cap=60.0, cf=0.0, units=1
    // Five Points Solar Station: cap=15.0, cf=0.0, units=1
    // Fresno Solar: cap=3.0, cf=0.0, units=1
    // Gap Pacific Distribution Center: cap=1.2, cf=0.0, units=1
    // Gates Solar Station: cap=20.0, cf=0.0, units=1
    // Giffen: cap=10.0, cf=0.0, units=1
    // Giffen Solar Park: cap=20.0, cf=0.0, units=1
    // Great Valley Solar Portfolio Holdings, LLC: cap=200.0, cf=0.0, units=1
    // Huron Solar Station: cap=20.0, cf=0.0, units=1
    // La Joya Del Sol: cap=1.5, cf=0.0, units=1
    // Little Bear 3: cap=20.0, cf=0.0, units=1
    // Little Bear 4: cap=50.0, cf=0.0, units=1
    // Little Bear 5: cap=50.0, cf=0.0, units=1
    // Little Bear Solar 1, LLC: cap=40.0, cf=0.0, units=1
    // Madera 1 PV: cap=1.5, cf=0.0, units=1
    // Madera Community Hospital: cap=1.0, cf=0.0, units=1
    // Moonlight Packing-Phase 2: cap=1.4, cf=0.0, units=1
    // National Raisin: cap=2.5, cf=0.0, units=1
    // NextEra Westside PV: cap=20.0, cf=0.0, units=1
    // North Star Solar: cap=62.5, cf=0.0, units=1
    // Oro Loma: cap=20.0, cf=0.0, units=1
    // Pacific Ethanol Madera Solar Array: cap=3.9, cf=0.0, units=1
    // RE Adams East, LLC: cap=19.0, cf=0.0, units=1
    // RE Tranquillity: cap=205.3, cf=0.0, units=1
    // San Joaquin Solar: cap=18.5, cf=0.0, units=1
    // Sealed Air Madera Solar Project: cap=3.0, cf=0.0, units=1
    // Stroud Solar Station: cap=20.0, cf=0.0, units=1
    // Tranquillity ID: cap=1.3, cf=0.0, units=1
    // West Gates Solar Station: cap=10.0, cf=0.0, units=1
    // Westlands Solar PV Farm: cap=18.0, cf=0.0, units=1
    // Westside Solar Station: cap=15.0, cf=0.0, units=1
    // Whitney Point Solar: cap=20.0, cf=0.0, units=1
    // Wonderful Orchards-New Columbia: cap=5.0, cf=0.0, units=1
    name "wecc240_psse_G_3401_PV";
    parent "wecc240_psse_G_3401";
    latitude 36.85;
    longitude -119.9;
    generator PV;
    operating_capacity 1232.0 MW;
    startup_cost 0.0;
    shutdown_cost 0.0;
    fixed_cost 0.0;
    variable_cost 0.0;
    scarcity_cost 0.0;
}

object pypower.powerplant
{
    // AMPERSAND_CHOWCHILLA_BIOMASS_LLC: cap=12.5, cf=0.006, units=1
    name "wecc240_psse_G_3401_ST";
    parent "wecc240_psse_G_3401";
    latitude 36.85;
    longitude -119.9;
    generator ST;
    operating_capacity 12.5 MW;
    startup_cost 6500.0;
    shutdown_cost 0.0;
    fixed_cost 1000.0;
    variable_cost 5.0;
    scarcity_cost 0.001;
}

object pypower.gen
{
    name "wecc240_psse_G_3403";
    parent "wecc240_psse_N_3403";
    Pmax 1939.1 MW;
    Qmax 387.8 MW;
    Qmin -387.8 MW;
    status IN_SERVICE;
    object gencost
    {
        model POLYNOMIAL;
        startup 0.0 $;
        shutdown 0.0 $;
        costs "0.0,0.0,0.0";
    };
}
object pypower.powerplant
{
    // ALGONQUIN_POWER_SANGER_LLC: cap=61.5, cf=0.032, units=1
    // KINGSBURG_COGEN: cap=36.2, cf=0.019, units=1
    name "wecc240_psse_G_3403_CC";
    parent "wecc240_psse_G_3403";
    latitude 36.61;
    longitude -119.6;
    generator CC;
    operating_capacity 97.7 MW;
    startup_cost 35.0;
    shutdown_cost 0.0;
    fixed_cost 500.0;
    variable_cost 50.0;
    scarcity_cost 0.001;
}

object pypower.powerplant
{
    // HANFORD_ENERGY_PARK_PEAKER: cap=92.2, cf=0.048, units=1
    // KINGS_RIVER: cap=121.0, cf=0.062, units=1
    name "wecc240_psse_G_3403_CT";
    parent "wecc240_psse_G_3403";
    latitude 36.61;
    longitude -119.6;
    generator CT;
    operating_capacity 213.2 MW;
    startup_cost 25.0;
    shutdown_cost 0.0;
    fixed_cost 350.0;
    variable_cost 75.0;
    scarcity_cost 0.001;
}

object pypower.powerplant
{
    // PINE_FLAT: cap=165.0, cf=0.085, units=1
    name "wecc240_psse_G_3403_HT";
    parent "wecc240_psse_G_3403";
    latitude 36.61;
    longitude -119.6;
    generator HT;
    operating_capacity 165.0 MW;
    startup_cost 0.0;
    shutdown_cost 0.0;
    fixed_cost 200.0;
    variable_cost 0.0;
    scarcity_cost 0.001;
}

object pypower.powerplant
{
    // Almond: cap=19.9, cf=0.0, units=1
    // Alpaugh 50: cap=50.0, cf=0.0, units=1
    // Alpaugh North: cap=20.0, cf=0.0, units=1
    // American Kings Solar, LLC: cap=128.0, cf=0.0, units=1
    // Aquamarine: cap=250.0, cf=0.0, units=1
    // Atwell Island: cap=20.2, cf=0.0, units=1
    // Atwell Island West Solar: cap=20.02, cf=0.0, units=1
    // Avenal Park: cap=6.0, cf=0.0, units=1
    // CDCR (CA)-Corcoran State Prison: cap=5.0, cf=0.0, units=1
    // CED Avenal: cap=15.8, cf=0.0, units=1
    // CED Ducor 1: cap=20.0, cf=0.0, units=1
    // CED Ducor 2: cap=20.0, cf=0.0, units=1
    // CED Ducor 3: cap=15.0, cf=0.0, units=1
    // CED Ducor 4: cap=20.0, cf=0.0, units=1
    // CID Solar (CA): cap=2.0, cf=0.0, units=1
    // CID Solar, LLC: cap=19.76, cf=0.0, units=1
    // Castle Rock Vineyards: cap=1.0, cf=0.0, units=1
    // City of Tulare Water Facility: cap=1.1, cf=0.0, units=1
    // Corcoran Solar: cap=20.0, cf=0.0, units=1
    // Corcoran Solar 2: cap=19.75, cf=0.0, units=1
    // Corcoran Solar 3: cap=21.19, cf=0.0, units=1
    // Cottonwood Solar, LLC (City of Corcoran): cap=12.0, cf=0.0, units=1
    // Dinuba Wastewater Treatment Plant: cap=1.0, cf=0.0, units=1
    // Dover Dairy: cap=1.1, cf=0.0, units=1
    // Exeter Solar: cap=3.5, cf=0.0, units=1
    // FTF-PackingShed: cap=1.0, cf=0.0, units=1
    // Farmersville: cap=4.5, cf=0.0, units=1
    // Guernsey Solar Station: cap=20.0, cf=0.0, units=1
    // Hanford 1 and 2: cap=3.0, cf=0.0, units=1
    // Henrietta Solar Project: cap=102.0, cf=0.0, units=1
    // Ivanhoe Solar: cap=3.5, cf=0.0, units=1
    // Java Solar, LLC: cap=13.5, cf=0.0, units=1
    // Kettleman Solar-Centaurus: cap=20.0, cf=0.0, units=1
    // Kingsburg Solar: cap=3.7, cf=0.0, units=1
    // Lemoore 1: cap=1.5, cf=0.0, units=1
    // Lindsay Solar: cap=4.0, cf=0.0, units=1
    // Luciana: cap=55.8, cf=0.0, units=1
    // Mustang Two: cap=150.0, cf=0.0, units=1
    // Nicolis Solar PV Plant: cap=20.0, cf=0.0, units=1
    // Porterville 6 and 7: cap=3.0, cf=0.0, units=1
    // Porterville Solar: cap=3.5, cf=0.0, units=1
    // RE Kansas Solar, LLC: cap=20.0, cf=0.0, units=1
    // RE Kansas South, LLC: cap=20.0, cf=0.0, units=1
    // RE Kent South, LLC: cap=19.41, cf=0.0, units=1
    // RE Mustang, LLC: cap=100.0, cf=0.0, units=1
    // RE-VFO, LLC: cap=1.0, cf=0.0, units=1
    // Sand Drag, LLC: cap=19.0, cf=0.0, units=1
    // Slate Hybrid: cap=50.5, cf=0.0, units=1
    // Solar Photovoltaic Project #42: cap=5.0, cf=0.0, units=1
    // Sun City Project, LLC: cap=20.0, cf=0.0, units=1
    // Tropico Solar PV Plant: cap=14.0, cf=0.0, units=1
    // Tulare 1 and 2: cap=3.0, cf=0.0, units=1
    // Westside Solar Power PV1: cap=2.0, cf=0.0, units=1
    // White River Solar: cap=20.0, cf=0.0, units=1
    // White River Solar 2: cap=20.0, cf=0.0, units=1
    name "wecc240_psse_G_3403_PV";
    parent "wecc240_psse_G_3403";
    latitude 36.61;
    longitude -119.6;
    generator PV;
    operating_capacity 1435.23 MW;
    startup_cost 0.0;
    shutdown_cost 0.0;
    fixed_cost 0.0;
    variable_cost 0.0;
    scarcity_cost 0.0;
}

object pypower.powerplant
{
    // RIO_BRAVO_FRESNO: cap=28.0, cf=0.014, units=1
    name "wecc240_psse_G_3403_ST";
    parent "wecc240_psse_G_3403";
    latitude 36.61;
    longitude -119.6;
    generator ST;
    operating_capacity 28.0 MW;
    startup_cost 6500.0;
    shutdown_cost 0.0;
    fixed_cost 1000.0;
    variable_cost 5.0;
    scarcity_cost 0.001;
}

object pypower.gen
{
    name "wecc240_psse_G_3402";
    parent "wecc240_psse_N_3402";
    Pmax 1846.7 MW;
    Qmax 369.3 MW;
    Qmin -369.3 MW;
    status IN_SERVICE;
    object gencost
    {
        model POLYNOMIAL;
        startup 0.0 $;
        shutdown 0.0 $;
        costs "0.0,0.0,0.0";
    };
}
object pypower.powerplant
{
    // BALCH_1: cap=31.0, cf=0.017, units=1
    // BALCH_2: cap=97.2, cf=0.053, units=1
    // BIG_CREEK_1: cap=88.4, cf=0.048, units=1
    // BIG_CREEK_3: cap=174.5, cf=0.094, units=1
    // CONTROL_GORGE: cap=37.5, cf=0.02, units=1
    // HAAS: cap=135.0, cf=0.073, units=1
    // HELMS_PUMPED_STORAGE: cap=1053.0, cf=0.57, units=1
    // KINGS_RIVER_PH: cap=48.6, cf=0.026, units=1
    // MIDDLE_GORGE: cap=37.5, cf=0.02, units=1
    // POOLE: cap=11.3, cf=0.006, units=1
    // RUSH_CREEK: cap=13.1, cf=0.007, units=1
    // TERMINUS_HYDROELECTRIC_PROJECT: cap=20.1, cf=0.011, units=1
    // UPPER_GORGE: cap=37.5, cf=0.02, units=1
    name "wecc240_psse_G_3402_HT";
    parent "wecc240_psse_G_3402";
    latitude 37.04;
    longitude -118.9;
    generator HT;
    operating_capacity 1784.7 MW;
    startup_cost 0.0;
    shutdown_cost 0.0;
    fixed_cost 200.0;
    variable_cost 0.0;
    scarcity_cost 0.001;
}

object pypower.powerplant
{
    // Munro Valley Solar: cap=4.0, cf=0.0, units=1
    // Owens Valley Solar Project 11: cap=1.0, cf=0.0, units=1
    // Trona Solar III: cap=2.0, cf=0.0, units=1
    name "wecc240_psse_G_3402_PV";
    parent "wecc240_psse_G_3402";
    latitude 37.04;
    longitude -118.9;
    generator PV;
    operating_capacity 7.0 MW;
    startup_cost 0.0;
    shutdown_cost 0.0;
    fixed_cost 0.0;
    variable_cost 0.0;
    scarcity_cost 0.0;
}

object pypower.powerplant
{
    // MAMMOTH_PACIFIC_I: cap=10.0, cf=0.005, units=1
    // MAMMOTH_PACIFIC_II: cap=30.0, cf=0.016, units=1
    // PLES_I: cap=15.0, cf=0.008, units=1
    name "wecc240_psse_G_3402_ST";
    parent "wecc240_psse_G_3402";
    latitude 37.04;
    longitude -118.9;
    generator ST;
    operating_capacity 55.0 MW;
    startup_cost 6500.0;
    shutdown_cost 0.0;
    fixed_cost 1000.0;
    variable_cost 5.0;
    scarcity_cost 0.001;
}

object pypower.gen
{
    name "wecc240_psse_G_2501";
    parent "wecc240_psse_N_2501";
    Pmax 259.5 MW;
    Qmax 51.9 MW;
    Qmin -51.9 MW;
    status IN_SERVICE;
    object gencost
    {
        model POLYNOMIAL;
        startup 0.0 $;
        shutdown 0.0 $;
        costs "0.0,0.0,0.0";
    };
}
object pypower.powerplant
{
    // BOWERMAN_POWER_LFG_LLC: cap=23.8, cf=0.092, units=1
    // BREA_EXPANSION_PLANT: cap=35.7, cf=0.138, units=1
    // CANYON_POWER_PLANT: cap=200.0, cf=0.771, units=1
    name "wecc240_psse_G_2501_CT";
    parent "wecc240_psse_G_2501";
    latitude 33.83;
    longitude -117.8;
    generator CT;
    operating_capacity 259.5 MW;
    startup_cost 25.0;
    shutdown_cost 0.0;
    fixed_cost 350.0;
    variable_cost 75.0;
    scarcity_cost 0.001;
}

object pypower.gen
{
    name "wecc240_psse_G_2408";
    parent "wecc240_psse_N_2408";
    Pmax 575.7 MW;
    Qmax 115.1 MW;
    Qmin -115.1 MW;
    status IN_SERVICE;
    object gencost
    {
        model POLYNOMIAL;
        startup 0.0 $;
        shutdown 0.0 $;
        costs "0.0,0.0,0.0";
    };
}
object pypower.powerplant
{
    // MILLERCOORS_IRWINDALE_BREWERY: cap=7.0, cf=0.012, units=1
    // MM_WEST_COVINA: cap=11.7, cf=0.02, units=1
    // PUENTE_HILLS_ENERGY_RECOVERY: cap=50.0, cf=0.087, units=1
    // WALNUT_CREEK_ENERGY_PARK: cap=500.0, cf=0.869, units=1
    name "wecc240_psse_G_2408_CT";
    parent "wecc240_psse_G_2408";
    latitude 34.04;
    longitude -118.1;
    generator CT;
    operating_capacity 568.7 MW;
    startup_cost 25.0;
    shutdown_cost 0.0;
    fixed_cost 350.0;
    variable_cost 75.0;
    scarcity_cost 0.001;
}

object pypower.powerplant
{
    // MILLERCOORS_IRWINDALE_BREWERY: cap=7.0, cf=0.012, units=1
    name "wecc240_psse_G_2408_ST";
    parent "wecc240_psse_G_2408";
    latitude 34.04;
    longitude -118.1;
    generator ST;
    operating_capacity 7.0 MW;
    startup_cost 6500.0;
    shutdown_cost 0.0;
    fixed_cost 1000.0;
    variable_cost 5.0;
    scarcity_cost 0.001;
}

object pypower.gen
{
    name "wecc240_psse_G_2402";
    parent "wecc240_psse_N_2402";
    Pmax 679.4 MW;
    Qmax 135.9 MW;
    Qmin -135.9 MW;
    status IN_SERVICE;
    object gencost
    {
        model POLYNOMIAL;
        startup 0.0 $;
        shutdown 0.0 $;
        costs "0.0,0.0,0.0";
    };
}
object pypower.powerplant
{
    // CLEARWATER_POWER_PLANT: cap=49.0, cf=0.072, units=1
    // OLS_ENERGY_CHINO: cap=30.8, cf=0.045, units=1
    name "wecc240_psse_G_2402_CC";
    parent "wecc240_psse_G_2402";
    latitude 34.01;
    longitude -117.6;
    generator CC;
    operating_capacity 79.8 MW;
    startup_cost 35.0;
    shutdown_cost 0.0;
    fixed_cost 500.0;
    variable_cost 50.0;
    scarcity_cost 0.001;
}

object pypower.powerplant
{
    // AGUA_MANSA_POWER_PLANT: cap=60.5, cf=0.089, units=1
    // CENTURY_GENERATING_FACILITY: cap=44.8, cf=0.066, units=1
    // DREWS_GENERATING_FACILITY: cap=44.8, cf=0.066, units=1
    // GRAPELAND_PEAKER: cap=29.9, cf=0.044, units=1
    // MIRA_LOMA_PEAKER: cap=49.8, cf=0.073, units=1
    // NEW-INDY_ONTARIO_MILL: cap=34.0, cf=0.05, units=1
    // RIVERSIDE_ENERGY_RESOURCE_CENTER: cap=196.0, cf=0.288, units=1
    // SAN_GABRIEL_FACILITY: cap=33.0, cf=0.049, units=1
    name "wecc240_psse_G_2402_CT";
    parent "wecc240_psse_G_2402";
    latitude 34.01;
    longitude -117.6;
    generator CT;
    operating_capacity 492.8 MW;
    startup_cost 25.0;
    shutdown_cost 0.0;
    fixed_cost 350.0;
    variable_cost 75.0;
    scarcity_cost 0.001;
}

object pypower.powerplant
{
    // GRAPELAND_PEAKER: cap=29.9, cf=0.044, units=1
    // MIRA_LOMA_ENERGY_STORAGE_FACILITY: cap=20.0, cf=0.029, units=1
    // SAN_GABRIEL_FACILITY: cap=33.0, cf=0.049, units=1
    name "wecc240_psse_G_2402_ES";
    parent "wecc240_psse_G_2402";
    latitude 34.01;
    longitude -117.6;
    generator ES;
    operating_capacity 82.9 MW;
    startup_cost 0.0;
    shutdown_cost 0.0;
    fixed_cost 0.0;
    variable_cost 5.0;
    scarcity_cost 0.0;
}

object pypower.powerplant
{
    // ETIWANDA: cap=23.9, cf=0.035, units=1
    name "wecc240_psse_G_2402_HT";
    parent "wecc240_psse_G_2402";
    latitude 34.01;
    longitude -117.6;
    generator HT;
    operating_capacity 23.9 MW;
    startup_cost 0.0;
    shutdown_cost 0.0;
    fixed_cost 200.0;
    variable_cost 0.0;
    scarcity_cost 0.001;
}

object pypower.gen
{
    name "wecc240_psse_G_2403";
    parent "wecc240_psse_N_2403";
    Pmax 1118.5 MW;
    Qmax 223.7 MW;
    Qmin -223.7 MW;
    status IN_SERVICE;
    object gencost
    {
        model POLYNOMIAL;
        startup 0.0 $;
        shutdown 0.0 $;
        costs "0.0,0.0,0.0";
    };
}
object pypower.powerplant
{
    // LOMA_LINDA_UNIVERSITY_COGEN: cap=4.0, cf=0.004, units=1
    // MOUNTAINVIEW_GENERATING_STATION: cap=518.4, cf=0.463, units=1
    name "wecc240_psse_G_2403_CC";
    parent "wecc240_psse_G_2403";
    latitude 33.8;
    longitude -117.2;
    generator CC;
    operating_capacity 522.4 MW;
    startup_cost 35.0;
    shutdown_cost 0.0;
    fixed_cost 500.0;
    variable_cost 50.0;
    scarcity_cost 0.001;
}

object pypower.powerplant
{
    // LOMA_LINDA_UNIVERSITY_COGEN: cap=4.0, cf=0.004, units=1
    // SPRINGS_GENERATING_STATION: cap=40.0, cf=0.036, units=1
    name "wecc240_psse_G_2403_CT";
    parent "wecc240_psse_G_2403";
    latitude 33.8;
    longitude -117.2;
    generator CT;
    operating_capacity 44.0 MW;
    startup_cost 25.0;
    shutdown_cost 0.0;
    fixed_cost 350.0;
    variable_cost 75.0;
    scarcity_cost 0.001;
}

object pypower.powerplant
{
    // DIAMOND_VALLEY_LAKE: cap=29.7, cf=0.027, units=1
    name "wecc240_psse_G_2403_HT";
    parent "wecc240_psse_G_2403";
    latitude 33.8;
    longitude -117.2;
    generator HT;
    operating_capacity 29.7 MW;
    startup_cost 0.0;
    shutdown_cost 0.0;
    fixed_cost 200.0;
    variable_cost 0.0;
    scarcity_cost 0.001;
}

object pypower.powerplant
{
    // LOMA_LINDA_UNIVERSITY_COGEN: cap=4.0, cf=0.004, units=1
    // MOUNTAINVIEW_GENERATING_STATION: cap=518.4, cf=0.463, units=1
    name "wecc240_psse_G_2403_ST";
    parent "wecc240_psse_G_2403";
    latitude 33.8;
    longitude -117.2;
    generator ST;
    operating_capacity 522.4 MW;
    startup_cost 6500.0;
    shutdown_cost 0.0;
    fixed_cost 1000.0;
    variable_cost 5.0;
    scarcity_cost 0.001;
}

object pypower.gen
{
    name "wecc240_psse_G_2401";
    parent "wecc240_psse_N_2401";
    Pmax 308.9 MW;
    Qmax 61.8 MW;
    Qmin -61.8 MW;
    status IN_SERVICE;
    object gencost
    {
        model POLYNOMIAL;
        startup 0.0 $;
        shutdown 0.0 $;
        costs "0.0,0.0,0.0";
    };
}
object pypower.powerplant
{
    // DEVIL_CANYON: cap=276.2, cf=0.894, units=1
    // MOJAVE_SIPHON: cap=32.7, cf=0.106, units=1
    name "wecc240_psse_G_2401_HT";
    parent "wecc240_psse_G_2401";
    latitude 34.37;
    longitude -117.4;
    generator HT;
    operating_capacity 308.9 MW;
    startup_cost 0.0;
    shutdown_cost 0.0;
    fixed_cost 200.0;
    variable_cost 0.0;
    scarcity_cost 0.001;
}

object pypower.gen
{
    name "wecc240_psse_G_2603";
    parent "wecc240_psse_N_2603";
    Pmax 1316.0 MW;
    Qmax 263.2 MW;
    Qmin -263.2 MW;
    status IN_SERVICE;
    object gencost
    {
        model POLYNOMIAL;
        startup 0.0 $;
        shutdown 0.0 $;
        costs "0.0,0.0,0.0";
    };
}
object pypower.powerplant
{
    // HIGH_DESERT_POWER_PLANT: cap=852.0, cf=0.647, units=1
    name "wecc240_psse_G_2603_CC";
    parent "wecc240_psse_G_2603";
    latitude 34.57;
    longitude -117.3;
    generator CC;
    operating_capacity 852.0 MW;
    startup_cost 35.0;
    shutdown_cost 0.0;
    fixed_cost 500.0;
    variable_cost 50.0;
    scarcity_cost 0.001;
}

object pypower.powerplant
{
    // MOJAVE_SOLAR_PROJECT: cap=280.0, cf=0.213, units=1
    // SEGS_IX: cap=92.0, cf=0.07, units=1
    // SEGS_VIII: cap=92.0, cf=0.07, units=1
    name "wecc240_psse_G_2603_ST";
    parent "wecc240_psse_G_2603";
    latitude 34.57;
    longitude -117.3;
    generator ST;
    operating_capacity 464.0 MW;
    startup_cost 6500.0;
    shutdown_cost 0.0;
    fixed_cost 1000.0;
    variable_cost 5.0;
    scarcity_cost 0.001;
}

object pypower.gen
{
    name "wecc240_psse_G_2400";
    parent "wecc240_psse_N_2400";
    Pmax 4696.5 MW;
    Qmax 939.3 MW;
    Qmin -939.3 MW;
    status IN_SERVICE;
    object gencost
    {
        model POLYNOMIAL;
        startup 0.0 $;
        shutdown 0.0 $;
        costs "0.0,0.0,0.0";
    };
}
object pypower.powerplant
{
    // COACHELLA: cap=92.4, cf=0.02, units=1
    // CPV_SENTINEL_ENERGY_PROJECT: cap=800.0, cf=0.17, units=1
    // INDIGO_ENERGY_FACILITY: cap=149.7, cf=0.032, units=1
    // MCAGCC_COGEN_PLANT_1: cap=16.4, cf=0.003, units=1
    name "wecc240_psse_G_2400_CT";
    parent "wecc240_psse_G_2400";
    latitude 33.93;
    longitude -116.6;
    generator CT;
    operating_capacity 1058.5 MW;
    startup_cost 25.0;
    shutdown_cost 0.0;
    fixed_cost 350.0;
    variable_cost 75.0;
    scarcity_cost 0.001;
}

object pypower.powerplant
{
    // AP North Lake I, LP: cap=20.0, cf=0.0, units=1
    // Arlington Energy Center II: cap=233.0, cf=0.0, units=1
    // Athos Solar Project: cap=250.0, cf=0.0, units=1
    // Blythe Mesa Solar II: cap=223.6, cf=0.0, units=1
    // Blythe Solar 110, LLC: cap=109.8, cf=0.0, units=1
    // Blythe Solar II, LLC: cap=131.2, cf=0.0, units=1
    // Blythe Solar III, LLC Hybrid: cap=137.4, cf=0.0, units=1
    // Blythe Solar IV, LLC: cap=137.4, cf=0.0, units=1
    // Chuckawalla Solar: cap=4.0, cf=0.0, units=1
    // Chuckawalla Valley State Prison: cap=0.9, cf=0.0, units=1
    // Colgreen North Shore Solar Farm: cap=74.8, cf=0.0, units=1
    // Desert Harvest II, LLC: cap=70.0, cf=0.0, units=1
    // Desert Harvest, LLC: cap=80.0, cf=0.0, units=1
    // Desert Hot Springs Solar: cap=2.2, cf=0.0, units=1
    // Desert Sunlight 300, LLC: cap=313.7, cf=0.0, units=1
    // Diamond Valley Solar Project: cap=1.3, cf=0.0, units=1
    // EMWD - San Jacinto RES BCT: cap=4.2, cf=0.0, units=1
    // EMWD-Moreno Valley RWRF: cap=2.4, cf=0.0, units=1
    // EMWD-Perris Valley RWRF: cap=3.4, cf=0.0, units=1
    // EMWD-San Jacinto RWRF NEM: cap=1.3, cf=0.0, units=1
    // EMWD-Sun City RWRF: cap=1.6, cf=0.0, units=1
    // Garnet Solar Generation Station I, LLC: cap=4.0, cf=0.0, units=1
    // Ironwood Solar, LLC: cap=4.0, cf=0.0, units=1
    // Maverick Solar 4, LLC: cap=100.0, cf=0.0, units=1
    // Maverick Solar 6, LLC: cap=100.0, cf=0.0, units=1
    // Maverick Solar, LLC: cap=125.0, cf=0.0, units=1
    // McCoy Solar Energy Project Hybrid: cap=270.6, cf=0.0, units=1
    // North Palm Springs 1A: cap=2.4, cf=0.0, units=1
    // North Palm Springs 4A: cap=4.0, cf=0.0, units=1
    // Oberon Solar Project: cap=250.0, cf=0.0, units=1
    // Palo Verde College: cap=1.2, cf=0.0, units=1
    // RCWD PV Project: cap=3.9, cf=0.0, units=1
    // SE Athos II, LLC: cap=200.0, cf=0.0, units=1
    // Soboba Community Solar Project: cap=1.7, cf=0.0, units=1
    // Solar Blythe 2: cap=21.04, cf=0.0, units=1
    // Solar Blythe, LLC: cap=21.0, cf=0.0, units=1
    // SunAnza: cap=3.4, cf=0.0, units=1
    // SunEdison Ironwood State Prison: cap=0.9, cf=0.0, units=1
    // Tequesquite Landfill Solar PV Project: cap=7.5, cf=0.0, units=1
    // Valley Sanitary District WTP Solar: cap=1.0, cf=0.0, units=1
    // Venable Solar 1: cap=1.5, cf=0.0, units=1
    // Venable Solar 2: cap=1.5, cf=0.0, units=1
    name "wecc240_psse_G_2400_PV";
    parent "wecc240_psse_G_2400";
    latitude 33.93;
    longitude -116.6;
    generator PV;
    operating_capacity 2926.84 MW;
    startup_cost 0.0;
    shutdown_cost 0.0;
    fixed_cost 0.0;
    variable_cost 0.0;
    scarcity_cost 0.0;
}

object pypower.powerplant
{
    // DESERT_VIEW_POWER: cap=55.5, cf=0.012, units=1
    name "wecc240_psse_G_2400_ST";
    parent "wecc240_psse_G_2400";
    latitude 33.93;
    longitude -116.6;
    generator ST;
    operating_capacity 55.5 MW;
    startup_cost 6500.0;
    shutdown_cost 0.0;
    fixed_cost 1000.0;
    variable_cost 5.0;
    scarcity_cost 0.001;
}

object pypower.powerplant
{
    // Cabazon: cap=76.44, cf=0.0, units=109
    // Cabazon-Shell: cap=1.98, cf=0.0, units=3
    // Coachella Hills: cap=57.15, cf=0.0, units=16
    // Dillon: cap=45.0, cf=0.0, units=45
    // East Winds: cap=4.165, cf=0.0, units=7
    // Edom Hills (repower): cap=20.0, cf=0.0, units=8
    // Enron Earth Smart/Green Power: cap=14.25, cf=0.0, units=19
    // Garnet Wind Project: cap=6.5, cf=0.0, units=13
    // Karen Avenue Windfarm: cap=11.7, cf=0.0, units=12
    // Mesa Wind Repowering: cap=28.0, cf=0.0, units=7
    // Mountain View IV: cap=49.0, cf=0.0, units=49
    // Mountain View Power Partners I & II: cap=11.4, cf=0.0, units=19
    // Mountain View Power Partners III: cap=22.44, cf=0.0, units=34
    // Mountain View Power Partners Repower: cap=66.7, cf=0.0, units=16
    // Nestle Waters: cap=3.0, cf=0.0, units=2
    // Nestle Waters II: cap=1.85, cf=0.0, units=1
    // Painted Hills Repower: cap=27.0, cf=0.0, units=9
    // Palm Springs (repower): cap=49.5, cf=0.0, units=33
    // Robertsons Ready Mix: cap=3.2, cf=0.0, units=2
    // San Gorgonio Farms Wind Farm: cap=31.375, cf=0.0, units=114
    // San Gorgonio Westwinds II LLC: cap=43.4, cf=0.0, units=62
    // San Gorgonio Wind Associates 7: cap=2.0, cf=0.0, units=2
    // Wagner: cap=6.0, cf=0.0, units=2
    // Whitewater Hill: cap=61.5, cf=0.0, units=41
    // Wintec Palm: cap=1.4300000000000002, cf=0.0, units=22
    // unknown Riverside County: cap=10.65, cf=0.0, units=3
    name "wecc240_psse_G_2400_WT";
    parent "wecc240_psse_G_2400";
    latitude 33.93;
    longitude -116.6;
    generator WT;
    operating_capacity 655.63 MW;
    startup_cost 0.0;
    shutdown_cost 0.0;
    fixed_cost 0.0;
    variable_cost 0.0;
    scarcity_cost 0.0;
}

object pypower.gen
{
    name "wecc240_psse_G_1403";
    parent "wecc240_psse_N_1403";
    Pmax 2681.4 MW;
    Qmax 536.3 MW;
    Qmin -536.3 MW;
    status IN_SERVICE;
    object gencost
    {
        model POLYNOMIAL;
        startup 0.0 $;
        shutdown 0.0 $;
        costs "0.0,0.0,0.0";
    };
}
object pypower.powerplant
{
    // BLYTHE_ENERGY_INC: cap=591.0, cf=0.22, units=1
    // GRIFFITH_ENERGY_LLC: cap=655.0, cf=0.244, units=1
    // SOUTH_POINT_ENERGY_CENTER: cap=708.0, cf=0.264, units=1
    name "wecc240_psse_G_1403_CC";
    parent "wecc240_psse_G_1403";
    latitude 34.14;
    longitude -114.3;
    generator CC;
    operating_capacity 1954.0 MW;
    startup_cost 35.0;
    shutdown_cost 0.0;
    fixed_cost 500.0;
    variable_cost 50.0;
    scarcity_cost 0.001;
}

object pypower.powerplant
{
    // BLACK_MOUNTAIN_GENERATING_STATION: cap=121.0, cf=0.045, units=1
    name "wecc240_psse_G_1403_CT";
    parent "wecc240_psse_G_1403";
    latitude 34.14;
    longitude -114.3;
    generator CT;
    operating_capacity 121.0 MW;
    startup_cost 25.0;
    shutdown_cost 0.0;
    fixed_cost 350.0;
    variable_cost 75.0;
    scarcity_cost 0.001;
}

object pypower.powerplant
{
    // HEADGATE_ROCK: cap=19.5, cf=0.007, units=1
    // PARKER_DAM: cap=120.0, cf=0.045, units=1
    name "wecc240_psse_G_1403_HT";
    parent "wecc240_psse_G_1403";
    latitude 34.14;
    longitude -114.3;
    generator HT;
    operating_capacity 139.5 MW;
    startup_cost 0.0;
    shutdown_cost 0.0;
    fixed_cost 200.0;
    variable_cost 0.0;
    scarcity_cost 0.001;
}

object pypower.powerplant
{
    // Black Mountain Solar, LLC: cap=9.0, cf=0.0, units=1
    // Gray Hawk Solar: cap=46.0, cf=0.0, units=1
    // Jacobson 5 MW Solar: cap=4.4, cf=0.0, units=1
    // La Senita: cap=1.0, cf=0.0, units=1
    // Mohave Electric Cooperative at Joy Lane: cap=10.0, cf=0.0, units=1
    // Mohave Electric at Fort Mohave: cap=4.4, cf=0.0, units=1
    // OE_AZ1: cap=32.5, cf=0.0, units=1
    name "wecc240_psse_G_1403_PV";
    parent "wecc240_psse_G_1403";
    latitude 34.14;
    longitude -114.3;
    generator PV;
    operating_capacity 107.3 MW;
    startup_cost 0.0;
    shutdown_cost 0.0;
    fixed_cost 0.0;
    variable_cost 0.0;
    scarcity_cost 0.0;
}

object pypower.powerplant
{
    // Kingman: cap=10.0, cf=0.0, units=5
    // White Hills: cap=349.59999999999997, cf=0.0, units=126
    name "wecc240_psse_G_1403_WT";
    parent "wecc240_psse_G_1403";
    latitude 34.14;
    longitude -114.3;
    generator WT;
    operating_capacity 359.6 MW;
    startup_cost 0.0;
    shutdown_cost 0.0;
    fixed_cost 0.0;
    variable_cost 0.0;
    scarcity_cost 0.0;
}

object pypower.gen
{
    name "wecc240_psse_G_2901";
    parent "wecc240_psse_N_2901";
    Pmax 654.6 MW;
    Qmax 130.9 MW;
    Qmin -130.9 MW;
    status IN_SERVICE;
    object gencost
    {
        model POLYNOMIAL;
        startup 0.0 $;
        shutdown 0.0 $;
        costs "0.0,0.0,0.0";
    };
}
object pypower.powerplant
{
    // DAVIS_DAM: cap=254.8, cf=0.389, units=1
    name "wecc240_psse_G_2901_HT";
    parent "wecc240_psse_G_2901";
    latitude 35.8;
    longitude -115.0;
    generator HT;
    operating_capacity 254.8 MW;
    startup_cost 0.0;
    shutdown_cost 0.0;
    fixed_cost 200.0;
    variable_cost 0.0;
    scarcity_cost 0.001;
}

object pypower.powerplant
{
    // IVANPAH_1: cap=133.0, cf=0.203, units=1
    // IVANPAH_2: cap=133.4, cf=0.204, units=1
    // IVANPAH_3: cap=133.4, cf=0.204, units=1
    name "wecc240_psse_G_2901_ST";
    parent "wecc240_psse_G_2901";
    latitude 35.8;
    longitude -115.0;
    generator ST;
    operating_capacity 399.8 MW;
    startup_cost 6500.0;
    shutdown_cost 0.0;
    fixed_cost 1000.0;
    variable_cost 5.0;
    scarcity_cost 0.001;
}

object pypower.gen
{
    name "wecc240_psse_G_1301";
    parent "wecc240_psse_N_1301";
    Pmax 3617.5 MW;
    Qmax 723.5 MW;
    Qmin -723.5 MW;
    status IN_SERVICE;
    object gencost
    {
        model POLYNOMIAL;
        startup 0.0 $;
        shutdown 0.0 $;
        costs "0.0,0.0,0.0";
    };
}
object pypower.powerplant
{
    // HOOVER_DAM_AZ: cap=1039.4, cf=0.287, units=1
    name "wecc240_psse_G_1301_HT";
    parent "wecc240_psse_G_1301";
    latitude 35.93;
    longitude -114.8;
    generator HT;
    operating_capacity 1039.4 MW;
    startup_cost 0.0;
    shutdown_cost 0.0;
    fixed_cost 200.0;
    variable_cost 0.0;
    scarcity_cost 0.001;
}

object pypower.powerplant
{
    // Apex Solar PV Power Project: cap=20.0, cf=0.0, units=1
    // Boulder Solar II, LLC: cap=50.0, cf=0.0, units=1
    // Boulder Solar Power, LLC: cap=100.0, cf=0.0, units=1
    // CM10: cap=10.0, cf=0.0, units=1
    // CM48: cap=48.0, cf=0.0, units=1
    // Copper Mountain Solar 2: cap=154.0, cf=0.0, units=1
    // Copper Mountain Solar 3: cap=255.0, cf=0.0, units=1
    // Copper Mountain Solar 4, LLC: cap=93.6, cf=0.0, units=1
    // Copper Mountain Solar 5, LLC: cap=250.0, cf=0.0, units=1
    // Harry Allen Solar Energy, LLC: cap=100.0, cf=0.0, units=1
    // Las Vegas WPCF Solar Plant: cap=3.3, cf=0.0, units=1
    // Moapa Southern Paiute: cap=250.0, cf=0.0, units=1
    // Mountain View Solar: cap=20.0, cf=0.0, units=1
    // Nellis Air Force Base Solar Array: cap=12.0, cf=0.0, units=1
    // Nellis Solar PV II: cap=15.5, cf=0.0, units=1
    // Playa Solar 1, LLC: cap=79.0, cf=0.0, units=1
    // Playa Solar 2: cap=100.0, cf=0.0, units=1
    // River Mountains Solar: cap=14.4, cf=0.0, units=1
    // Searchlight Solar: cap=17.49, cf=0.0, units=1
    // Silver State Solar Power North: cap=52.0, cf=0.0, units=1
    // Silver State Solar Power South: cap=250.0, cf=0.0, units=1
    // Spectrum Solar PV Power Project: cap=30.0, cf=0.0, units=1
    // Techren Solar I, LLC: cap=100.0, cf=0.0, units=1
    // Techren Solar II, LLC: cap=200.0, cf=0.0, units=1
    // Techren Solar III, LLC: cap=25.0, cf=0.0, units=1
    // Techren Solar IV, LLC: cap=25.0, cf=0.0, units=1
    // Techren Solar V: cap=50.0, cf=0.0, units=1
    // Townsite Solar Project Hybrid: cap=160.0, cf=0.0, units=1
    // Yellow Pine Solar: cap=93.8, cf=0.0, units=1
    name "wecc240_psse_G_1301_PV";
    parent "wecc240_psse_G_1301";
    latitude 35.93;
    longitude -114.8;
    generator PV;
    operating_capacity 2578.09 MW;
    startup_cost 0.0;
    shutdown_cost 0.0;
    fixed_cost 0.0;
    variable_cost 0.0;
    scarcity_cost 0.0;
}

object pypower.gen
{
    name "wecc240_psse_G_1302";
    parent "wecc240_psse_N_1302";
    Pmax 221.2 MW;
    Qmax 44.2 MW;
    Qmin -44.2 MW;
    status IN_SERVICE;
    object gencost
    {
        model POLYNOMIAL;
        startup 0.0 $;
        shutdown 0.0 $;
        costs "0.0,0.0,0.0";
    };
}
object pypower.powerplant
{
    // MILLCREEK_POWER_GENERATION: cap=80.0, cf=0.362, units=1
    name "wecc240_psse_G_1302_CT";
    parent "wecc240_psse_G_1302";
    latitude 36.65;
    longitude -115.1;
    generator CT;
    operating_capacity 80.0 MW;
    startup_cost 25.0;
    shutdown_cost 0.0;
    fixed_cost 350.0;
    variable_cost 75.0;
    scarcity_cost 0.001;
}

object pypower.powerplant
{
    // HURRICANE_CITY_POWER: cap=7.5, cf=0.034, units=1
    name "wecc240_psse_G_1302_IC";
    parent "wecc240_psse_G_1302";
    latitude 36.65;
    longitude -115.1;
    generator IC;
    operating_capacity 7.5 MW;
    startup_cost 0.0;
    shutdown_cost 0.0;
    fixed_cost 0.0;
    variable_cost 50.0;
    scarcity_cost 0.001;
}

object pypower.powerplant
{
    // Bloomington Solar I: cap=2.0, cf=0.0, units=1
    // NVSS-II: cap=14.0, cf=0.0, units=1
    // Sunshine Valley Solar: cap=100.0, cf=0.0, units=1
    name "wecc240_psse_G_1302_PV";
    parent "wecc240_psse_G_1302";
    latitude 36.65;
    longitude -115.1;
    generator PV;
    operating_capacity 116.0 MW;
    startup_cost 0.0;
    shutdown_cost 0.0;
    fixed_cost 0.0;
    variable_cost 0.0;
    scarcity_cost 0.0;
}

object pypower.powerplant
{
    // BLOOMINGTON_POWER_PLANT: cap=10.2, cf=0.046, units=1
    // HURRICANE_CITY_POWER: cap=7.5, cf=0.034, units=1
    name "wecc240_psse_G_1302_ST";
    parent "wecc240_psse_G_1302";
    latitude 36.65;
    longitude -115.1;
    generator ST;
    operating_capacity 17.7 MW;
    startup_cost 6500.0;
    shutdown_cost 0.0;
    fixed_cost 1000.0;
    variable_cost 5.0;
    scarcity_cost 0.001;
}

object pypower.gen
{
    name "wecc240_psse_G_8001";
    parent "wecc240_psse_N_8001";
    Pmax 1488.4 MW;
    Qmax 297.7 MW;
    Qmin -297.7 MW;
    status IN_SERVICE;
    object gencost
    {
        model POLYNOMIAL;
        startup 0.0 $;
        shutdown 0.0 $;
        costs "0.0,0.0,0.0";
    };
}
object pypower.powerplant
{
    // REDDING_POWER: cap=91.5, cf=0.061, units=1
    name "wecc240_psse_G_8001_CC";
    parent "wecc240_psse_G_8001";
    latitude 40.38;
    longitude -122.4;
    generator CC;
    operating_capacity 91.5 MW;
    startup_cost 35.0;
    shutdown_cost 0.0;
    fixed_cost 500.0;
    variable_cost 50.0;
    scarcity_cost 0.001;
}

object pypower.powerplant
{
    // REDDING_POWER: cap=91.5, cf=0.061, units=1
    name "wecc240_psse_G_8001_CT";
    parent "wecc240_psse_G_8001";
    latitude 40.38;
    longitude -122.4;
    generator CT;
    operating_capacity 91.5 MW;
    startup_cost 25.0;
    shutdown_cost 0.0;
    fixed_cost 350.0;
    variable_cost 75.0;
    scarcity_cost 0.001;
}

object pypower.powerplant
{
    // JUDGE_F_CARR: cap=154.4, cf=0.104, units=1
    // KESWICK: cap=117.0, cf=0.079, units=1
    // SHASTA: cap=714.0, cf=0.48, units=1
    // SPRING_CREEK: cap=180.0, cf=0.121, units=1
    // TRINITY: cap=140.0, cf=0.094, units=1
    name "wecc240_psse_G_8001_HT";
    parent "wecc240_psse_G_8001";
    latitude 40.38;
    longitude -122.4;
    generator HT;
    operating_capacity 1305.4 MW;
    startup_cost 0.0;
    shutdown_cost 0.0;
    fixed_cost 200.0;
    variable_cost 0.0;
    scarcity_cost 0.001;
}

object pypower.gen
{
    name "wecc240_psse_G_3916";
    parent "wecc240_psse_N_3916";
    Pmax 713.9 MW;
    Qmax 142.8 MW;
    Qmin -142.8 MW;
    status IN_SERVICE;
    object gencost
    {
        model POLYNOMIAL;
        startup 0.0 $;
        shutdown 0.0 $;
        costs "0.0,0.0,0.0";
    };
}
object pypower.powerplant
{
    // COLUSA_GENERATING_STATION: cap=712.4, cf=0.998, units=1
    name "wecc240_psse_G_3916_CC";
    parent "wecc240_psse_G_3916";
    latitude 39.44;
    longitude -122.2;
    generator CC;
    operating_capacity 712.4 MW;
    startup_cost 35.0;
    shutdown_cost 0.0;
    fixed_cost 500.0;
    variable_cost 50.0;
    scarcity_cost 0.001;
}

object pypower.powerplant
{
    // Enerparc CA2, LLC: cap=1.5, cf=0.0, units=1
    name "wecc240_psse_G_3916_PV";
    parent "wecc240_psse_G_3916";
    latitude 39.44;
    longitude -122.2;
    generator PV;
    operating_capacity 1.5 MW;
    startup_cost 0.0;
    shutdown_cost 0.0;
    fixed_cost 0.0;
    variable_cost 0.0;
    scarcity_cost 0.0;
}

object pypower.gen
{
    name "wecc240_psse_G_3905";
    parent "wecc240_psse_N_3905";
    Pmax 935.3 MW;
    Qmax 187.1 MW;
    Qmin -187.1 MW;
    status IN_SERVICE;
    object gencost
    {
        model POLYNOMIAL;
        startup 0.0 $;
        shutdown 0.0 $;
        costs "0.0,0.0,0.0";
    };
}
object pypower.powerplant
{
    // BELDEN: cap=117.9, cf=0.126, units=1
    // BUCKS_CREEK: cap=66.0, cf=0.071, units=1
    // BUTT_VALLEY: cap=40.0, cf=0.043, units=1
    // CARIBOU_1: cap=73.8, cf=0.079, units=1
    // CARIBOU_2: cap=117.9, cf=0.126, units=1
    // CRESTA: cap=73.8, cf=0.079, units=1
    // DE_SABLA: cap=18.4, cf=0.02, units=1
    // FORKS_OF_BUTTE_HYDRO_PROJECT: cap=14.5, cf=0.016, units=1
    // GRIZZLY: cap=22.0, cf=0.024, units=1
    // POE: cap=142.8, cf=0.153, units=1
    // ROCK_CREEK: cap=126.0, cf=0.135, units=1
    // THERMALITO: cap=115.1, cf=0.123, units=1
    name "wecc240_psse_G_3905_HT";
    parent "wecc240_psse_G_3905";
    latitude 39.55;
    longitude -121.6;
    generator HT;
    operating_capacity 928.2 MW;
    startup_cost 0.0;
    shutdown_cost 0.0;
    fixed_cost 200.0;
    variable_cost 0.0;
    scarcity_cost 0.001;
}

object pypower.powerplant
{
    // Butte College Main Campus Solar: cap=3.6, cf=0.0, units=1
    // Gridley Main: cap=1.0, cf=0.0, units=1
    // Gridley Main Two: cap=2.5, cf=0.0, units=1
    name "wecc240_psse_G_3905_PV";
    parent "wecc240_psse_G_3905";
    latitude 39.55;
    longitude -121.6;
    generator PV;
    operating_capacity 7.1 MW;
    startup_cost 0.0;
    shutdown_cost 0.0;
    fixed_cost 0.0;
    variable_cost 0.0;
    scarcity_cost 0.0;
}

object pypower.gen
{
    name "wecc240_psse_G_3919";
    parent "wecc240_psse_N_3919";
    Pmax 696.0 MW;
    Qmax 139.2 MW;
    Qmin -139.2 MW;
    status IN_SERVICE;
    object gencost
    {
        model POLYNOMIAL;
        startup 0.0 $;
        shutdown 0.0 $;
        costs "0.0,0.0,0.0";
    };
}
object pypower.powerplant
{
    // EDWARD_C_HYATT: cap=644.1, cf=0.925, units=1
    // FORBESTOWN: cap=41.9, cf=0.06, units=1
    // KELLY_RIDGE: cap=10.0, cf=0.014, units=1
    name "wecc240_psse_G_3919_HT";
    parent "wecc240_psse_G_3919";
    latitude 39.44;
    longitude -121.5;
    generator HT;
    operating_capacity 696.0 MW;
    startup_cost 0.0;
    shutdown_cost 0.0;
    fixed_cost 200.0;
    variable_cost 0.0;
    scarcity_cost 0.001;
}

object pypower.gen
{
    name "wecc240_psse_G_3911";
    parent "wecc240_psse_N_3911";
    Pmax 257.7 MW;
    Qmax 51.5 MW;
    Qmin -51.5 MW;
    status IN_SERVICE;
    object gencost
    {
        model POLYNOMIAL;
        startup 0.0 $;
        shutdown 0.0 $;
        costs "0.0,0.0,0.0";
    };
}
object pypower.powerplant
{
    // COLEMAN_PH: cap=12.1, cf=0.047, units=1
    name "wecc240_psse_G_3911_HT";
    parent "wecc240_psse_G_3911";
    latitude 40.4;
    longitude -122.3;
    generator HT;
    operating_capacity 12.1 MW;
    startup_cost 0.0;
    shutdown_cost 0.0;
    fixed_cost 200.0;
    variable_cost 0.0;
    scarcity_cost 0.001;
}

object pypower.powerplant
{
    // RED_BLUFF: cap=46.4, cf=0.18, units=1
    name "wecc240_psse_G_3911_IC";
    parent "wecc240_psse_G_3911";
    latitude 40.4;
    longitude -122.3;
    generator IC;
    operating_capacity 46.4 MW;
    startup_cost 0.0;
    shutdown_cost 0.0;
    fixed_cost 0.0;
    variable_cost 50.0;
    scarcity_cost 0.001;
}

object pypower.powerplant
{
    // Shasta Solar Farm: cap=3.0, cf=0.0, units=1
    // Sierra Pacific Industries (2042-RD): cap=8.4, cf=0.0, units=1
    name "wecc240_psse_G_3911_PV";
    parent "wecc240_psse_G_3911";
    latitude 40.4;
    longitude -122.3;
    generator PV;
    operating_capacity 11.4 MW;
    startup_cost 0.0;
    shutdown_cost 0.0;
    fixed_cost 0.0;
    variable_cost 0.0;
    scarcity_cost 0.0;
}

object pypower.powerplant
{
    // SPI_ANDERSON_2: cap=30.2, cf=0.117, units=1
    // WHEELABRATOR_SHASTA: cap=54.9, cf=0.213, units=1
    name "wecc240_psse_G_3911_ST";
    parent "wecc240_psse_G_3911";
    latitude 40.4;
    longitude -122.3;
    generator ST;
    operating_capacity 85.1 MW;
    startup_cost 6500.0;
    shutdown_cost 0.0;
    fixed_cost 1000.0;
    variable_cost 5.0;
    scarcity_cost 0.001;
}

object pypower.powerplant
{
    // Hatchett Ridge: cap=101.19999999999999, cf=0.0, units=44
    // Walmart Red Bluff: cap=1.5, cf=0.0, units=1
    name "wecc240_psse_G_3911_WT";
    parent "wecc240_psse_G_3911";
    latitude 40.4;
    longitude -122.3;
    generator WT;
    operating_capacity 102.7 MW;
    startup_cost 0.0;
    shutdown_cost 0.0;
    fixed_cost 0.0;
    variable_cost 0.0;
    scarcity_cost 0.0;
}

object pypower.gen
{
    name "wecc240_psse_G_3906";
    parent "wecc240_psse_N_3906";
    Pmax 865.8 MW;
    Qmax 173.2 MW;
    Qmin -173.2 MW;
    status IN_SERVICE;
    object gencost
    {
        model POLYNOMIAL;
        startup 0.0 $;
        shutdown 0.0 $;
        costs "0.0,0.0,0.0";
    };
}
object pypower.powerplant
{
    // HAT_CREEK_1: cap=10.0, cf=0.012, units=1
    // HAT_CREEK_2: cap=10.0, cf=0.012, units=1
    // JAMES_B_BLACK: cap=168.6, cf=0.195, units=1
    // MUCK_VALLEY_HYDROELECTRIC: cap=29.9, cf=0.035, units=1
    // PIT_1: cap=69.2, cf=0.08, units=1
    // PIT_3: cap=80.1, cf=0.093, units=1
    // PIT_4: cap=103.4, cf=0.119, units=1
    // PIT_5: cap=141.6, cf=0.164, units=1
    // PIT_6: cap=79.2, cf=0.091, units=1
    // PIT_7: cap=109.8, cf=0.127, units=1
    name "wecc240_psse_G_3906_HT";
    parent "wecc240_psse_G_3906";
    latitude 40.81;
    longitude -121.9;
    generator HT;
    operating_capacity 801.8 MW;
    startup_cost 0.0;
    shutdown_cost 0.0;
    fixed_cost 200.0;
    variable_cost 0.0;
    scarcity_cost 0.001;
}

object pypower.powerplant
{
    // BURNEY_FOREST_PRODUCTS: cap=31.0, cf=0.036, units=1
    // ROSEBURG_FOREST_PRODUCTS_BIOMASS: cap=13.0, cf=0.015, units=1
    // SIERRA_PACIFIC_BURNEY_FACILITY: cap=20.0, cf=0.023, units=1
    name "wecc240_psse_G_3906_ST";
    parent "wecc240_psse_G_3906";
    latitude 40.81;
    longitude -121.9;
    generator ST;
    operating_capacity 64.0 MW;
    startup_cost 6500.0;
    shutdown_cost 0.0;
    fixed_cost 1000.0;
    variable_cost 5.0;
    scarcity_cost 0.001;
}

object pypower.gen
{
    name "wecc240_psse_G_4001";
    parent "wecc240_psse_N_4001";
    Pmax 810.1 MW;
    Qmax 162.0 MW;
    Qmin -162.0 MW;
    status IN_SERVICE;
    object gencost
    {
        model POLYNOMIAL;
        startup 0.0 $;
        shutdown 0.0 $;
        costs "0.0,0.0,0.0";
    };
}
object pypower.powerplant
{
    // KLAMATH_COGENERATION_PLANT: cap=501.5, cf=0.619, units=1
    name "wecc240_psse_G_4001_CC";
    parent "wecc240_psse_G_4001";
    latitude 42.0;
    longitude -121.3;
    generator CC;
    operating_capacity 501.5 MW;
    startup_cost 35.0;
    shutdown_cost 0.0;
    fixed_cost 500.0;
    variable_cost 50.0;
    scarcity_cost 0.001;
}

object pypower.powerplant
{
    // KLAMATH_EXPANSION_PROJECT: cap=117.6, cf=0.145, units=1
    name "wecc240_psse_G_4001_CT";
    parent "wecc240_psse_G_4001";
    latitude 42.0;
    longitude -121.3;
    generator CT;
    operating_capacity 117.6 MW;
    startup_cost 25.0;
    shutdown_cost 0.0;
    fixed_cost 350.0;
    variable_cost 75.0;
    scarcity_cost 0.001;
}

object pypower.powerplant
{
    // Airport Solar: cap=47.3, cf=0.0, units=1
    // Alkali Solar, LLC: cap=10.0, cf=0.0, units=1
    // BC Solar: cap=8.0, cf=0.0, units=1
    // Black Cap Solar Plant: cap=2.0, cf=0.0, units=1
    // Bly Solar Center: cap=8.0, cf=0.0, units=1
    // Chiloquin Solar, LLC: cap=9.9, cf=0.0, units=1
    // Fort Rock I: cap=9.9, cf=0.0, units=1
    // Fort Rock IV: cap=10.0, cf=0.0, units=1
    // Garrett Solar: cap=10.0, cf=0.0, units=1
    // Klamath Falls Solar 2 (CSG): cap=2.9, cf=0.0, units=1
    // NorWest Energy 4, LLC: cap=5.6, cf=0.0, units=1
    // OR Solar 3, LLC: cap=10.0, cf=0.0, units=1
    // OR Solar 5, LLC: cap=8.0, cf=0.0, units=1
    // OR Solar 6, LLC: cap=10.0, cf=0.0, units=1
    // OR Solar 8, LLC: cap=10.0, cf=0.0, units=1
    // Old Mill Solar: cap=5.0, cf=0.0, units=1
    // Oregon University System OIT Klamath Falls: cap=2.0, cf=0.0, units=1
    // Outback Solar at Christmas Valley: cap=4.4, cf=0.0, units=1
    // Rock Garden Solar, LLC: cap=10.0, cf=0.0, units=1
    // Woodline Solar: cap=8.0, cf=0.0, units=1
    name "wecc240_psse_G_4001_PV";
    parent "wecc240_psse_G_4001";
    latitude 42.0;
    longitude -121.3;
    generator PV;
    operating_capacity 191.0 MW;
    startup_cost 0.0;
    shutdown_cost 0.0;
    fixed_cost 0.0;
    variable_cost 0.0;
    scarcity_cost 0.0;
}

object pypower.gen
{
    name "wecc240_psse_G_3701";
    parent "wecc240_psse_N_3701";
    Pmax 453.9 MW;
    Qmax 90.8 MW;
    Qmin -90.8 MW;
    status IN_SERVICE;
    object gencost
    {
        model POLYNOMIAL;
        startup 0.0 $;
        shutdown 0.0 $;
        costs "0.0,0.0,0.0";
    };
}
object pypower.powerplant
{
    // FRENCH_MEADOWS: cap=15.3, cf=0.034, units=1
    // HAYPRESS: cap=10.0, cf=0.022, units=1
    // LOON_LAKE: cap=74.1, cf=0.163, units=1
    name "wecc240_psse_G_3701_HT";
    parent "wecc240_psse_G_3701";
    latitude 39.53;
    longitude -119.8;
    generator HT;
    operating_capacity 99.4 MW;
    startup_cost 0.0;
    shutdown_cost 0.0;
    fixed_cost 200.0;
    variable_cost 0.0;
    scarcity_cost 0.001;
}

object pypower.powerplant
{
    // EGP Stillwater Solar PV II, LLC: cap=20.0, cf=0.0, units=1
    // Fish Springs: cap=100.0, cf=0.0, units=1
    // Ft. Churchill PV: cap=18.0, cf=0.0, units=1
    // HL Solar: cap=7.6, cf=0.0, units=1
    // Luning Energy: cap=50.0, cf=0.0, units=1
    // PSREC/SIAD Solar: cap=2.4, cf=0.0, units=1
    // Patua Acquisition Project, LLC: cap=10.64, cf=0.0, units=1
    // Stillwater Facility: cap=21.8, cf=0.0, units=1
    // Tungsten Mountain: cap=7.3, cf=0.0, units=1
    // Turquoise Liberty Solar: cap=10.0, cf=0.0, units=1
    // Turquoise Nevada, LLC: cap=54.6, cf=0.0, units=1
    // Western 102 Power Plant: cap=1.0, cf=0.0, units=1
    name "wecc240_psse_G_3701_PV";
    parent "wecc240_psse_G_3701";
    latitude 39.53;
    longitude -119.8;
    generator PV;
    operating_capacity 303.34 MW;
    startup_cost 0.0;
    shutdown_cost 0.0;
    fixed_cost 0.0;
    variable_cost 0.0;
    scarcity_cost 0.0;
}

object pypower.powerplant
{
    // HL_POWER: cap=36.2, cf=0.08, units=1
    // KINGS_BEACH: cap=15.0, cf=0.033, units=1
    name "wecc240_psse_G_3701_ST";
    parent "wecc240_psse_G_3701";
    latitude 39.53;
    longitude -119.8;
    generator ST;
    operating_capacity 51.2 MW;
    startup_cost 6500.0;
    shutdown_cost 0.0;
    fixed_cost 1000.0;
    variable_cost 5.0;
    scarcity_cost 0.001;
}

object pypower.gen
{
    name "wecc240_psse_G_4204";
    parent "wecc240_psse_N_4204";
    Pmax 522.4 MW;
    Qmax 104.5 MW;
    Qmin -104.5 MW;
    status IN_SERVICE;
    object gencost
    {
        model POLYNOMIAL;
        startup 0.0 $;
        shutdown 0.0 $;
        costs "0.0,0.0,0.0";
    };
}
object pypower.powerplant
{
    // CLEARWATER_1: cap=15.0, cf=0.029, units=1
    // CLEARWATER_2: cap=26.0, cf=0.05, units=1
    // COPCO_1: cap=26.0, cf=0.05, units=1
    // COPCO_2: cap=36.0, cf=0.069, units=1
    // FISH_CREEK: cap=11.0, cf=0.021, units=1
    // GREEN_SPRINGS: cap=17.2, cf=0.033, units=1
    // IRON_GATE: cap=19.0, cf=0.036, units=1
    // JOHN_C_BOYLE: cap=98.7, cf=0.189, units=1
    // LEMOLO_2: cap=38.5, cf=0.074, units=1
    // LOST_CREEK: cap=49.0, cf=0.094, units=1
    // PROSPECT_2: cap=32.0, cf=0.061, units=1
    // TOKETEE_FALLS: cap=42.6, cf=0.082, units=1
    name "wecc240_psse_G_4204_HT";
    parent "wecc240_psse_G_4204";
    latitude 42.36;
    longitude -122.8;
    generator HT;
    operating_capacity 411.0 MW;
    startup_cost 0.0;
    shutdown_cost 0.0;
    fixed_cost 200.0;
    variable_cost 0.0;
    scarcity_cost 0.001;
}

object pypower.powerplant
{
    // Eagle Point Solar: cap=9.9, cf=0.0, units=1
    // OR Solar 2, LLC: cap=10.0, cf=0.0, units=1
    name "wecc240_psse_G_4204_PV";
    parent "wecc240_psse_G_4204";
    latitude 42.36;
    longitude -122.8;
    generator PV;
    operating_capacity 19.9 MW;
    startup_cost 0.0;
    shutdown_cost 0.0;
    fixed_cost 0.0;
    variable_cost 0.0;
    scarcity_cost 0.0;
}

object pypower.powerplant
{
    // BIOMASS_ONE_LP: cap=40.0, cf=0.077, units=1
    // DILLARD_COMPLEX: cap=51.5, cf=0.099, units=1
    name "wecc240_psse_G_4204_ST";
    parent "wecc240_psse_G_4204";
    latitude 42.36;
    longitude -122.8;
    generator ST;
    operating_capacity 91.5 MW;
    startup_cost 6500.0;
    shutdown_cost 0.0;
    fixed_cost 1000.0;
    variable_cost 5.0;
    scarcity_cost 0.001;
}

object pypower.gen
{
    name "wecc240_psse_G_4203";
    parent "wecc240_psse_N_4203";
    Pmax 816.9 MW;
    Qmax 163.4 MW;
    Qmin -163.4 MW;
    status IN_SERVICE;
    object gencost
    {
        model POLYNOMIAL;
        startup 0.0 $;
        shutdown 0.0 $;
        costs "0.0,0.0,0.0";
    };
}
object pypower.powerplant
{
    // UNIV_OF_OREGON_CENTRAL_POWER_STATION: cap=11.0, cf=0.013, units=1
    name "wecc240_psse_G_4203_CC";
    parent "wecc240_psse_G_4203";
    latitude 44.05;
    longitude -123.1;
    generator CC;
    operating_capacity 11.0 MW;
    startup_cost 35.0;
    shutdown_cost 0.0;
    fixed_cost 500.0;
    variable_cost 50.0;
    scarcity_cost 0.001;
}

object pypower.powerplant
{
    // COVANTA_MARION_INC: cap=13.1, cf=0.016, units=1
    name "wecc240_psse_G_4203_CT";
    parent "wecc240_psse_G_4203";
    latitude 44.05;
    longitude -123.1;
    generator CT;
    operating_capacity 13.1 MW;
    startup_cost 25.0;
    shutdown_cost 0.0;
    fixed_cost 350.0;
    variable_cost 75.0;
    scarcity_cost 0.001;
}

object pypower.powerplant
{
    // BIG_CLIFF: cap=18.0, cf=0.022, units=1
    // COUGAR: cap=26.0, cf=0.032, units=1
    // DETROIT: cap=100.0, cf=0.122, units=1
    // DEXTER: cap=15.0, cf=0.018, units=1
    // FOSTER: cap=20.0, cf=0.024, units=1
    // GREEN_PETER: cap=80.0, cf=0.098, units=1
    // HILLS_CREEK: cap=30.0, cf=0.037, units=1
    // LEMOLO_1: cap=32.0, cf=0.039, units=1
    // LOOKOUT_POINT: cap=120.0, cf=0.147, units=1
    // SLIDE_CREEK: cap=18.0, cf=0.022, units=1
    // SODA_SPRINGS: cap=11.0, cf=0.013, units=1
    // SULLIVAN: cap=15.4, cf=0.019, units=1
    name "wecc240_psse_G_4203_HT";
    parent "wecc240_psse_G_4203";
    latitude 44.05;
    longitude -123.1;
    generator HT;
    operating_capacity 485.4 MW;
    startup_cost 0.0;
    shutdown_cost 0.0;
    fixed_cost 200.0;
    variable_cost 0.0;
    scarcity_cost 0.001;
}

object pypower.powerplant
{
    // Baldock Solar Highway: cap=1.7, cf=0.0, units=1
    // Ballston Solar, LLC: cap=2.2, cf=0.0, units=1
    // Bellevue Solar Project: cap=1.6, cf=0.0, units=1
    // Bighorn Solar: cap=2.2, cf=0.0, units=1
    // Boring Solar, LLC: cap=2.2, cf=0.0, units=1
    // Brightwood Solar, LLC: cap=10.0, cf=0.0, units=1
    // Bristol Solar: cap=3.0, cf=0.0, units=1
    // Brush Creek Solar: cap=2.2, cf=0.0, units=1
    // Butler Solar, LLC: cap=4.0, cf=0.0, units=1
    // Carnes Creek Solar (CSG): cap=2.5, cf=0.0, units=1
    // Case Creek Solar: cap=2.2, cf=0.0, units=1
    // Colton Solar: cap=2.2, cf=0.0, units=1
    // Cosper Creek Solar (CSG): cap=2.5, cf=0.0, units=1
    // Day Hill Solar, LLC: cap=2.3, cf=0.0, units=1
    // Dayton Cutoff Solar: cap=2.2, cf=0.0, units=1
    // Drift Creek Solar: cap=2.2, cf=0.0, units=1
    // Dunn Road Solar: cap=1.8, cf=0.0, units=1
    // Duus Solar, LLC: cap=10.0, cf=0.0, units=1
    // Firwood Solar, LLC: cap=10.0, cf=0.0, units=1
    // Fruitland Creek Solar (CSG): cap=1.8, cf=0.0, units=1
    // Grand Ronde Solar: cap=2.2, cf=0.0, units=1
    // Greenpark Solar: cap=1.3, cf=0.0, units=1
    // Interstate Solar: cap=2.2, cf=0.0, units=1
    // Kaiser Creek Solar (CSG): cap=2.0, cf=0.0, units=1
    // Kale Patch Solar: cap=2.2, cf=0.0, units=1
    // Labish Solar, LLC: cap=2.2, cf=0.0, units=1
    // Milford Solar OR: cap=3.0, cf=0.0, units=1
    // Mill Creek Solar (OR): cap=2.2, cf=0.0, units=1
    // Minke Solar: cap=2.2, cf=0.0, units=1
    // Mt. Hope Solar: cap=2.5, cf=0.0, units=1
    // O'Neill Creek Solar: cap=2.2, cf=0.0, units=1
    // Oregon University System Rabbit Field: cap=1.2, cf=0.0, units=1
    // Palmer Creek Solar, LLC: cap=2.3, cf=0.0, units=1
    // Pika Solar: cap=2.2, cf=0.0, units=1
    // Rafael Solar: cap=2.2, cf=0.0, units=1
    // Red Prairie Solar: cap=2.2, cf=0.0, units=1
    // River Valley Solar: cap=1.9, cf=0.0, units=1
    // SSD Clackamas 1, LLC: cap=4.0, cf=0.0, units=1
    // SSD Clackamas 4, LLC: cap=2.0, cf=0.0, units=1
    // SSD Clackamas 7, LLC: cap=2.0, cf=0.0, units=1
    // SSD Marion 1, LLC: cap=2.0, cf=0.0, units=1
    // SSD Marion 3, LLC: cap=2.0, cf=0.0, units=1
    // SSD Marion 5, LLC: cap=2.0, cf=0.0, units=1
    // SSD Marion 6, LLC: cap=2.0, cf=0.0, units=1
    // Sandy River Solar (CSG): cap=1.9, cf=0.0, units=1
    // Sesqui-C Solar (CSG): cap=2.5, cf=0.0, units=1
    // Sheep Solar: cap=2.2, cf=0.0, units=1
    // Silverton Solar: cap=2.2, cf=0.0, units=1
    // St Louis Solar: cap=2.2, cf=0.0, units=1
    // Steel Bridge Solar, LLC: cap=2.3, cf=0.0, units=1
    // Sulus Solar 17: cap=3.1, cf=0.0, units=1
    // Sulus Solar 22: cap=3.0, cf=0.0, units=1
    // Sulus Solar 25: cap=2.2, cf=0.0, units=1
    // Sulus Solar 28: cap=3.0, cf=0.0, units=1
    // Sulus Solar 29: cap=2.6, cf=0.0, units=1
    // Sulus Solar 33: cap=3.0, cf=0.0, units=1
    // Sulus Solar 35: cap=3.0, cf=0.0, units=1
    // Thomas Creek Solar: cap=2.2, cf=0.0, units=1
    // Tickle Creek Solar: cap=1.9, cf=0.0, units=1
    // Valley Creek Solar: cap=2.2, cf=0.0, units=1
    // Williams Acres Solar: cap=2.5, cf=0.0, units=1
    // Yamhill Solar, LLC: cap=1.0, cf=0.0, units=1
    name "wecc240_psse_G_4203_PV";
    parent "wecc240_psse_G_4203";
    latitude 44.05;
    longitude -123.1;
    generator PV;
    operating_capacity 164.0 MW;
    startup_cost 0.0;
    shutdown_cost 0.0;
    fixed_cost 0.0;
    variable_cost 0.0;
    scarcity_cost 0.0;
}

object pypower.powerplant
{
    // EVERGREEN_BIOPOWER_LLC: cap=21.0, cf=0.026, units=1
    // GEORGIA-PACIFIC_TOLEDO_MILL: cap=37.3, cf=0.046, units=1
    // IP_SPRINGFIELD_OREGON: cap=65.0, cf=0.08, units=1
    // SENECA_SUSTAINABLE_ENERGY_LLC: cap=19.8, cf=0.024, units=1
    name "wecc240_psse_G_4203_ST";
    parent "wecc240_psse_G_4203";
    latitude 44.05;
    longitude -123.1;
    generator ST;
    operating_capacity 143.1 MW;
    startup_cost 6500.0;
    shutdown_cost 0.0;
    fixed_cost 1000.0;
    variable_cost 5.0;
    scarcity_cost 0.001;
}

object pypower.powerplant
{
    // Doerfler Farms: cap=0.25, cf=0.0, units=1
    name "wecc240_psse_G_4203_WT";
    parent "wecc240_psse_G_4203";
    latitude 44.05;
    longitude -123.1;
    generator WT;
    operating_capacity 0.25 MW;
    startup_cost 0.0;
    shutdown_cost 0.0;
    fixed_cost 0.0;
    variable_cost 0.0;
    scarcity_cost 0.0;
}

object pypower.gen
{
    name "wecc240_psse_G_4004";
    parent "wecc240_psse_N_4004";
    Pmax 731.9 MW;
    Qmax 146.4 MW;
    Qmin -146.4 MW;
    status IN_SERVICE;
    object gencost
    {
        model POLYNOMIAL;
        startup 0.0 $;
        shutdown 0.0 $;
        costs "0.0,0.0,0.0";
    };
}
object pypower.powerplant
{
    // CARMEN_SMITH: cap=114.3, cf=0.156, units=1
    // PELTON: cap=109.8, cf=0.15, units=1
    // ROUND_BUTTE: cap=372.5, cf=0.509, units=1
    // WARM_SPRINGS_POWER_ENTERPRISES: cap=19.6, cf=0.027, units=1
    name "wecc240_psse_G_4004_HT";
    parent "wecc240_psse_G_4004";
    latitude 44.48;
    longitude -121.0;
    generator HT;
    operating_capacity 616.2 MW;
    startup_cost 0.0;
    shutdown_cost 0.0;
    fixed_cost 200.0;
    variable_cost 0.0;
    scarcity_cost 0.001;
}

object pypower.powerplant
{
    // Adams Solar Center: cap=10.0, cf=0.0, units=1
    // Bear Creek Solar Center: cap=10.0, cf=0.0, units=1
    // Elbe Solar Center: cap=10.0, cf=0.0, units=1
    // NorWest Energy 2, LLC: cap=9.9, cf=0.0, units=1
    // OSLH, LLC: cap=9.9, cf=0.0, units=1
    // Solar Star Oregon II: cap=56.0, cf=0.0, units=1
    // Tumbleweed Solar, LLC: cap=9.9, cf=0.0, units=1
    name "wecc240_psse_G_4004_PV";
    parent "wecc240_psse_G_4004";
    latitude 44.48;
    longitude -121.0;
    generator PV;
    operating_capacity 115.7 MW;
    startup_cost 0.0;
    shutdown_cost 0.0;
    fixed_cost 0.0;
    variable_cost 0.0;
    scarcity_cost 0.0;
}

object pypower.gen
{
    name "wecc240_psse_G_4003";
    parent "wecc240_psse_N_4003";
    Pmax 1908.1 MW;
    Qmax 381.6 MW;
    Qmin -381.6 MW;
    status IN_SERVICE;
    object gencost
    {
        model POLYNOMIAL;
        startup 0.0 $;
        shutdown 0.0 $;
        costs "0.0,0.0,0.0";
    };
}
object pypower.powerplant
{
    // LANGLEY_GULCH_POWER_PLANT: cap=318.5, cf=0.167, units=1
    name "wecc240_psse_G_4003_CC";
    parent "wecc240_psse_G_4003";
    latitude 43.77;
    longitude -118.8;
    generator CC;
    operating_capacity 318.5 MW;
    startup_cost 35.0;
    shutdown_cost 0.0;
    fixed_cost 500.0;
    variable_cost 50.0;
    scarcity_cost 0.001;
}

object pypower.powerplant
{
    // BLACK_CANYON: cap=10.2, cf=0.005, units=1
    // BROWNLEE: cap=675.0, cf=0.354, units=1
    // HELLS_CANYON: cap=391.5, cf=0.205, units=1
    // OXBOW: cap=190.0, cf=0.1, units=1
    name "wecc240_psse_G_4003_HT";
    parent "wecc240_psse_G_4003";
    latitude 43.77;
    longitude -118.8;
    generator HT;
    operating_capacity 1266.7 MW;
    startup_cost 0.0;
    shutdown_cost 0.0;
    fixed_cost 200.0;
    variable_cost 0.0;
    scarcity_cost 0.001;
}

object pypower.powerplant
{
    // Baker City Solar: cap=15.0, cf=0.0, units=1
    // Brush Solar Center: cap=2.8, cf=0.0, units=1
    // Grove Solar Center, LLC: cap=6.0, cf=0.0, units=1
    // Hyline Solar Center, LLC: cap=9.0, cf=0.0, units=1
    // Morgan Solar Center: cap=3.0, cf=0.0, units=1
    // Murphy Flat Solar: cap=20.0, cf=0.0, units=1
    // Ontario Solar Center: cap=3.0, cf=0.0, units=1
    // Open Range Solar Center, LLC: cap=10.0, cf=0.0, units=1
    // Railroad Solar Center, LLC: cap=4.5, cf=0.0, units=1
    // Riley: cap=10.0, cf=0.0, units=1
    // Starvation: cap=9.9, cf=0.0, units=1
    // Suntex Solar, LLC: cap=10.0, cf=0.0, units=1
    // Thunderegg Solar Center, LLC: cap=10.0, cf=0.0, units=1
    // Vale Air Solar Center, LLC: cap=10.0, cf=0.0, units=1
    // Vale Solar Center: cap=3.0, cf=0.0, units=1
    // West Hines Solar I, LLC: cap=10.0, cf=0.0, units=1
    name "wecc240_psse_G_4003_PV";
    parent "wecc240_psse_G_4003";
    latitude 43.77;
    longitude -118.8;
    generator PV;
    operating_capacity 136.2 MW;
    startup_cost 0.0;
    shutdown_cost 0.0;
    fixed_cost 0.0;
    variable_cost 0.0;
    scarcity_cost 0.0;
}

object pypower.powerplant
{
    // NEAL_HOT_SPRINGS_GEOTHERMAL_PROJECT: cap=33.0, cf=0.017, units=1
    name "wecc240_psse_G_4003_ST";
    parent "wecc240_psse_G_4003";
    latitude 43.77;
    longitude -118.8;
    generator ST;
    operating_capacity 33.0 MW;
    startup_cost 6500.0;
    shutdown_cost 0.0;
    fixed_cost 1000.0;
    variable_cost 5.0;
    scarcity_cost 0.001;
}

object pypower.powerplant
{
    // Benson Creek: cap=10.0, cf=0.0, units=5
    // Durbin Creek: cap=10.0, cf=0.0, units=5
    // Elkhorn Valley (08): cap=3.3, cf=0.0, units=2
    // Elkhorn Valley (La Grande): cap=97.35, cf=0.0, units=59
    // Jett Creek: cap=10.0, cf=0.0, units=5
    // Lime Wind: cap=3.0, cf=0.0, units=6
    // Prospector: cap=10.0, cf=0.0, units=5
    // Willow Spring: cap=10.0, cf=0.0, units=5
    name "wecc240_psse_G_4003_WT";
    parent "wecc240_psse_G_4003";
    latitude 43.77;
    longitude -118.8;
    generator WT;
    operating_capacity 153.65 MW;
    startup_cost 0.0;
    shutdown_cost 0.0;
    fixed_cost 0.0;
    variable_cost 0.0;
    scarcity_cost 0.0;
}

object pypower.gen
{
    name "wecc240_psse_G_6403";
    parent "wecc240_psse_N_6403";
    Pmax 126.0 MW;
    Qmax 25.2 MW;
    Qmin -25.2 MW;
    status IN_SERVICE;
    object gencost
    {
        model POLYNOMIAL;
        startup 0.0 $;
        shutdown 0.0 $;
        costs "0.0,0.0,0.0";
    };
}
object pypower.powerplant
{
    // SWAN_FALLS: cap=25.0, cf=0.198, units=1
    name "wecc240_psse_G_6403_HT";
    parent "wecc240_psse_G_6403";
    latitude 41.18;
    longitude -117.0;
    generator HT;
    operating_capacity 25.0 MW;
    startup_cost 0.0;
    shutdown_cost 0.0;
    fixed_cost 200.0;
    variable_cost 0.0;
    scarcity_cost 0.001;
}

object pypower.powerplant
{
    // Battle Mountain Solar Project: cap=101.0, cf=0.0, units=1
    name "wecc240_psse_G_6403_PV";
    parent "wecc240_psse_G_6403";
    latitude 41.18;
    longitude -117.0;
    generator PV;
    operating_capacity 101.0 MW;
    startup_cost 0.0;
    shutdown_cost 0.0;
    fixed_cost 0.0;
    variable_cost 0.0;
    scarcity_cost 0.0;
}

object pypower.gen
{
    name "wecc240_psse_G_2604";
    parent "wecc240_psse_N_2604";
    Pmax 2000.3 MW;
    Qmax 400.1 MW;
    Qmin -400.1 MW;
    status IN_SERVICE;
    object gencost
    {
        model POLYNOMIAL;
        startup 0.0 $;
        shutdown 0.0 $;
        costs "0.0,0.0,0.0";
    };
}
object pypower.powerplant
{
    // INTERMOUNTAIN_POWER_PROJECT: cap=820.0, cf=0.41, units=1
    name "wecc240_psse_G_2604_CC";
    parent "wecc240_psse_G_2604";
    latitude 39.5;
    longitude -112.6;
    generator CC;
    operating_capacity 820.0 MW;
    startup_cost 35.0;
    shutdown_cost 0.0;
    fixed_cost 500.0;
    variable_cost 50.0;
    scarcity_cost 0.001;
}

object pypower.powerplant
{
    // Pavant Solar II, LLC: cap=50.0, cf=0.0, units=1
    // Pavant Solar III: cap=20.0, cf=0.0, units=1
    // Pavant Solar, LLC: cap=50.0, cf=0.0, units=1
    name "wecc240_psse_G_2604_PV";
    parent "wecc240_psse_G_2604";
    latitude 39.5;
    longitude -112.6;
    generator PV;
    operating_capacity 120.0 MW;
    startup_cost 0.0;
    shutdown_cost 0.0;
    fixed_cost 0.0;
    variable_cost 0.0;
    scarcity_cost 0.0;
}

object pypower.powerplant
{
    // INTERMOUNTAIN_POWER_PROJECT: cap=820.0, cf=0.41, units=1
    name "wecc240_psse_G_2604_ST";
    parent "wecc240_psse_G_2604";
    latitude 39.5;
    longitude -112.6;
    generator ST;
    operating_capacity 820.0 MW;
    startup_cost 6500.0;
    shutdown_cost 0.0;
    fixed_cost 1000.0;
    variable_cost 5.0;
    scarcity_cost 0.001;
}

object pypower.powerplant
{
    // Milford Phase II: cap=88.5, cf=0.0, units=59
    // Spring Valley: cap=151.79999999999998, cf=0.0, units=66
    name "wecc240_psse_G_2604_WT";
    parent "wecc240_psse_G_2604";
    latitude 39.5;
    longitude -112.6;
    generator WT;
    operating_capacity 240.3 MW;
    startup_cost 0.0;
    shutdown_cost 0.0;
    fixed_cost 0.0;
    variable_cost 0.0;
    scarcity_cost 0.0;
}

object pypower.gen
{
    name "wecc240_psse_G_6101";
    parent "wecc240_psse_N_6101";
    Pmax 1785.0 MW;
    Qmax 357.0 MW;
    Qmin -357.0 MW;
    status IN_SERVICE;
    object gencost
    {
        model POLYNOMIAL;
        startup 0.0 $;
        shutdown 0.0 $;
        costs "0.0,0.0,0.0";
    };
}
object pypower.powerplant
{
    // BENNETT_MOUNTAIN: cap=172.8, cf=0.097, units=1
    // EVANDER_ANDREWS_POWER_COMPLEX: cap=270.9, cf=0.152, units=1
    name "wecc240_psse_G_6101_CT";
    parent "wecc240_psse_G_6101";
    latitude 42.89;
    longitude -114.2;
    generator CT;
    operating_capacity 443.7 MW;
    startup_cost 25.0;
    shutdown_cost 0.0;
    fixed_cost 350.0;
    variable_cost 75.0;
    scarcity_cost 0.001;
}

object pypower.powerplant
{
    // ANDERSON_RANCH: cap=40.0, cf=0.022, units=1
    // ARROWROCK_HYDROELECTRIC_PROJECT: cap=15.0, cf=0.008, units=1
    // BLISS: cap=75.0, cf=0.042, units=1
    // CASCADE: cap=12.4, cf=0.007, units=1
    // C_J_STRIKE: cap=82.8, cf=0.046, units=1
    // LOWER_MALAD: cap=13.5, cf=0.008, units=1
    // LOWER_SALMON: cap=60.0, cf=0.034, units=1
    // LUCKY_PEAK_POWER_PLANT_PROJECT: cap=101.2, cf=0.057, units=1
    // MILNER_HYDRO: cap=59.5, cf=0.033, units=1
    // SHOSHONE_FALLS: cap=11.5, cf=0.006, units=1
    // TWIN_FALLS: cap=52.7, cf=0.03, units=1
    // UPPER_SALMON_A: cap=18.0, cf=0.01, units=1
    // UPPER_SALMON_B: cap=16.5, cf=0.009, units=1
    name "wecc240_psse_G_6101_HT";
    parent "wecc240_psse_G_6101";
    latitude 42.89;
    longitude -114.2;
    generator HT;
    operating_capacity 558.1 MW;
    startup_cost 0.0;
    shutdown_cost 0.0;
    fixed_cost 200.0;
    variable_cost 0.0;
    scarcity_cost 0.001;
}

object pypower.powerplant
{
    // Black Mesa Solar, LLC: cap=40.0, cf=0.0, units=1
    // Clif Bar Bakery of Twin Falls: cap=2.0, cf=0.0, units=1
    // Grand View Solar Two: cap=80.0, cf=0.0, units=1
    // ID Solar: cap=40.0, cf=0.0, units=1
    // Jackpot Solar, LLC: cap=120.0, cf=0.0, units=1
    // Mt. Home Solar 1, LLC: cap=20.0, cf=0.0, units=1
    // Orchard Ranch Solar: cap=20.0, cf=0.0, units=1
    // Simcoe Solar: cap=20.0, cf=0.0, units=1
    name "wecc240_psse_G_6101_PV";
    parent "wecc240_psse_G_6101";
    latitude 42.89;
    longitude -114.2;
    generator PV;
    operating_capacity 342.0 MW;
    startup_cost 0.0;
    shutdown_cost 0.0;
    fixed_cost 0.0;
    variable_cost 0.0;
    scarcity_cost 0.0;
}

object pypower.powerplant
{
    // AMALGAMATED_SUGAR_TWIN_FALLS: cap=10.2, cf=0.006, units=1
    name "wecc240_psse_G_6101_ST";
    parent "wecc240_psse_G_6101";
    latitude 42.89;
    longitude -114.2;
    generator ST;
    operating_capacity 10.2 MW;
    startup_cost 6500.0;
    shutdown_cost 0.0;
    fixed_cost 1000.0;
    variable_cost 5.0;
    scarcity_cost 0.001;
}

object pypower.powerplant
{
    // Camp Reed: cap=22.5, cf=0.0, units=15
    // Cassia: cap=29.400000000000002, cf=0.0, units=14
    // Cold Springs: cap=138.0, cf=0.0, units=60
    // Fossil Gulch: cap=10.5, cf=0.0, units=7
    // High Mesa: cap=39.9, cf=0.0, units=19
    // Mountain Home: cap=42.0, cf=0.0, units=20
    // Oregon Trail: cap=13.5, cf=0.0, units=9
    // Payne's Ferry: cap=21.0, cf=0.0, units=14
    // Pilgrim Stage Station: cap=10.5, cf=0.0, units=7
    // Salmon Falls: cap=21.0, cf=0.0, units=14
    // Sawtooth: cap=22.400000000000002, cf=0.0, units=14
    // Thousand Springs: cap=12.0, cf=0.0, units=8
    // Tuana Gulch: cap=10.5, cf=0.0, units=7
    // Tuana Springs: cap=16.8, cf=0.0, units=8
    // Yahoo Creek: cap=21.0, cf=0.0, units=14
    name "wecc240_psse_G_6101_WT";
    parent "wecc240_psse_G_6101";
    latitude 42.89;
    longitude -114.2;
    generator WT;
    operating_capacity 431.0 MW;
    startup_cost 0.0;
    shutdown_cost 0.0;
    fixed_cost 0.0;
    variable_cost 0.0;
    scarcity_cost 0.0;
}

object pypower.gen
{
    name "wecc240_psse_G_6103";
    parent "wecc240_psse_N_6103";
    Pmax 918.7 MW;
    Qmax 183.7 MW;
    Qmin -183.7 MW;
    status IN_SERVICE;
    object gencost
    {
        model POLYNOMIAL;
        startup 0.0 $;
        shutdown 0.0 $;
        costs "0.0,0.0,0.0";
    };
}
object pypower.powerplant
{
    // SIMPLOT_LEASING_DON_PLANT: cap=15.9, cf=0.017, units=1
    name "wecc240_psse_G_6103_CT";
    parent "wecc240_psse_G_6103";
    latitude 42.83;
    longitude -113.4;
    generator CT;
    operating_capacity 15.9 MW;
    startup_cost 25.0;
    shutdown_cost 0.0;
    fixed_cost 350.0;
    variable_cost 75.0;
    scarcity_cost 0.001;
}

object pypower.powerplant
{
    // AMERICAN_FALLS: cap=92.4, cf=0.101, units=1
    // GEM_STATE: cap=23.4, cf=0.025, units=1
    // MINIDOKA: cap=27.7, cf=0.03, units=1
    name "wecc240_psse_G_6103_HT";
    parent "wecc240_psse_G_6103";
    latitude 42.83;
    longitude -113.4;
    generator HT;
    operating_capacity 143.5 MW;
    startup_cost 0.0;
    shutdown_cost 0.0;
    fixed_cost 200.0;
    variable_cost 0.0;
    scarcity_cost 0.001;
}

object pypower.powerplant
{
    // American Falls Solar: cap=20.0, cf=0.0, units=1
    // American Falls Solar II: cap=20.0, cf=0.0, units=1
    name "wecc240_psse_G_6103_PV";
    parent "wecc240_psse_G_6103";
    latitude 42.83;
    longitude -113.4;
    generator PV;
    operating_capacity 40.0 MW;
    startup_cost 0.0;
    shutdown_cost 0.0;
    fixed_cost 0.0;
    variable_cost 0.0;
    scarcity_cost 0.0;
}

object pypower.powerplant
{
    // RAFT_RIVER_GEOTHERMAL_POWER_PLANT: cap=18.0, cf=0.02, units=1
    name "wecc240_psse_G_6103_ST";
    parent "wecc240_psse_G_6103";
    latitude 42.83;
    longitude -113.4;
    generator ST;
    operating_capacity 18.0 MW;
    startup_cost 6500.0;
    shutdown_cost 0.0;
    fixed_cost 1000.0;
    variable_cost 5.0;
    scarcity_cost 0.001;
}

object pypower.powerplant
{
    // Burley Butte: cap=19.5, cf=0.0, units=13
    // Cedar Creek Wind: cap=159.79999999999998, cf=0.0, units=47
    // Golden Valley: cap=12.0, cf=0.0, units=8
    // Goshen North: cap=124.5, cf=0.0, units=83
    // Horse Butte: cap=57.6, cf=0.0, units=32
    // Meadow Creek: cap=119.7, cf=0.0, units=57
    // Milner Dam: cap=19.5, cf=0.0, units=13
    // Power County: cap=45.0, cf=0.0, units=18
    // Rockland: cap=79.2, cf=0.0, units=44
    // Wolverine Creek: cap=64.5, cf=0.0, units=43
    name "wecc240_psse_G_6103_WT";
    parent "wecc240_psse_G_6103";
    latitude 42.83;
    longitude -113.4;
    generator WT;
    operating_capacity 701.3 MW;
    startup_cost 0.0;
    shutdown_cost 0.0;
    fixed_cost 0.0;
    variable_cost 0.0;
    scarcity_cost 0.0;
}

object pypower.gen
{
    name "wecc240_psse_G_1402";
    parent "wecc240_psse_N_1402";
    Pmax 9066.4 MW;
    Qmax 1813.3 MW;
    Qmin -1813.3 MW;
    status IN_SERVICE;
    object gencost
    {
        model POLYNOMIAL;
        startup 0.0 $;
        shutdown 0.0 $;
        costs "0.0,0.0,0.0";
    };
}
object pypower.powerplant
{
    // DESERT_BASIN: cap=646.1, cf=0.071, units=1
    // KYRENE: cap=191.2, cf=0.021, units=1
    // SANTAN: cap=1326.0, cf=0.146, units=1
    // WEST_PHOENIX: cap=402.5, cf=0.044, units=1
    name "wecc240_psse_G_1402_CC";
    parent "wecc240_psse_G_1402";
    latitude 34.07;
    longitude -112.4;
    generator CC;
    operating_capacity 2565.8 MW;
    startup_cost 35.0;
    shutdown_cost 0.0;
    fixed_cost 500.0;
    variable_cost 50.0;
    scarcity_cost 0.001;
}

object pypower.powerplant
{
    // AGUA_FRIA: cap=306.8, cf=0.034, units=1
    // COOLIDGE_GENERATION_STATION: cap=726.0, cf=0.08, units=1
    // DEMOSS_PETRIE: cap=85.0, cf=0.009, units=1
    // H_WILSON_SUNDT_GENERATING_STATION: cap=279.2, cf=0.031, units=1
    // KYRENE: cap=191.2, cf=0.021, units=1
    // NORTH_LOOP: cap=107.8, cf=0.012, units=1
    // OCOTILLO: cap=166.7, cf=0.018, units=1
    // SAGUARO: cap=92.2, cf=0.01, units=1
    // SUNDANCE: cap=605.0, cf=0.067, units=1
    // WEST_PHOENIX: cap=402.5, cf=0.044, units=1
    name "wecc240_psse_G_1402_CT";
    parent "wecc240_psse_G_1402";
    latitude 34.07;
    longitude -112.4;
    generator CT;
    operating_capacity 2962.4 MW;
    startup_cost 25.0;
    shutdown_cost 0.0;
    fixed_cost 350.0;
    variable_cost 75.0;
    scarcity_cost 0.001;
}

object pypower.powerplant
{
    // IRON_HORSE_BATTERY_STORAGE: cap=12.0, cf=0.001, units=1
    // PIMA_ENERGY_STORAGE_SYSTEM: cap=10.0, cf=0.001, units=1
    name "wecc240_psse_G_1402_ES";
    parent "wecc240_psse_G_1402";
    latitude 34.07;
    longitude -112.4;
    generator ES;
    operating_capacity 22.0 MW;
    startup_cost 0.0;
    shutdown_cost 0.0;
    fixed_cost 0.0;
    variable_cost 5.0;
    scarcity_cost 0.0;
}

object pypower.powerplant
{
    // HORSE_MESA: cap=129.5, cf=0.014, units=1
    // MORMON_FLAT: cap=63.5, cf=0.007, units=1
    // ROOSEVELT: cap=36.0, cf=0.004, units=1
    // STEWART_MOUNTAIN: cap=13.0, cf=0.001, units=1
    // WADDELL: cap=40.0, cf=0.004, units=1
    name "wecc240_psse_G_1402_HT";
    parent "wecc240_psse_G_1402";
    latitude 34.07;
    longitude -112.4;
    generator HT;
    operating_capacity 282.0 MW;
    startup_cost 0.0;
    shutdown_cost 0.0;
    fixed_cost 200.0;
    variable_cost 0.0;
    scarcity_cost 0.001;
}

object pypower.powerplant
{
    // Arlington Valley Solar Energy II: cap=129.0, cf=0.0, units=1
    // Avalon Solar: cap=29.0, cf=0.0, units=1
    // Avalon Solar II: cap=16.0, cf=0.0, units=1
    // Avra Valley Solar: cap=26.46, cf=0.0, units=1
    // Badger 1: cap=14.8, cf=0.0, units=1
    // Bonnybrooke PV: cap=50.0, cf=0.0, units=1
    // Broadway 2 - Tucson Phase II: cap=3.0, cf=0.0, units=1
    // Buckeye Union HS District 201: cap=3.3, cf=0.0, units=1
    // Chino Solar Valley: cap=19.0, cf=0.0, units=1
    // Cogenra-TEP: cap=1.0, cf=0.0, units=1
    // Cotton Center Solar Hybrid: cap=17.0, cf=0.0, units=1
    // Davis Monthan AFB (AZ) West Airfield: cap=12.6, cf=0.0, units=1
    // Desert Star Hybrid: cap=11.2, cf=0.0, units=1
    // East Line Solar: cap=100.0, cf=0.0, units=1
    // FRB Solar Farm: cap=1.9, cf=0.0, units=1
    // Gato Montes Solar, LLC: cap=5.0, cf=0.0, units=1
    // Gila Bend Hybrid: cap=37.12, cf=0.0, units=1
    // Gilbert Solar Facility I, LLC: cap=2.5, cf=0.0, units=1
    // Iron Horse Battery Storage Hybrid: cap=2.0, cf=0.0, units=1
    // Lake Pleasant WTP: cap=6.0, cf=0.0, units=1
    // Luke Solar: cap=11.2, cf=0.0, units=1
    // Mesa Solar Array: cap=4.0, cf=0.0, units=1
    // Mesquite Solar 1: cap=170.0, cf=0.0, units=1
    // Mesquite Solar 2, LLC: cap=100.8, cf=0.0, units=1
    // Mesquite Solar 3, LLC: cap=154.0, cf=0.0, units=1
    // Mesquite Solar 5, LLC: cap=60.0, cf=0.0, units=1
    // Paloma Solar Hybrid: cap=17.6, cf=0.0, units=1
    // Picture Rocks Solar, LLC: cap=20.0, cf=0.0, units=1
    // Pinal Central Energy Center Hybrid: cap=20.0, cf=0.0, units=1
    // Poseidon Solar, LLC: cap=20.0, cf=0.0, units=1
    // Prairie Fire: cap=4.5, cf=0.0, units=1
    // Prescott Airport: cap=3.0, cf=0.0, units=1
    // Prescott Solar Plant: cap=10.4, cf=0.0, units=1
    // Queen Creek Solar Farm: cap=19.0, cf=0.0, units=1
    // RE Ajo 1, LLC: cap=4.5, cf=0.0, units=1
    // RE Bagdad Solar I, LLC: cap=15.0, cf=0.0, units=1
    // Raptor Ridge: cap=12.5, cf=0.0, units=1
    // Red Rock: cap=40.0, cf=0.0, units=1
    // Rio Rico Solar: cap=6.0, cf=0.0, units=1
    // Roger Road WWTP: cap=0.9, cf=0.0, units=1
    // Saddle Mountain Solar I: cap=15.0, cf=0.0, units=1
    // Saint Solar: cap=100.0, cf=0.0, units=1
    // Sandstone Solar: cap=45.0, cf=0.0, units=1
    // Sun Streams 2: cap=150.0, cf=0.0, units=1
    // Sun Streams, LLC: cap=158.0, cf=0.0, units=1
    // Tech Park Solar: cap=5.1, cf=0.0, units=1
    // UASTP I: cap=1.2, cf=0.0, units=1
    // Valencia Solar: cap=9.0, cf=0.0, units=1
    // Walmart Casa Grande: cap=2.0, cf=0.0, units=1
    // Wilmot Energy Center, LLC: cap=130.0, cf=0.0, units=1
    name "wecc240_psse_G_1402_PV";
    parent "wecc240_psse_G_1402";
    latitude 34.07;
    longitude -112.4;
    generator PV;
    operating_capacity 1795.58 MW;
    startup_cost 0.0;
    shutdown_cost 0.0;
    fixed_cost 0.0;
    variable_cost 0.0;
    scarcity_cost 0.0;
}

object pypower.powerplant
{
    // AGUA_FRIA: cap=306.8, cf=0.034, units=1
    // H_WILSON_SUNDT_GENERATING_STATION: cap=279.2, cf=0.031, units=1
    // KYRENE: cap=191.2, cf=0.021, units=1
    // OCOTILLO: cap=166.7, cf=0.018, units=1
    // SAGUARO: cap=92.2, cf=0.01, units=1
    // WEST_PHOENIX: cap=402.5, cf=0.044, units=1
    name "wecc240_psse_G_1402_ST";
    parent "wecc240_psse_G_1402";
    latitude 34.07;
    longitude -112.4;
    generator ST;
    operating_capacity 1438.6 MW;
    startup_cost 6500.0;
    shutdown_cost 0.0;
    fixed_cost 1000.0;
    variable_cost 5.0;
    scarcity_cost 0.001;
}

object pypower.gen
{
    name "wecc240_psse_G_1102";
    parent "wecc240_psse_N_1102";
    Pmax 1928.6 MW;
    Qmax 385.7 MW;
    Qmin -385.7 MW;
    status IN_SERVICE;
    object gencost
    {
        model POLYNOMIAL;
        startup 0.0 $;
        shutdown 0.0 $;
        costs "0.0,0.0,0.0";
    };
}
object pypower.powerplant
{
    // APACHE_STATION: cap=330.4, cf=0.171, units=1
    name "wecc240_psse_G_1102_CT";
    parent "wecc240_psse_G_1102";
    latitude 34.94;
    longitude -110.3;
    generator CT;
    operating_capacity 330.4 MW;
    startup_cost 25.0;
    shutdown_cost 0.0;
    fixed_cost 350.0;
    variable_cost 75.0;
    scarcity_cost 0.001;
}

object pypower.powerplant
{
    // Apache Solar 1: cap=20.0, cf=0.0, units=1
    // Fort Huachuca Solar PV Project: cap=17.7, cf=0.0, units=1
    // Kayenta Solar Project: cap=55.3, cf=0.0, units=1
    // Red Horse 2: cap=55.0, cf=0.0, units=1
    // Red Horse III: cap=30.0, cf=0.0, units=1
    // Sulphur Springs: cap=20.5, cf=0.0, units=1
    name "wecc240_psse_G_1102_PV";
    parent "wecc240_psse_G_1102";
    latitude 34.94;
    longitude -110.3;
    generator PV;
    operating_capacity 198.5 MW;
    startup_cost 0.0;
    shutdown_cost 0.0;
    fixed_cost 0.0;
    variable_cost 0.0;
    scarcity_cost 0.0;
}

object pypower.powerplant
{
    // APACHE_STATION: cap=330.4, cf=0.171, units=1
    // CHOLLA: cap=839.9, cf=0.435, units=1
    // DOUGLAS: cap=26.1, cf=0.014, units=1
    // NOVO_BIOPOWER_PLANT: cap=27.2, cf=0.014, units=1
    name "wecc240_psse_G_1102_ST";
    parent "wecc240_psse_G_1102";
    latitude 34.94;
    longitude -110.3;
    generator ST;
    operating_capacity 1223.6 MW;
    startup_cost 6500.0;
    shutdown_cost 0.0;
    fixed_cost 1000.0;
    variable_cost 5.0;
    scarcity_cost 0.001;
}

object pypower.powerplant
{
    // Chevelon Butte Wind Phase I: cap=18.0, cf=0.0, units=4
    // Dry Lake: cap=63.0, cf=0.0, units=30
    // Dry Lake II: cap=65.10000000000001, cf=0.0, units=31
    // Red Horse 2: cap=30.0, cf=0.0, units=15
    name "wecc240_psse_G_1102_WT";
    parent "wecc240_psse_G_1102";
    latitude 34.94;
    longitude -110.3;
    generator WT;
    operating_capacity 176.1 MW;
    startup_cost 0.0;
    shutdown_cost 0.0;
    fixed_cost 0.0;
    variable_cost 0.0;
    scarcity_cost 0.0;
}

object pypower.gen
{
    name "wecc240_psse_G_1101";
    parent "wecc240_psse_N_1101";
    Pmax 4674.8 MW;
    Qmax 935.0 MW;
    Qmin -935.0 MW;
    status IN_SERVICE;
    object gencost
    {
        model POLYNOMIAL;
        startup 0.0 $;
        shutdown 0.0 $;
        costs "0.0,0.0,0.0";
    };
}
object pypower.powerplant
{
    // AFTON_GENERATING_STATION: cap=287.0, cf=0.061, units=1
    // LUNA_ENERGY_FACILITY: cap=650.0, cf=0.139, units=1
    name "wecc240_psse_G_1101_CC";
    parent "wecc240_psse_G_1101";
    latitude 35.13;
    longitude -109.7;
    generator CC;
    operating_capacity 937.0 MW;
    startup_cost 35.0;
    shutdown_cost 0.0;
    fixed_cost 500.0;
    variable_cost 50.0;
    scarcity_cost 0.001;
}

object pypower.powerplant
{
    // LORDSBURG_GENERATING: cap=88.0, cf=0.019, units=1
    // PYRAMID: cap=186.0, cf=0.04, units=1
    // RIO_GRANDE: cap=186.2, cf=0.04, units=1
    name "wecc240_psse_G_1101_CT";
    parent "wecc240_psse_G_1101";
    latitude 35.13;
    longitude -109.7;
    generator CT;
    operating_capacity 460.2 MW;
    startup_cost 25.0;
    shutdown_cost 0.0;
    fixed_cost 350.0;
    variable_cost 75.0;
    scarcity_cost 0.001;
}

object pypower.powerplant
{
    // ELEPHANT_BUTTE: cap=27.9, cf=0.006, units=1
    name "wecc240_psse_G_1101_HT";
    parent "wecc240_psse_G_1101";
    latitude 35.13;
    longitude -109.7;
    generator HT;
    operating_capacity 27.9 MW;
    startup_cost 0.0;
    shutdown_cost 0.0;
    fixed_cost 200.0;
    variable_cost 0.0;
    scarcity_cost 0.001;
}

object pypower.powerplant
{
    // Alamogordo Solar Energy Center: cap=4.9, cf=0.0, units=1
    // Alta Luna: cap=28.1, cf=0.0, units=1
    // Buena Vista Energy Center: cap=120.0, cf=0.0, units=1
    // City of Truth or Consequences PV: cap=1.9, cf=0.0, units=1
    // Columbus Solar Project: cap=1.9, cf=0.0, units=1
    // Deming Solar Energy Center: cap=9.0, cf=0.0, units=1
    // Fort Bliss (DEA EPIC): cap=2.0, cf=0.0, units=1
    // Hatch Solar Energy Center I, LLC: cap=5.04, cf=0.0, units=1
    // Holloman Solar Facility: cap=5.0, cf=0.0, units=1
    // Macho Springs: cap=52.2, cf=0.0, units=1
    // Montana Solar Facility: cap=3.0, cf=0.0, units=1
    // Newman Solar: cap=10.42, cf=0.0, units=1
    // Otero Solar: cap=7.5, cf=0.0, units=1
    // Roadrunner Solar: cap=20.16, cf=0.0, units=1
    // Silver City WWTP PV Project: cap=1.0, cf=0.0, units=1
    // Springerville: cap=13.62, cf=0.0, units=1
    // SunE EPE1, LLC: cap=10.0, cf=0.0, units=1
    // SunE EPE2, LLC: cap=12.0, cf=0.0, units=1
    // WSMR I: cap=4.6, cf=0.0, units=1
    name "wecc240_psse_G_1101_PV";
    parent "wecc240_psse_G_1101";
    latitude 35.13;
    longitude -109.7;
    generator PV;
    operating_capacity 312.34 MW;
    startup_cost 0.0;
    shutdown_cost 0.0;
    fixed_cost 0.0;
    variable_cost 0.0;
    scarcity_cost 0.0;
}

object pypower.powerplant
{
    // CORONADO: cap=821.8, cf=0.176, units=1
    // RIO_GRANDE: cap=186.2, cf=0.04, units=1
    // SPRINGERVILLE: cap=1779.2, cf=0.381, units=1
    name "wecc240_psse_G_1101_ST";
    parent "wecc240_psse_G_1101";
    latitude 35.13;
    longitude -109.7;
    generator ST;
    operating_capacity 2787.2 MW;
    startup_cost 6500.0;
    shutdown_cost 0.0;
    fixed_cost 1000.0;
    variable_cost 5.0;
    scarcity_cost 0.001;
}

object pypower.powerplant
{
    // Borderlands: cap=99.8, cf=0.0, units=34
    // Macho Springs Wind Farm I: cap=50.4, cf=0.0, units=28
    name "wecc240_psse_G_1101_WT";
    parent "wecc240_psse_G_1101";
    latitude 35.13;
    longitude -109.7;
    generator WT;
    operating_capacity 150.2 MW;
    startup_cost 0.0;
    shutdown_cost 0.0;
    fixed_cost 0.0;
    variable_cost 0.0;
    scarcity_cost 0.0;
}

object pypower.gen
{
    name "wecc240_psse_G_1201";
    parent "wecc240_psse_N_1201";
    Pmax 699.2 MW;
    Qmax 139.8 MW;
    Qmin -139.8 MW;
    status IN_SERVICE;
    object gencost
    {
        model POLYNOMIAL;
        startup 0.0 $;
        shutdown 0.0 $;
        costs "0.0,0.0,0.0";
    };
}
object pypower.powerplant
{
    // Babbitt Ranch Wind: cap=162.96, cf=0.0, units=50
    // Chevelon Butte Wind Phase I: cap=221.0, cf=0.0, units=53
    // Chevelon Butte Wind Phase II: cap=216.0, cf=0.0, units=48
    // Perrin Ranch: cap=99.2, cf=0.0, units=62
    name "wecc240_psse_G_1201_WT";
    parent "wecc240_psse_G_1201";
    latitude 35.98;
    longitude -111.1;
    generator WT;
    operating_capacity 699.16 MW;
    startup_cost 0.0;
    shutdown_cost 0.0;
    fixed_cost 0.0;
    variable_cost 0.0;
    scarcity_cost 0.0;
}

object pypower.gen
{
    name "wecc240_psse_G_1202";
    parent "wecc240_psse_N_1202";
    Pmax 1312.0 MW;
    Qmax 262.4 MW;
    Qmin -262.4 MW;
    status IN_SERVICE;
    object gencost
    {
        model POLYNOMIAL;
        startup 0.0 $;
        shutdown 0.0 $;
        costs "0.0,0.0,0.0";
    };
}
object pypower.powerplant
{
    // GLEN_CANYON_DAM: cap=1312.0, cf=1.0, units=1
    name "wecc240_psse_G_1202_HT";
    parent "wecc240_psse_G_1202";
    latitude 36.96;
    longitude -110.9;
    generator HT;
    operating_capacity 1312.0 MW;
    startup_cost 0.0;
    shutdown_cost 0.0;
    fixed_cost 200.0;
    variable_cost 0.0;
    scarcity_cost 0.001;
}

object pypower.gen
{
    name "wecc240_psse_G_6507";
    parent "wecc240_psse_N_6507";
    Pmax 2974.6 MW;
    Qmax 594.9 MW;
    Qmin -594.9 MW;
    status IN_SERVICE;
    object gencost
    {
        model POLYNOMIAL;
        startup 0.0 $;
        shutdown 0.0 $;
        costs "0.0,0.0,0.0";
    };
}
object pypower.powerplant
{
    // Beryl Solar Plant: cap=3.0, cf=0.0, units=1
    // Buckhorn Solar Plant: cap=3.0, cf=0.0, units=1
    // Cedar Valley Solar Plant: cap=3.0, cf=0.0, units=1
    // Cove Mountain Solar: cap=58.0, cf=0.0, units=1
    // Cove Mountain Solar 2: cap=122.0, cf=0.0, units=1
    // Enterprise Solar, LLC: cap=80.0, cf=0.0, units=1
    // Escalante Solar I, LLC: cap=80.02, cf=0.0, units=1
    // Escalante Solar II, LLC: cap=80.02, cf=0.0, units=1
    // Escalante Solar III, LLC: cap=80.02, cf=0.0, units=1
    // Fiddler's Canyon #1: cap=3.0, cf=0.0, units=1
    // Fiddler's Canyon #2: cap=6.0, cf=0.0, units=2
    // Fiddler's Canyon #3: cap=3.0, cf=0.0, units=1
    // Granite Mountain Solar East, LLC: cap=80.0, cf=0.0, units=1
    // Granite Mountain Solar West, LLC: cap=50.4, cf=0.0, units=1
    // Granite Peak Solar Plant: cap=3.0, cf=0.0, units=1
    // Greenville Solar Plant: cap=2.2, cf=0.0, units=1
    // Iron Springs Solar, LLC: cap=80.02, cf=0.0, units=1
    // Laho Solar Plant: cap=3.0, cf=0.0, units=1
    // Milford 2: cap=3.0, cf=0.0, units=1
    // Milford Flat Solar Plant: cap=3.0, cf=0.0, units=1
    // Milford Solar 1: cap=99.0, cf=0.0, units=1
    // Quichapa 1: cap=3.0, cf=0.0, units=1
    // Quichapa 2: cap=3.0, cf=0.0, units=1
    // Quichapa 3: cap=3.0, cf=0.0, units=1
    // Sigurd Solar LLC: cap=80.0, cf=0.0, units=1
    // South Milford Solar Plant: cap=2.9, cf=0.0, units=1
    // Three Peaks Power: cap=80.0, cf=0.0, units=1
    // Utah Red Hills Renewable Energy Park: cap=80.0, cf=0.0, units=1
    name "wecc240_psse_G_6507_PV";
    parent "wecc240_psse_G_6507";
    latitude 38.89;
    longitude -111.9;
    generator PV;
    operating_capacity 1096.58 MW;
    startup_cost 0.0;
    shutdown_cost 0.0;
    fixed_cost 0.0;
    variable_cost 0.0;
    scarcity_cost 0.0;
}

object pypower.powerplant
{
    // BLUNDELL: cap=44.8, cf=0.015, units=1
    // ENEL_COVE_FORT: cap=25.0, cf=0.008, units=1
    // HUNTER: cap=1577.2, cf=0.53, units=1
    // THERMO_NO_1: cap=14.0, cf=0.005, units=1
    name "wecc240_psse_G_6507_ST";
    parent "wecc240_psse_G_6507";
    latitude 38.89;
    longitude -111.9;
    generator ST;
    operating_capacity 1661.0 MW;
    startup_cost 6500.0;
    shutdown_cost 0.0;
    fixed_cost 1000.0;
    variable_cost 5.0;
    scarcity_cost 0.001;
}

object pypower.powerplant
{
    // Milford Phase I: cap=203.5, cf=0.0, units=97
    // Milford Phase II: cap=13.5, cf=0.0, units=9
    name "wecc240_psse_G_6507_WT";
    parent "wecc240_psse_G_6507";
    latitude 38.89;
    longitude -111.9;
    generator WT;
    operating_capacity 217.0 MW;
    startup_cost 0.0;
    shutdown_cost 0.0;
    fixed_cost 0.0;
    variable_cost 0.0;
    scarcity_cost 0.0;
}

object pypower.gen
{
    name "wecc240_psse_G_1001";
    parent "wecc240_psse_N_1001";
    Pmax 3860.5 MW;
    Qmax 772.1 MW;
    Qmin -772.1 MW;
    status IN_SERVICE;
    object gencost
    {
        model POLYNOMIAL;
        startup 0.0 $;
        shutdown 0.0 $;
        costs "0.0,0.0,0.0";
    };
}
object pypower.powerplant
{
    // VALENCIA_ENERGY_FACILITY: cap=79.8, cf=0.021, units=1
    name "wecc240_psse_G_1001_CC";
    parent "wecc240_psse_G_1001";
    latitude 36.67;
    longitude -108.6;
    generator CC;
    operating_capacity 79.8 MW;
    startup_cost 35.0;
    shutdown_cost 0.0;
    fixed_cost 500.0;
    variable_cost 50.0;
    scarcity_cost 0.001;
}

object pypower.powerplant
{
    // LA_LUZ_ENERGY_CENTER: cap=42.3, cf=0.011, units=1
    // VALENCIA_ENERGY_FACILITY: cap=79.8, cf=0.021, units=1
    name "wecc240_psse_G_1001_CT";
    parent "wecc240_psse_G_1001";
    latitude 36.67;
    longitude -108.6;
    generator CT;
    operating_capacity 122.1 MW;
    startup_cost 25.0;
    shutdown_cost 0.0;
    fixed_cost 350.0;
    variable_cost 75.0;
    scarcity_cost 0.001;
}

object pypower.powerplant
{
    // Bluewater CDEC 1: cap=2.4, cf=0.0, units=1
    // Cibola: cap=7.6, cf=0.0, units=1
    // City of Gallup Solar: cap=8.0, cf=0.0, units=1
    // Grants CDEC 2: cap=4.5, cf=0.0, units=1
    // Route 66 Energy Center, LLC: cap=49.5, cf=0.0, units=1
    name "wecc240_psse_G_1001_PV";
    parent "wecc240_psse_G_1001";
    latitude 36.67;
    longitude -108.6;
    generator PV;
    operating_capacity 72.0 MW;
    startup_cost 0.0;
    shutdown_cost 0.0;
    fixed_cost 0.0;
    variable_cost 0.0;
    scarcity_cost 0.0;
}

object pypower.powerplant
{
    // FOUR_CORNERS: cap=1636.2, cf=0.424, units=1
    // SAN_JUAN: cap=1848.0, cf=0.479, units=1
    name "wecc240_psse_G_1001_ST";
    parent "wecc240_psse_G_1001";
    latitude 36.67;
    longitude -108.6;
    generator ST;
    operating_capacity 3484.2 MW;
    startup_cost 6500.0;
    shutdown_cost 0.0;
    fixed_cost 1000.0;
    variable_cost 5.0;
    scarcity_cost 0.001;
}

object pypower.powerplant
{
    // Red Mesa: cap=102.4, cf=0.0, units=64
    name "wecc240_psse_G_1001_WT";
    parent "wecc240_psse_G_1001";
    latitude 36.67;
    longitude -108.6;
    generator WT;
    operating_capacity 102.4 MW;
    startup_cost 0.0;
    shutdown_cost 0.0;
    fixed_cost 0.0;
    variable_cost 0.0;
    scarcity_cost 0.0;
}

object pypower.gen
{
    name "wecc240_psse_G_1004";
    parent "wecc240_psse_N_1004";
    Pmax 2832.8 MW;
    Qmax 566.6 MW;
    Qmin -566.6 MW;
    status IN_SERVICE;
    object gencost
    {
        model POLYNOMIAL;
        startup 0.0 $;
        shutdown 0.0 $;
        costs "0.0,0.0,0.0";
    };
}
object pypower.powerplant
{
    // BLUFFVIEW: cap=67.0, cf=0.024, units=1
    name "wecc240_psse_G_1004_CC";
    parent "wecc240_psse_G_1004";
    latitude 36.91;
    longitude -108.3;
    generator CC;
    operating_capacity 67.0 MW;
    startup_cost 35.0;
    shutdown_cost 0.0;
    fixed_cost 500.0;
    variable_cost 50.0;
    scarcity_cost 0.001;
}

object pypower.powerplant
{
    // FORD_UTILITIES_CENTER: cap=7.4, cf=0.003, units=1
    // RIO_BRAVO: cap=150.0, cf=0.053, units=1
    name "wecc240_psse_G_1004_CT";
    parent "wecc240_psse_G_1004";
    latitude 36.91;
    longitude -108.3;
    generator CT;
    operating_capacity 157.4 MW;
    startup_cost 25.0;
    shutdown_cost 0.0;
    fixed_cost 350.0;
    variable_cost 75.0;
    scarcity_cost 0.001;
}

object pypower.powerplant
{
    // ABIQUIU_DAM: cap=15.6, cf=0.006, units=1
    // BLUE_MESA: cap=86.4, cf=0.031, units=1
    // CRYSTAL: cap=28.0, cf=0.01, units=1
    // MORROW_POINT: cap=173.2, cf=0.061, units=1
    // NAVAJO_DAM: cap=30.0, cf=0.011, units=1
    // TOWAOC: cap=11.4, cf=0.004, units=1
    name "wecc240_psse_G_1004_HT";
    parent "wecc240_psse_G_1004";
    latitude 36.91;
    longitude -108.3;
    generator HT;
    operating_capacity 344.6 MW;
    startup_cost 0.0;
    shutdown_cost 0.0;
    fixed_cost 200.0;
    variable_cost 0.0;
    scarcity_cost 0.001;
}

object pypower.powerplant
{
    // Albuquerque Solar Energy Center: cap=2.0, cf=0.0, units=1
    // Alcalde Solar Array: cap=2.4, cf=0.0, units=1
    // Britton Solar Energy Center: cap=50.0, cf=0.0, units=1
    // CNMEC Solar Energy Center: cap=2.0, cf=0.0, units=1
    // Carrizozo Solar: cap=3.0, cf=0.0, units=1
    // City of Rio Rancho WWTP: cap=1.2, cf=0.0, units=1
    // Cortez Solar 1, LLC: cap=2.2, cf=0.0, units=1
    // Cortez Solar 2, LLC: cap=5.0, cf=0.0, units=1
    // Cortez Solar 3, LLC: cap=2.0, cf=0.0, units=1
    // Cuba 2.5ac, LLC: cap=2.5, cf=0.0, units=1
    // Encino Solar Energy Center: cap=55.0, cf=0.0, units=1
    // Eubank Landfill Solar Array: cap=2.0, cf=0.0, units=1
    // Facebook 1 Solar Energy Center: cap=10.0, cf=0.0, units=1
    // Facebook 2 Solar Energy Center: cap=10.0, cf=0.0, units=1
    // Facebook 3 Solar Energy Center: cap=10.0, cf=0.0, units=1
    // Hayhurst New Mexico Solar: cap=20.0, cf=0.0, units=1
    // Los Alamos PV Site: cap=1.0, cf=0.0, units=1
    // Los Lunas Solar Energy Center: cap=7.0, cf=0.0, units=1
    // Manzano Solar: cap=8.0, cf=0.0, units=1
    // Meadow Lake Solar Energy Center: cap=9.12, cf=0.0, units=1
    // RC Energy AA, LLC Solar Facility: cap=1.0, cf=0.0, units=1
    // Red Mesa Solar Project: cap=72.0, cf=0.0, units=1
    // Rio Communities Solar Energy Center: cap=10.0, cf=0.0, units=1
    // Rio De Oro Solar Energy Center: cap=10.0, cf=0.0, units=1
    // Rio Rancho High School: cap=1.0, cf=0.0, units=1
    // SMPA Solar 1 Community Solar: cap=1.0, cf=0.0, units=1
    // SPS5 Hopi: cap=9.9, cf=0.0, units=1
    // Sandoval Solar Energy Center: cap=6.08, cf=0.0, units=1
    // Santa Fe Solar Energy Center: cap=9.5, cf=0.0, units=1
    // Santolina Solar Energy Center: cap=10.5, cf=0.0, units=1
    // South Valley Solar Energy Center: cap=10.0, cf=0.0, units=1
    // Sue Cleveland High School: cap=1.0, cf=0.0, units=1
    // Syncarpha El Rito: cap=1.6, cf=0.0, units=1
    // Vista Solar Energy Center: cap=10.0, cf=0.0, units=1
    name "wecc240_psse_G_1004_PV";
    parent "wecc240_psse_G_1004";
    latitude 36.91;
    longitude -108.3;
    generator PV;
    operating_capacity 358.0 MW;
    startup_cost 0.0;
    shutdown_cost 0.0;
    fixed_cost 0.0;
    variable_cost 0.0;
    scarcity_cost 0.0;
}
object pypower.powerplant
{
    // FORD_UTILITIES_CENTER: cap=7.4, cf=0.003, units=1
    // REEVES: cap=154.0, cf=0.054, units=1
    name "wecc240_psse_G_1004_ST";
    parent "wecc240_psse_G_1004";
    latitude 36.91;
    longitude -108.3;
    generator ST;
    operating_capacity 161.4 MW;
    startup_cost 6500.0;
    shutdown_cost 0.0;
    fixed_cost 1000.0;
    variable_cost 5.0;
    scarcity_cost 0.001;
}

object pypower.powerplant
{
    // El Cabo: cap=298.2, cf=0.0, units=142
    // High Lonesome: cap=99.4, cf=0.0, units=40
    // La Joya: cap=212.79999999999998, cf=0.0, units=76
    // La Joya II: cap=91.875, cf=0.0, units=35
    // Latigo: cap=62.099999999999994, cf=0.0, units=27
    // Western Spirit: cap=979.9999999999999, cf=0.0, units=350
    name "wecc240_psse_G_1004_WT";
    parent "wecc240_psse_G_1004";
    latitude 36.91;
    longitude -108.3;
    generator WT;
    operating_capacity 1744.375 MW;
    startup_cost 0.0;
    shutdown_cost 0.0;
    fixed_cost 0.0;
    variable_cost 0.0;
    scarcity_cost 0.0;
}

object pypower.gen
{
    name "wecc240_psse_G_7001";
    parent "wecc240_psse_N_7001";
    Pmax 15455.5 MW;
    Qmax 3091.1 MW;
    Qmin -3091.1 MW;
    status IN_SERVICE;
    object gencost
    {
        model POLYNOMIAL;
        startup 0.0 $;
        shutdown 0.0 $;
        costs "0.0,0.0,0.0";
    };
}
object pypower.powerplant
{
    // ARAPAHOE_COMBUSTION_TURBINE_PROJECT: cap=194.0, cf=0.013, units=1
    // BRUSH_GENERATION_FACILITY: cap=148.6, cf=0.01, units=1
    // CHEROKEE: cap=503.2, cf=0.033, units=1
    // FRONT_RANGE_POWER_PLANT: cap=554.3, cf=0.036, units=1
    // HOBBS_GENERATING_STATION: cap=332.8, cf=0.022, units=1
    // PUEBLO_AIRPORT_GENERATING_STATION: cap=220.0, cf=0.014, units=1
    // ROCKY_MOUNTAIN_ENERGY_CENTER: cap=685.1, cf=0.044, units=1
    name "wecc240_psse_G_7001_CC";
    parent "wecc240_psse_G_7001";
    latitude 38.54;
    longitude -104.7;
    generator CC;
    operating_capacity 2638.0 MW;
    startup_cost 35.0;
    shutdown_cost 0.0;
    fixed_cost 500.0;
    variable_cost 50.0;
    scarcity_cost 0.001;
}

object pypower.powerplant
{
    // ALAMOSA: cap=53.2, cf=0.003, units=1
    // BLUE_SPRUCE_ENERGY_CENTER: cap=397.8, cf=0.026, units=1
    // BRUSH_GENERATION_FACILITY: cap=148.6, cf=0.01, units=1
    // CUNNINGHAM: cap=259.6, cf=0.017, units=1
    // FOUNTAIN_VALLEY_POWER_FACILITY: cap=228.0, cf=0.015, units=1
    // FRANK_KNUTSON: cap=154.2, cf=0.01, units=1
    // HOBBS_GENERATING_STATION: cap=332.8, cf=0.022, units=1
    // LIMON_GENERATING_STATION: cap=154.2, cf=0.01, units=1
    // MADDOX: cap=106.0, cf=0.007, units=1
    // MANCHIEF_ELECTRIC_GENERATING_STATION: cap=300.0, cf=0.019, units=1
    // MARTIN_DRAKE: cap=103.7, cf=0.007, units=1
    // PUEBLO_AIRPORT_GENERATING_STATION: cap=220.0, cf=0.014, units=1
    // RAY_D_NIXON: cap=141.3, cf=0.009, units=1
    name "wecc240_psse_G_7001_CT";
    parent "wecc240_psse_G_7001";
    latitude 38.54;
    longitude -104.7;
    generator CT;
    operating_capacity 2599.4 MW;
    startup_cost 25.0;
    shutdown_cost 0.0;
    fixed_cost 350.0;
    variable_cost 75.0;
    scarcity_cost 0.001;
}

object pypower.powerplant
{
    // CABIN_CREEK: cap=300.0, cf=0.019, units=1
    // MOUNT_ELBERT: cap=200.0, cf=0.013, units=1
    // TESLA: cap=26.6, cf=0.002, units=1
    name "wecc240_psse_G_7001_HT";
    parent "wecc240_psse_G_7001";
    latitude 38.54;
    longitude -104.7;
    generator HT;
    operating_capacity 526.6 MW;
    startup_cost 0.0;
    shutdown_cost 0.0;
    fixed_cost 200.0;
    variable_cost 0.0;
    scarcity_cost 0.001;
}

object pypower.powerplant
{
    // LCEC_GENERATION_LLVC: cap=46.5, cf=0.003, units=1
    // PLAINS_END: cap=114.0, cf=0.007, units=1
    // PLAINS_END_II_LLC: cap=117.6, cf=0.008, units=1
    name "wecc240_psse_G_7001_IC";
    parent "wecc240_psse_G_7001";
    latitude 38.54;
    longitude -104.7;
    generator IC;
    operating_capacity 278.1 MW;
    startup_cost 0.0;
    shutdown_cost 0.0;
    fixed_cost 0.0;
    variable_cost 50.0;
    scarcity_cost 0.001;
}

object pypower.powerplant
{
    // AFA Solar Farm: cap=5.2, cf=0.0, units=1
    // Adams Community Solar Garden III, LLC: cap=1.2, cf=0.0, units=1
    // Adams Community Solar Garden, LLC: cap=1.2, cf=0.0, units=1
    // Airport 1 Solar (DIA): cap=1.5, cf=0.0, units=1
    // Alamosa Solar South (CSG): cap=1.6, cf=0.0, units=1
    // Angel Fire Energy Facility: cap=9.8, cf=0.0, units=1
    // Arapahoe 3 Community Solar Array: cap=1.8, cf=0.0, units=1
    // Bighorn Solar 1: cap=240.0, cf=0.0, units=1
    // Brighton PV Solar Plant: cap=1.8, cf=0.0, units=1
    // CO LI (CSG) 1-Kamerra: cap=1.5, cf=0.0, units=1
    // CSU Pueblo: cap=1.0, cf=0.0, units=1
    // Carson Solar I: cap=1.5, cf=0.0, units=1
    // Chaves County Solar II: cap=30.0, cf=0.0, units=1
    // Chaves Solar, LLC: cap=70.0, cf=0.0, units=1
    // Cimarron Solar Facility: cap=30.64, cf=0.0, units=1
    // City & County of Denver at Denver Int'l: cap=3.4, cf=0.0, units=1
    // Clear Spring Ranch PV Project: cap=10.0, cf=0.0, units=1
    // Cogentrix of Alamosa: cap=30.0, cf=0.0, units=1
    // Comanche Solar: cap=120.0, cf=0.0, units=1
    // Conejos 1 Community Solar Array: cap=1.5, cf=0.0, units=1
    // DIA 8: cap=4.5, cf=0.0, units=1
    // Denver Int Airport: cap=1.9, cf=0.0, units=1
    // Denver Intl Airport IV Solar: cap=1.5, cf=0.0, units=1
    // Denver Metro Solar: cap=1.6, cf=0.0, units=1
    // Fremont CO 1, LLC: cap=1.8, cf=0.0, units=1
    // GSE NM1: cap=1.7, cf=0.0, units=1
    // Grazing Yak Solar: cap=39.5, cf=0.0, units=1
    // Greater Sandhill I: cap=19.0, cf=0.0, units=1
    // Hooper Solar: cap=52.0, cf=0.0, units=1
    // Imboden Solar Garden: cap=3.0, cf=0.0, units=1
    // Jeffco Community Solar Gardens, LLC: cap=1.2, cf=0.0, units=1
    // Kit Carson: cap=1.3, cf=0.0, units=1
    // Las Vegas Solar Energy Center: cap=5.0, cf=0.0, units=1
    // Monte Vista Solar 2 (CSG), LLC: cap=1.6, cf=0.0, units=1
    // Mtn. Solar 1: cap=1.5, cf=0.0, units=1
    // Mtn. Solar 2: cap=1.5, cf=0.0, units=1
    // Mtn. Solar 3 (CSG): cap=1.5, cf=0.0, units=1
    // Mtn. Solar 4 (CSG): cap=1.5, cf=0.0, units=1
    // NSE Camber BH (CSG) 2, LLC: cap=2.0, cf=0.0, units=1
    // Neptune Energy Center Hybrid: cap=325.0, cf=0.0, units=1
    // Oak Leaf Solar XVIII, LLC: cap=9.0, cf=0.0, units=1
    // Oak Leaf Solar XXI (CSG): cap=1.5, cf=0.0, units=1
    // Oak Leaf Solar XXII, LLC (CSG): cap=1.5, cf=0.0, units=1
    // Oak Leaf Solar XXIII, LLC (CSG): cap=1.5, cf=0.0, units=1
    // Oak Leaf Solar XXIV LLC (CSG): cap=1.5, cf=0.0, units=1
    // Oak Leaf Solar XXV, LLC (CSG): cap=1.5, cf=0.0, units=1
    // Oak Leaf Solar XXVI, LLC: cap=1.5, cf=0.0, units=1
    // Oak Leaf Solar XXX, LLC (CSG): cap=1.5, cf=0.0, units=1
    // Oak Leaf Solar XXXIII, LLC (Lantz): cap=3.0, cf=0.0, units=1
    // Palmer Solar: cap=60.0, cf=0.0, units=1
    // Pikes Peak Solar Garden 1, LLC (CSG): cap=2.0, cf=0.0, units=1
    // Pioneer Solar (CO), LLC: cap=80.0, cf=0.0, units=1
    // Pivot Solar 14, LLC (CSG): cap=2.0, cf=0.0, units=1
    // Pivot Solar 15, LLC (CSG): cap=1.0, cf=0.0, units=1
    // Pivot Solar 2, LLC (CSG): cap=2.0, cf=0.0, units=1
    // Questa Solar Facility: cap=1.0, cf=0.0, units=1
    // Quincy II Solar Garden: cap=1.5, cf=0.0, units=1
    // Quincy Solar: cap=1.5, cf=0.0, units=1
    // Rock Creek 2 (CSG): cap=1.6, cf=0.0, units=1
    // Roswell Solar, LLC: cap=70.0, cf=0.0, units=1
    // SEV NM Phase 2: cap=1.4, cf=0.0, units=1
    // San Isabel Solar, LLC: cap=30.0, cf=0.0, units=1
    // San Luis Solar Garden: cap=1.2, cf=0.0, units=1
    // San Luis Valley Solar Array: cap=2.7, cf=0.0, units=1
    // San Luis Valley Solar Ranch: cap=30.4, cf=0.0, units=1
    // San Miguel I Solar Energy Center: cap=10.0, cf=0.0, units=1
    // Springer Solar 1: cap=0.9, cf=0.0, units=1
    // Storrie Lake Solar Project: cap=1.5, cf=0.0, units=1
    // Sun Mountain Solar 1: cap=200.0, cf=0.0, units=1
    // SunE Alamosa: cap=6.9, cf=0.0, units=1
    // Syncarpha Eagle Nest: cap=1.0, cf=0.0, units=1
    // Syncarpha Questa: cap=1.6, cf=0.0, units=1
    // Syncarpha Taos: cap=3.1, cf=0.0, units=1
    // Taos Mesa Energy Facility Hybrid: cap=15.0, cf=0.0, units=1
    // Thunder Wolf Energy Center Hybrid: cap=248.0, cf=0.0, units=1
    // Titan Solar: cap=50.0, cf=0.0, units=1
    // Trout Creek Solar: cap=2.0, cf=0.0, units=1
    // Venture 1-1A (CSG): cap=1.5, cf=0.0, units=1
    // Venture 2: cap=1.5, cf=0.0, units=1
    // Venture 3-1C: cap=1.5, cf=0.0, units=1
    // Venture 4-1D: cap=1.5, cf=0.0, units=1
    // Victory Solar, LLC: cap=12.83, cf=0.0, units=1
    // Vilas Solar Array: cap=4.0, cf=0.0, units=1
    // Xcel Adams 1 Community Solar Array: cap=1.8, cf=0.0, units=1
    // Xcel Adams 2 Community Solar Array: cap=1.5, cf=0.0, units=1
    name "wecc240_psse_G_7001_PV";
    parent "wecc240_psse_G_7001";
    latitude 38.54;
    longitude -104.7;
    generator PV;
    operating_capacity 1909.17 MW;
    startup_cost 0.0;
    shutdown_cost 0.0;
    fixed_cost 0.0;
    variable_cost 0.0;
    scarcity_cost 0.0;
}

object pypower.powerplant
{
    // AIRPORT_INDUSTRIAL: cap=10.0, cf=0.001, units=1
    // CHEROKEE: cap=503.2, cf=0.033, units=1
    // COLORADO_ENERGY_NATIONS_COMPANY: cap=35.0, cf=0.002, units=1
    // COMANCHE: cap=1635.3, cf=0.106, units=1
    // CUNNINGHAM: cap=259.6, cf=0.017, units=1
    // GEORGE_BIRDSALL: cap=61.1, cf=0.004, units=1
    // MADDOX: cap=106.0, cf=0.007, units=1
    // MARTIN_DRAKE: cap=103.7, cf=0.007, units=1
    // METRO_WASTEWATER_RECLAMATION_DISTRICT: cap=15.0, cf=0.001, units=1
    // PAWNEE: cap=552.3, cf=0.036, units=1
    // QUAY_COUNTY: cap=27.0, cf=0.002, units=1
    // RAY_D_NIXON: cap=141.3, cf=0.009, units=1
    // ROCKY_FORD: cap=10.0, cf=0.001, units=1
    name "wecc240_psse_G_7001_ST";
    parent "wecc240_psse_G_7001";
    latitude 38.54;
    longitude -104.7;
    generator ST;
    operating_capacity 3459.5 MW;
    startup_cost 6500.0;
    shutdown_cost 0.0;
    fixed_cost 1000.0;
    variable_cost 5.0;
    scarcity_cost 0.001;
}

object pypower.powerplant
{
    // Anderson Wind Project: cap=14.95, cf=0.0, units=8
    // Aragonne Mesa 2: cap=134.6, cf=0.0, units=50
    // Aragonne Mesa 2 Expansion: cap=91.5, cf=0.0, units=33
    // Aurora Wal-Mart: cap=0.05, cf=0.0, units=1
    // Bronco Plains: cap=299.35999999999996, cf=0.0, units=108
    // Bronco Plains Wind II: cap=199.04, cf=0.0, units=72
    // Busch Ranch: cap=28.8, cf=0.0, units=16
    // Busch Ranch II: cap=59.400000000000006, cf=0.0, units=27
    // Carousel: cap=147.9, cf=0.0, units=87
    // Casa Mesa: cap=22.5, cf=0.0, units=9
    // Cedar Point: cap=250.20000000000002, cf=0.0, units=139
    // Cheyenne Ridge: cap=496.40000000000003, cf=0.0, units=228
    // Colorado Green Wind Project (Lamar): cap=160.8, cf=0.0, units=101
    // Crossing Trails: cap=104.0, cf=0.0, units=25
    // Golden West Wind Farm: cap=246.5, cf=0.0, units=145
    // Huerfano River: cap=8.0, cf=0.0, units=4
    // Kit Carson Project: cap=51.0, cf=0.0, units=34
    // Lamar III: cap=1.5, cf=0.0, units=1
    // Lamar Municipal: cap=6.0, cf=0.0, units=4
    // Limon I: cap=200.0, cf=0.0, units=125
    // Limon II: cap=200.0, cf=0.0, units=125
    // Limon III: cap=200.6, cf=0.0, units=118
    // NREL - NWTC: cap=7.1, cf=0.0, units=6
    // New Mexico Wind Energy Center: cap=75.0, cf=0.0, units=50
    // Oso Grande: cap=112.395, cf=0.0, units=31
    // Peak View Wind: cap=60.86, cf=0.0, units=34
    // Pueblo Towers: cap=1.8, cf=0.0, units=1
    // Rush Creek I: cap=400.0, cf=0.0, units=200
    // Rush Creek II: cap=200.0, cf=0.0, units=100
    // San Juan Mesa: cap=38.0, cf=0.0, units=38
    // Twin Buttes: cap=75.0, cf=0.0, units=50
    // Twin Buttes II: cap=75.0, cf=0.0, units=36
    // Western Spirit: cap=75.6, cf=0.0, units=27
    // Wray School District: cap=0.9, cf=0.0, units=1
    name "wecc240_psse_G_7001_WT";
    parent "wecc240_psse_G_7001";
    latitude 38.54;
    longitude -104.7;
    generator WT;
    operating_capacity 4044.755 MW;
    startup_cost 0.0;
    shutdown_cost 0.0;
    fixed_cost 0.0;
    variable_cost 0.0;
    scarcity_cost 0.0;
}

object pypower.gen
{
    name "wecc240_psse_G_6504";
    parent "wecc240_psse_N_6504";
    Pmax 789.0 MW;
    Qmax 157.8 MW;
    Qmin -157.8 MW;
    status IN_SERVICE;
    object gencost
    {
        model POLYNOMIAL;
        startup 0.0 $;
        shutdown 0.0 $;
        costs "0.0,0.0,0.0";
    };
}
object pypower.powerplant
{
    // CURRANT_CREEK: cap=649.0, cf=0.823, units=1
    // NEBO_POWER_STATION: cap=140.0, cf=0.177, units=1
    name "wecc240_psse_G_6504_CC";
    parent "wecc240_psse_G_6504";
    latitude 39.87;
    longitude -112.0;
    generator CC;
    operating_capacity 789.0 MW;
    startup_cost 35.0;
    shutdown_cost 0.0;
    fixed_cost 500.0;
    variable_cost 50.0;
    scarcity_cost 0.001;
}

object pypower.gen
{
    name "wecc240_psse_G_6508";
    parent "wecc240_psse_N_6508";
    Pmax 1368.7 MW;
    Qmax 273.7 MW;
    Qmin -273.7 MW;
    status IN_SERVICE;
    object gencost
    {
        model POLYNOMIAL;
        startup 0.0 $;
        shutdown 0.0 $;
        costs "0.0,0.0,0.0";
    };
}
object pypower.powerplant
{
    // BYU_CENTRAL_HEATING_PLANT: cap=16.5, cf=0.012, units=1
    name "wecc240_psse_G_6508_CT";
    parent "wecc240_psse_G_6508";
    latitude 40.05;
    longitude -111.4;
    generator CT;
    operating_capacity 16.5 MW;
    startup_cost 25.0;
    shutdown_cost 0.0;
    fixed_cost 350.0;
    variable_cost 75.0;
    scarcity_cost 0.001;
}

object pypower.powerplant
{
    // HEBER_CITY: cap=7.0, cf=0.005, units=1
    // PROVO_POWER_PLANT: cap=12.0, cf=0.009, units=1
    // WHITEHEAD: cap=31.0, cf=0.023, units=1
    name "wecc240_psse_G_6508_IC";
    parent "wecc240_psse_G_6508";
    latitude 40.05;
    longitude -111.4;
    generator IC;
    operating_capacity 50.0 MW;
    startup_cost 0.0;
    shutdown_cost 0.0;
    fixed_cost 0.0;
    variable_cost 50.0;
    scarcity_cost 0.001;
}

object pypower.powerplant
{
    // Graphite Solar I: cap=80.0, cf=0.0, units=1
    // Hunter Solar, LLC (UT): cap=100.0, cf=0.0, units=1
    name "wecc240_psse_G_6508_PV";
    parent "wecc240_psse_G_6508";
    latitude 40.05;
    longitude -111.4;
    generator PV;
    operating_capacity 180.0 MW;
    startup_cost 0.0;
    shutdown_cost 0.0;
    fixed_cost 0.0;
    variable_cost 0.0;
    scarcity_cost 0.0;
}

object pypower.powerplant
{
    // HEBER_CITY: cap=7.0, cf=0.005, units=1
    // HUNTINGTON: cap=1037.3, cf=0.758, units=1
    // SUNNYSIDE_COGEN_ASSOCIATES: cap=58.1, cf=0.042, units=1
    name "wecc240_psse_G_6508_ST";
    parent "wecc240_psse_G_6508";
    latitude 40.05;
    longitude -111.4;
    generator ST;
    operating_capacity 1102.4 MW;
    startup_cost 6500.0;
    shutdown_cost 0.0;
    fixed_cost 1000.0;
    variable_cost 5.0;
    scarcity_cost 0.001;
}

object pypower.powerplant
{
    // Camp Williams: cap=0.885, cf=0.0, units=2
    // Spanish Fork: cap=18.900000000000002, cf=0.0, units=9
    name "wecc240_psse_G_6508_WT";
    parent "wecc240_psse_G_6508";
    latitude 40.05;
    longitude -111.4;
    generator WT;
    operating_capacity 19.785 MW;
    startup_cost 0.0;
    shutdown_cost 0.0;
    fixed_cost 0.0;
    variable_cost 0.0;
    scarcity_cost 0.0;
}

object pypower.gen
{
    name "wecc240_psse_G_6502";
    parent "wecc240_psse_N_6502";
    Pmax 1433.0 MW;
    Qmax 286.6 MW;
    Qmin -286.6 MW;
    status IN_SERVICE;
    object gencost
    {
        model POLYNOMIAL;
        startup 0.0 $;
        shutdown 0.0 $;
        costs "0.0,0.0,0.0";
    };
}
object pypower.powerplant
{
    // LAKE_SIDE_POWER_PLANT: cap=1385.0, cf=0.967, units=1
    name "wecc240_psse_G_6502_CC";
    parent "wecc240_psse_G_6502";
    latitude 40.42;
    longitude -112.0;
    generator CC;
    operating_capacity 1385.0 MW;
    startup_cost 35.0;
    shutdown_cost 0.0;
    fixed_cost 500.0;
    variable_cost 50.0;
    scarcity_cost 0.001;
}

object pypower.powerplant
{
    // US_MAGNESIUM: cap=48.0, cf=0.033, units=1
    name "wecc240_psse_G_6502_CT";
    parent "wecc240_psse_G_6502";
    latitude 40.42;
    longitude -112.0;
    generator CT;
    operating_capacity 48.0 MW;
    startup_cost 25.0;
    shutdown_cost 0.0;
    fixed_cost 350.0;
    variable_cost 75.0;
    scarcity_cost 0.001;
}

object pypower.gen
{
    name "wecc240_psse_G_6509";
    parent "wecc240_psse_N_6509";
    Pmax 854.9 MW;
    Qmax 171.0 MW;
    Qmin -171.0 MW;
    status IN_SERVICE;
    object gencost
    {
        model POLYNOMIAL;
        startup 0.0 $;
        shutdown 0.0 $;
        costs "0.0,0.0,0.0";
    };
}
object pypower.powerplant
{
    // KENNECOTT_POWER_PLANT: cap=9.6, cf=0.011, units=1
    name "wecc240_psse_G_6509_CC";
    parent "wecc240_psse_G_6509";
    latitude 40.77;
    longitude -111.8;
    generator CC;
    operating_capacity 9.6 MW;
    startup_cost 35.0;
    shutdown_cost 0.0;
    fixed_cost 500.0;
    variable_cost 50.0;
    scarcity_cost 0.001;
}

object pypower.powerplant
{
    // BOUNTIFUL_CITY: cap=10.1, cf=0.012, units=1
    // GADSBY: cap=246.1, cf=0.288, units=1
    // KENNECOTT_POWER_PLANT: cap=19.2, cf=0.022, units=2
    // MURRAY_TURBINE: cap=42.0, cf=0.049, units=1
    // TESORO_SLC_COGENERATION_PLANT: cap=30.4, cf=0.036, units=1
    // WEST_VALLEY_GENERATION_PROJECT: cap=217.0, cf=0.254, units=1
    name "wecc240_psse_G_6509_CT";
    parent "wecc240_psse_G_6509";
    latitude 40.77;
    longitude -111.8;
    generator CT;
    operating_capacity 564.8 MW;
    startup_cost 25.0;
    shutdown_cost 0.0;
    fixed_cost 350.0;
    variable_cost 75.0;
    scarcity_cost 0.001;
}

object pypower.powerplant
{
    // BOUNTIFUL_CITY: cap=10.1, cf=0.012, units=1
    name "wecc240_psse_G_6509_IC";
    parent "wecc240_psse_G_6509";
    latitude 40.77;
    longitude -111.8;
    generator IC;
    operating_capacity 10.1 MW;
    startup_cost 0.0;
    shutdown_cost 0.0;
    fixed_cost 0.0;
    variable_cost 50.0;
    scarcity_cost 0.001;
}

object pypower.powerplant
{
    // Weber State University-Davis Campus PV: cap=1.3, cf=0.0, units=1
    name "wecc240_psse_G_6509_PV";
    parent "wecc240_psse_G_6509";
    latitude 40.77;
    longitude -111.8;
    generator PV;
    operating_capacity 1.3 MW;
    startup_cost 0.0;
    shutdown_cost 0.0;
    fixed_cost 0.0;
    variable_cost 0.0;
    scarcity_cost 0.0;
}

object pypower.powerplant
{
    // BOUNTIFUL_CITY: cap=10.1, cf=0.012, units=1
    // GADSBY: cap=246.1, cf=0.288, units=1
    // KENNECOTT_POWER_PLANT: cap=9.6, cf=0.011, units=1
    name "wecc240_psse_G_6509_ST";
    parent "wecc240_psse_G_6509";
    latitude 40.77;
    longitude -111.8;
    generator ST;
    operating_capacity 265.8 MW;
    startup_cost 6500.0;
    shutdown_cost 0.0;
    fixed_cost 1000.0;
    variable_cost 5.0;
    scarcity_cost 0.001;
}

object pypower.powerplant
{
    // Shakopee Mdewakanton Sioux: cap=1.5, cf=0.0, units=1
    // Tooele Army Depot II: cap=1.79, cf=0.0, units=1
    name "wecc240_psse_G_6509_WT";
    parent "wecc240_psse_G_6509";
    latitude 40.77;
    longitude -111.8;
    generator WT;
    operating_capacity 3.29 MW;
    startup_cost 0.0;
    shutdown_cost 0.0;
    fixed_cost 0.0;
    variable_cost 0.0;
    scarcity_cost 0.0;
}

object pypower.gen
{
    name "wecc240_psse_G_6501";
    parent "wecc240_psse_N_6501";
    Pmax 123.5 MW;
    Qmax 24.7 MW;
    Qmin -24.7 MW;
    status IN_SERVICE;
    object gencost
    {
        model POLYNOMIAL;
        startup 0.0 $;
        shutdown 0.0 $;
        costs "0.0,0.0,0.0";
    };
}
object pypower.powerplant
{
    // LOGAN_CITY: cap=8.0, cf=0.065, units=1
    name "wecc240_psse_G_6501_CT";
    parent "wecc240_psse_G_6501";
    latitude 41.44;
    longitude -112.0;
    generator CT;
    operating_capacity 8.0 MW;
    startup_cost 25.0;
    shutdown_cost 0.0;
    fixed_cost 350.0;
    variable_cost 75.0;
    scarcity_cost 0.001;
}

object pypower.powerplant
{
    // CUTLER: cap=30.0, cf=0.243, units=1
    // GRACE: cap=33.0, cf=0.267, units=1
    // ONEIDA: cap=30.0, cf=0.243, units=1
    // SODA: cap=14.5, cf=0.117, units=1
    name "wecc240_psse_G_6501_HT";
    parent "wecc240_psse_G_6501";
    latitude 41.44;
    longitude -112.0;
    generator HT;
    operating_capacity 107.5 MW;
    startup_cost 0.0;
    shutdown_cost 0.0;
    fixed_cost 200.0;
    variable_cost 0.0;
    scarcity_cost 0.001;
}

object pypower.powerplant
{
    // LOGAN_CITY: cap=8.0, cf=0.065, units=1
    name "wecc240_psse_G_6501_ST";
    parent "wecc240_psse_G_6501";
    latitude 41.44;
    longitude -112.0;
    generator ST;
    operating_capacity 8.0 MW;
    startup_cost 6500.0;
    shutdown_cost 0.0;
    fixed_cost 1000.0;
    variable_cost 5.0;
    scarcity_cost 0.001;
}

object pypower.gen
{
    name "wecc240_psse_G_6305";
    parent "wecc240_psse_N_6305";
    Pmax 1575.7 MW;
    Qmax 315.1 MW;
    Qmin -315.1 MW;
    status IN_SERVICE;
    object gencost
    {
        model POLYNOMIAL;
        startup 0.0 $;
        shutdown 0.0 $;
        costs "0.0,0.0,0.0";
    };
}
object pypower.powerplant
{
    // SHUTE_CREEK_FACILITY: cap=144.0, cf=0.091, units=1
    name "wecc240_psse_G_6305_CT";
    parent "wecc240_psse_G_6305";
    latitude 41.83;
    longitude -110.6;
    generator CT;
    operating_capacity 144.0 MW;
    startup_cost 25.0;
    shutdown_cost 0.0;
    fixed_cost 350.0;
    variable_cost 75.0;
    scarcity_cost 0.001;
}

object pypower.powerplant
{
    // FONTENELLE: cap=10.0, cf=0.006, units=1
    // PALISADES: cap=176.4, cf=0.112, units=1
    name "wecc240_psse_G_6305_HT";
    parent "wecc240_psse_G_6305";
    latitude 41.83;
    longitude -110.6;
    generator HT;
    operating_capacity 186.4 MW;
    startup_cost 0.0;
    shutdown_cost 0.0;
    fixed_cost 200.0;
    variable_cost 0.0;
    scarcity_cost 0.001;
}

object pypower.powerplant
{
    // Sage Solar I-III: cap=57.6, cf=0.0, units=1
    name "wecc240_psse_G_6305_PV";
    parent "wecc240_psse_G_6305";
    latitude 41.83;
    longitude -110.6;
    generator PV;
    operating_capacity 57.6 MW;
    startup_cost 0.0;
    shutdown_cost 0.0;
    fixed_cost 0.0;
    variable_cost 0.0;
    scarcity_cost 0.0;
}

object pypower.powerplant
{
    // FMC_WESTVACO: cap=41.0, cf=0.026, units=1
    // GENERAL_CHEMICAL: cap=30.0, cf=0.019, units=1
    // NAUGHTON: cap=832.0, cf=0.528, units=1
    name "wecc240_psse_G_6305_ST";
    parent "wecc240_psse_G_6305";
    latitude 41.83;
    longitude -110.6;
    generator ST;
    operating_capacity 903.0 MW;
    startup_cost 6500.0;
    shutdown_cost 0.0;
    fixed_cost 1000.0;
    variable_cost 5.0;
    scarcity_cost 0.001;
}

object pypower.powerplant
{
    // Evanston (Wyoming Wind Energy Center): cap=144.0, cf=0.0, units=80
    // Mountain Wind I: cap=60.900000000000006, cf=0.0, units=29
    // Mountain Wind II: cap=79.8, cf=0.0, units=38
    name "wecc240_psse_G_6305_WT";
    parent "wecc240_psse_G_6305";
    latitude 41.83;
    longitude -110.6;
    generator WT;
    operating_capacity 284.7 MW;
    startup_cost 0.0;
    shutdown_cost 0.0;
    fixed_cost 0.0;
    variable_cost 0.0;
    scarcity_cost 0.0;
}

object pypower.gen
{
    name "wecc240_psse_G_6503";
    parent "wecc240_psse_N_6503";
    Pmax 696.5 MW;
    Qmax 139.3 MW;
    Qmin -139.3 MW;
    status IN_SERVICE;
    object gencost
    {
        model POLYNOMIAL;
        startup 0.0 $;
        shutdown 0.0 $;
        costs "0.0,0.0,0.0";
    };
}
object pypower.powerplant
{
    // FRUITA: cap=26.6, cf=0.038, units=1
    name "wecc240_psse_G_6503_CT";
    parent "wecc240_psse_G_6503";
    latitude 40.03;
    longitude -109.2;
    generator CT;
    operating_capacity 26.6 MW;
    startup_cost 25.0;
    shutdown_cost 0.0;
    fixed_cost 350.0;
    variable_cost 75.0;
    scarcity_cost 0.001;
}

object pypower.powerplant
{
    // FLAMING_GORGE: cap=151.8, cf=0.218, units=1
    name "wecc240_psse_G_6503_HT";
    parent "wecc240_psse_G_6503";
    latitude 40.03;
    longitude -109.2;
    generator HT;
    operating_capacity 151.8 MW;
    startup_cost 0.0;
    shutdown_cost 0.0;
    fixed_cost 200.0;
    variable_cost 0.0;
    scarcity_cost 0.001;
}

object pypower.powerplant
{
    // Bonanza: cap=12.5, cf=0.0, units=1
    // Mesa (CSG) 1 Murdock: cap=1.5, cf=0.0, units=1
    // Mesa (CSG) 2 Massicotte: cap=1.5, cf=0.0, units=1
    // Mesa PV1: cap=1.6, cf=0.0, units=1
    // Oak Leaf Solar XXXI, LLC (CSG): cap=1.5, cf=0.0, units=1
    name "wecc240_psse_G_6503_PV";
    parent "wecc240_psse_G_6503";
    latitude 40.03;
    longitude -109.2;
    generator PV;
    operating_capacity 18.6 MW;
    startup_cost 0.0;
    shutdown_cost 0.0;
    fixed_cost 0.0;
    variable_cost 0.0;
    scarcity_cost 0.0;
}

object pypower.powerplant
{
    // BONANZA: cap=499.5, cf=0.717, units=1
    name "wecc240_psse_G_6503_ST";
    parent "wecc240_psse_G_6503";
    latitude 40.03;
    longitude -109.2;
    generator ST;
    operating_capacity 499.5 MW;
    startup_cost 6500.0;
    shutdown_cost 0.0;
    fixed_cost 1000.0;
    variable_cost 5.0;
    scarcity_cost 0.001;
}

object pypower.gen
{
    name "wecc240_psse_G_7002";
    parent "wecc240_psse_N_7002";
    Pmax 3085.9 MW;
    Qmax 617.2 MW;
    Qmin -617.2 MW;
    status IN_SERVICE;
    object gencost
    {
        model POLYNOMIAL;
        startup 0.0 $;
        shutdown 0.0 $;
        costs "0.0,0.0,0.0";
    };
}
object pypower.powerplant
{
    // RIFLE_GENERATING_STATION: cap=84.0, cf=0.027, units=1
    name "wecc240_psse_G_7002_CC";
    parent "wecc240_psse_G_7002";
    latitude 40.52;
    longitude -107.5;
    generator CC;
    operating_capacity 84.0 MW;
    startup_cost 35.0;
    shutdown_cost 0.0;
    fixed_cost 500.0;
    variable_cost 50.0;
    scarcity_cost 0.001;
}

object pypower.powerplant
{
    // GREEN_MOUNTAIN: cap=26.0, cf=0.008, units=1
    // SHOSHONE: cap=14.4, cf=0.005, units=1
    name "wecc240_psse_G_7002_HT";
    parent "wecc240_psse_G_7002";
    latitude 40.52;
    longitude -107.5;
    generator HT;
    operating_capacity 40.4 MW;
    startup_cost 0.0;
    shutdown_cost 0.0;
    fixed_cost 200.0;
    variable_cost 0.0;
    scarcity_cost 0.001;
}

object pypower.powerplant
{
    // Ameresco HCE Solar, LLC: cap=4.5, cf=0.0, units=1
    // Eagle Springs Solar, LLC: cap=1.0, cf=0.0, units=1
    // Oak Leaf Solar XXXII (CSG): cap=1.5, cf=0.0, units=1
    // Pitkin County Solar: cap=5.0, cf=0.0, units=1
    // Pivot Solar 3, LLC (CSG): cap=2.0, cf=0.0, units=1
    // Pivot Solar 7, LLC (CSG): cap=2.0, cf=0.0, units=1
    // Sunnyside Ranch Community Solar Array: cap=1.5, cf=0.0, units=1
    // WWRF Solar Plant: cap=1.3, cf=0.0, units=1
    name "wecc240_psse_G_7002_PV";
    parent "wecc240_psse_G_7002";
    latitude 40.52;
    longitude -107.5;
    generator PV;
    operating_capacity 18.8 MW;
    startup_cost 0.0;
    shutdown_cost 0.0;
    fixed_cost 0.0;
    variable_cost 0.0;
    scarcity_cost 0.0;
}

object pypower.powerplant
{
    // CRAIG: cap=1427.6, cf=0.463, units=1
    // EAGLE_VALLEY_CLEAN_ENERGY_LLC_BIOMASS: cap=12.6, cf=0.004, units=1
    // HAYDEN: cap=465.4, cf=0.151, units=1
    name "wecc240_psse_G_7002_ST";
    parent "wecc240_psse_G_7002";
    latitude 40.52;
    longitude -107.5;
    generator ST;
    operating_capacity 1905.6 MW;
    startup_cost 6500.0;
    shutdown_cost 0.0;
    fixed_cost 1000.0;
    variable_cost 5.0;
    scarcity_cost 0.001;
}

object pypower.powerplant
{
    // BLM-JCI: cap=0.1, cf=0.0, units=1
    // Dunlap: cap=136.9, cf=0.0, units=74
    // Ekola Flats: cap=199.29999999999998, cf=0.0, units=51
    // Foote Creek II, III, IV Repowering: cap=46.2, cf=0.0, units=11
    // Medicine Bow: cap=6.27, cf=0.0, units=9
    // Seven Mile Hill I & II: cap=145.1, cf=0.0, units=79
    // TB Flats I & II: cap=503.2, cf=0.0, units=132
    name "wecc240_psse_G_7002_WT";
    parent "wecc240_psse_G_7002";
    latitude 40.52;
    longitude -107.5;
    generator WT;
    operating_capacity 1037.07 MW;
    startup_cost 0.0;
    shutdown_cost 0.0;
    fixed_cost 0.0;
    variable_cost 0.0;
    scarcity_cost 0.0;
}

object pypower.gen
{
    name "wecc240_psse_G_6301";
    parent "wecc240_psse_N_6301";
    Pmax 2566.4 MW;
    Qmax 513.3 MW;
    Qmin -513.3 MW;
    status IN_SERVICE;
    object gencost
    {
        model POLYNOMIAL;
        startup 0.0 $;
        shutdown 0.0 $;
        costs "0.0,0.0,0.0";
    };
}
object pypower.powerplant
{
    // SIMPLOT_PHOSPHATES: cap=11.5, cf=0.004, units=1
    name "wecc240_psse_G_6301_CT";
    parent "wecc240_psse_G_6301";
    latitude 42.09;
    longitude -108.5;
    generator CT;
    operating_capacity 11.5 MW;
    startup_cost 25.0;
    shutdown_cost 0.0;
    fixed_cost 350.0;
    variable_cost 75.0;
    scarcity_cost 0.001;
}

object pypower.powerplant
{
    // BOYSEN: cap=15.0, cf=0.006, units=1
    // BUFFALO_BILL: cap=18.0, cf=0.007, units=1
    name "wecc240_psse_G_6301_HT";
    parent "wecc240_psse_G_6301";
    latitude 42.09;
    longitude -108.5;
    generator HT;
    operating_capacity 33.0 MW;
    startup_cost 0.0;
    shutdown_cost 0.0;
    fixed_cost 200.0;
    variable_cost 0.0;
    scarcity_cost 0.001;
}

object pypower.powerplant
{
    // Sweetwater Solar: cap=80.0, cf=0.0, units=1
    name "wecc240_psse_G_6301_PV";
    parent "wecc240_psse_G_6301";
    latitude 42.09;
    longitude -108.5;
    generator PV;
    operating_capacity 80.0 MW;
    startup_cost 0.0;
    shutdown_cost 0.0;
    fixed_cost 0.0;
    variable_cost 0.0;
    scarcity_cost 0.0;
}

object pypower.powerplant
{
    // JIM_BRIDGER: cap=2441.9, cf=0.951, units=1
    name "wecc240_psse_G_6301_ST";
    parent "wecc240_psse_G_6301";
    latitude 42.09;
    longitude -108.5;
    generator ST;
    operating_capacity 2441.9 MW;
    startup_cost 6500.0;
    shutdown_cost 0.0;
    fixed_cost 1000.0;
    variable_cost 5.0;
    scarcity_cost 0.001;
}

object pypower.gen
{
    name "wecc240_psse_G_6302";
    parent "wecc240_psse_N_6302";
    Pmax 10173.2 MW;
    Qmax 2034.6 MW;
    Qmin -2034.6 MW;
    status IN_SERVICE;
    object gencost
    {
        model POLYNOMIAL;
        startup 0.0 $;
        shutdown 0.0 $;
        costs "0.0,0.0,0.0";
    };
}
object pypower.powerplant
{
    // CHEYENNE_PRAIRIE_GENERATING_STATION: cap=70.0, cf=0.007, units=1
    // FORT_ST_VRAIN: cap=574.2, cf=0.056, units=1
    // JM_SHAFER_GENERATING_STATION: cap=396.9, cf=0.039, units=1
    // UNIVERSITY_OF_COLORADO: cap=33.0, cf=0.003, units=1
    name "wecc240_psse_G_6302_CC";
    parent "wecc240_psse_G_6302";
    latitude 41.38;
    longitude -105.6;
    generator CC;
    operating_capacity 1074.1 MW;
    startup_cost 35.0;
    shutdown_cost 0.0;
    fixed_cost 500.0;
    variable_cost 50.0;
    scarcity_cost 0.001;
}

object pypower.powerplant
{
    // CHEYENNE_PRAIRIE_GENERATING_STATION: cap=70.0, cf=0.007, units=1
    // FORT_LUPTON: cap=100.8, cf=0.01, units=1
    // FORT_ST_VRAIN: cap=574.2, cf=0.056, units=1
    // RAWHIDE: cap=400.2, cf=0.039, units=1
    // SPINDLE_HILL_ENERGY_CENTER: cap=420.0, cf=0.041, units=1
    // VALMONT: cap=29.6, cf=0.003, units=1
    // VALMONT_COMBUSTION_TURBINE_PROJECT: cap=142.2, cf=0.014, units=1
    name "wecc240_psse_G_6302_CT";
    parent "wecc240_psse_G_6302";
    latitude 41.38;
    longitude -105.6;
    generator CT;
    operating_capacity 1737.0 MW;
    startup_cost 25.0;
    shutdown_cost 0.0;
    fixed_cost 350.0;
    variable_cost 75.0;
    scarcity_cost 0.001;
}

object pypower.powerplant
{
    // ALCOVA: cap=41.4, cf=0.004, units=1
    // ESTES: cap=45.0, cf=0.004, units=1
    // FLATIRON: cap=94.5, cf=0.009, units=1
    // FREMONT_CANYON: cap=66.8, cf=0.007, units=1
    // GLENDO: cap=38.0, cf=0.004, units=1
    // KORTES: cap=36.0, cf=0.004, units=1
    // POLE_HILL: cap=38.2, cf=0.004, units=1
    // SEMINOE: cap=51.6, cf=0.005, units=1
    name "wecc240_psse_G_6302_HT";
    parent "wecc240_psse_G_6302";
    latitude 41.38;
    longitude -105.6;
    generator HT;
    operating_capacity 411.5 MW;
    startup_cost 0.0;
    shutdown_cost 0.0;
    fixed_cost 200.0;
    variable_cost 0.0;
    scarcity_cost 0.001;
}

object pypower.powerplant
{
    // Alden Solar (CSG), LLC: cap=1.6, cf=0.0, units=1
    // Bison Solar, LLC: cap=32.4, cf=0.0, units=1
    // City of Boulder WWTP: cap=0.9, cf=0.0, units=1
    // Coyote Ridge Community Solar: cap=1.5, cf=0.0, units=1
    // Gilcrest Solar: cap=1.5, cf=0.0, units=1
    // Gilcrest V (CSG): cap=4.8, cf=0.0, units=1
    // IBM Solar: cap=8.1, cf=0.0, units=1
    // Jack's Solar Garden: cap=1.0, cf=0.0, units=1
    // Lafayette Horizon Solar (CSG), LLC: cap=1.6, cf=0.0, units=1
    // Logan 1 Community Solar Array: cap=1.7, cf=0.0, units=1
    // Mtn Solar 6, LLC (CSG): cap=2.0, cf=0.0, units=1
    // NSE Camber Solar PS11, LLC (CSG): cap=2.0, cf=0.0, units=1
    // NSE Camber Solar PS13, LLC (CSG): cap=2.0, cf=0.0, units=1
    // NSE Camber Solar PS5, LLC (CSG): cap=2.0, cf=0.0, units=1
    // NSE Camber Solar PS6, LLC CSG: cap=2.0, cf=0.0, units=1
    // Oak Leaf Solar XXVII, LLC: cap=1.5, cf=0.0, units=1
    // Oak Leaf Solar XXVIII, LLC (CSG): cap=1.5, cf=0.0, units=1
    // Pivot Solar 12, LLC (CSG): cap=1.0, cf=0.0, units=1
    // Pivot Solar 4, LLC (CSG): cap=2.0, cf=0.0, units=1
    // Pivot Solar 8, LLC (CSG): cap=2.0, cf=0.0, units=1
    // Platteville Solar (CSG), LLC: cap=1.3, cf=0.0, units=1
    // RV CSU Power II, LLC: cap=3.0, cf=0.0, units=1
    // RV CSU Power, LLC: cap=1.9, cf=0.0, units=1
    // Rawhide Prairie Solar Hybrid: cap=22.0, cf=0.0, units=1
    // Riverview Solar: cap=1.5, cf=0.0, units=1
    // SR Jenkins Ft Lupton: cap=13.0, cf=0.0, units=1
    // SR Kersey: cap=3.5, cf=0.0, units=1
    // SR Kersey II: cap=1.0, cf=0.0, units=1
    // SR Mavericks: cap=6.5, cf=0.0, units=1
    // SR Platte Solar Farm: cap=16.0, cf=0.0, units=1
    // SR Rattlesnake: cap=6.0, cf=0.0, units=1
    // SR Skylark B: cap=2.0, cf=0.0, units=1
    // SR Skylark C: cap=1.1, cf=0.0, units=1
    // Skylark: cap=4.0, cf=0.0, units=1
    // Sterling PV 3: cap=1.6, cf=0.0, units=1
    // Tom Sifers Solar: cap=1.0, cf=0.0, units=1
    // Valley View Solar: cap=4.0, cf=0.0, units=1
    // Weld 1 Community Solar Array: cap=1.5, cf=0.0, units=1
    // Whiskey Hill Solar: cap=1.0, cf=0.0, units=1
    name "wecc240_psse_G_6302_PV";
    parent "wecc240_psse_G_6302";
    latitude 41.38;
    longitude -105.6;
    generator PV;
    operating_capacity 165.0 MW;
    startup_cost 0.0;
    shutdown_cost 0.0;
    fixed_cost 0.0;
    variable_cost 0.0;
    scarcity_cost 0.0;
}

object pypower.powerplant
{
    // DAVE_JOHNSTON: cap=922.2, cf=0.091, units=1
    // LARAMIE_RIVER_STATION: cap=1710.0, cf=0.168, units=1
    // RAWHIDE: cap=400.2, cf=0.039, units=1
    // VALMONT: cap=29.6, cf=0.003, units=1
    name "wecc240_psse_G_6302_ST";
    parent "wecc240_psse_G_6302";
    latitude 41.38;
    longitude -105.6;
    generator ST;
    operating_capacity 3062.0 MW;
    startup_cost 6500.0;
    shutdown_cost 0.0;
    fixed_cost 1000.0;
    variable_cost 5.0;
    scarcity_cost 0.001;
}

object pypower.powerplant
{
    // Air Force (Laramie): cap=2.0, cf=0.0, units=1
    // Campbell Hill: cap=99.0, cf=0.0, units=66
    // Casper Wind Farm: cap=16.5, cf=0.0, units=11
    // Cedar Creek: cap=300.5, cf=0.0, units=274
    // Cedar Creek II: cap=248.3, cf=0.0, units=122
    // Cedar Springs I: cap=199.39999999999998, cf=0.0, units=72
    // Cedar Springs II: cap=199.39999999999998, cf=0.0, units=72
    // Cedar Springs III: cap=133.28, cf=0.0, units=48
    // Colorado Highlands: cap=91.0, cf=0.0, units=56
    // Corriedale Wind Energy Project: cap=59.22, cf=0.0, units=21
    // F.E. Warren Air Force Base: cap=1.32, cf=0.0, units=2
    // Glenrock: cap=119.30000000000001, cf=0.0, units=66
    // Glenrock III: cap=45.65, cf=0.0, units=26
    // Happy Jack: cap=29.400000000000002, cf=0.0, units=14
    // High Plains: cap=122.10000000000001, cf=0.0, units=66
    // McFadden Ridge: cap=35.15, cf=0.0, units=19
    // Mountain Breeze: cap=171.72, cf=0.0, units=62
    // Niyol Wind: cap=206.44, cf=0.0, units=74
    // Northeast Colorado Wind: cap=175.7, cf=0.0, units=81
    // Panorama Wind: cap=145.0, cf=0.0, units=66
    // Peetz Table: cap=413.8, cf=0.0, units=267
    // Peetz Table Wind Farm: cap=29.7, cf=0.0, units=33
    // Pioneer Wind Park: cap=85.10000000000001, cf=0.0, units=46
    // Rolling Hills: cap=115.80000000000001, cf=0.0, units=66
    // Roundhouse: cap=226.55999999999997, cf=0.0, units=82
    // Roundhouse Wind II: cap=87.39999999999999, cf=0.0, units=38
    // Silver Sage: cap=42.0, cf=0.0, units=20
    // Spring Canyon: cap=60.0, cf=0.0, units=40
    // Spring Canyon Expansion: cap=62.65, cf=0.0, units=35
    // Top of the World: cap=200.2, cf=0.0, units=110
    name "wecc240_psse_G_6302_WT";
    parent "wecc240_psse_G_6302";
    latitude 41.38;
    longitude -105.6;
    generator WT;
    operating_capacity 3723.59 MW;
    startup_cost 0.0;
    shutdown_cost 0.0;
    fixed_cost 0.0;
    variable_cost 0.0;
    scarcity_cost 0.0;
}

object pypower.gen
{
    name "wecc240_psse_G_4007";
    parent "wecc240_psse_N_4007";
    Pmax 141.8 MW;
    Qmax 28.4 MW;
    Qmin -28.4 MW;
    status IN_SERVICE;
    object gencost
    {
        model POLYNOMIAL;
        startup 0.0 $;
        shutdown 0.0 $;
        costs "0.0,0.0,0.0";
    };
}
object pypower.powerplant
{
    // FARADAY: cap=19.2, cf=0.135, units=1
    // NORTH_FORK: cap=40.8, cf=0.288, units=1
    // OAK_GROVE: cap=51.0, cf=0.36, units=1
    // RIVER_MILL: cap=18.8, cf=0.133, units=1
    // STONE_CREEK: cap=12.0, cf=0.085, units=1
    name "wecc240_psse_G_4007_HT";
    parent "wecc240_psse_G_4007";
    latitude 45.6;
    longitude -121.1;
    generator HT;
    operating_capacity 141.8 MW;
    startup_cost 0.0;
    shutdown_cost 0.0;
    fixed_cost 200.0;
    variable_cost 0.0;
    scarcity_cost 0.001;
}

object pypower.gen
{
    name "wecc240_psse_G_4006";
    parent "wecc240_psse_N_4006";
    Pmax 4531.7 MW;
    Qmax 906.3 MW;
    Qmin -906.3 MW;
    status IN_SERVICE;
    object gencost
    {
        model POLYNOMIAL;
        startup 0.0 $;
        shutdown 0.0 $;
        costs "0.0,0.0,0.0";
    };
}
object pypower.powerplant
{
    // RIVER_ROAD_GEN_PLANT: cap=248.0, cf=0.055, units=1
    name "wecc240_psse_G_4006_CC";
    parent "wecc240_psse_G_4006";
    latitude 45.61;
    longitude -121.1;
    generator CC;
    operating_capacity 248.0 MW;
    startup_cost 35.0;
    shutdown_cost 0.0;
    fixed_cost 500.0;
    variable_cost 50.0;
    scarcity_cost 0.001;
}

object pypower.powerplant
{
    // BONNEVILLE: cap=1162.0, cf=0.256, units=1
    // PHP_1: cap=23.7, cf=0.005, units=1
    // PHP_2: cap=11.8, cf=0.003, units=1
    // THE_DALLES: cap=1819.7, cf=0.402, units=1
    name "wecc240_psse_G_4006_HT";
    parent "wecc240_psse_G_4006";
    latitude 45.61;
    longitude -121.1;
    generator HT;
    operating_capacity 3017.2 MW;
    startup_cost 0.0;
    shutdown_cost 0.0;
    fixed_cost 200.0;
    variable_cost 0.0;
    scarcity_cost 0.001;
}

object pypower.powerplant
{
    // SDS_LUMBER_GORGE_ENERGY_DIVISION: cap=10.0, cf=0.002, units=1
    name "wecc240_psse_G_4006_ST";
    parent "wecc240_psse_G_4006";
    latitude 45.61;
    longitude -121.1;
    generator ST;
    operating_capacity 10.0 MW;
    startup_cost 6500.0;
    shutdown_cost 0.0;
    fixed_cost 1000.0;
    variable_cost 5.0;
    scarcity_cost 0.001;
}

object pypower.powerplant
{
    // Big Horn: cap=199.5, cf=0.0, units=133
    // Big Horn 2: cap=50.0, cf=0.0, units=25
    // Goodnoe Hills: cap=103.4, cf=0.0, units=47
    // Harvest Wind Farm: cap=98.89999999999999, cf=0.0, units=43
    // Juniper Canyon: cap=151.2, cf=0.0, units=63
    // Linden: cap=50.0, cf=0.0, units=25
    // White Creek: cap=204.7, cf=0.0, units=89
    // Windy Point I (Tuolomne Wind Project): cap=136.6, cf=0.0, units=62
    // Windy Point II: cap=197.79999999999998, cf=0.0, units=86
    // Windy Point II (Windy Flats): cap=6.8999999999999995, cf=0.0, units=3
    // Windy Point IIa (Windy Flats Extension): cap=57.49999999999999, cf=0.0, units=25
    name "wecc240_psse_G_4006_WT";
    parent "wecc240_psse_G_4006";
    latitude 45.61;
    longitude -121.1;
    generator WT;
    operating_capacity 1256.5 MW;
    startup_cost 0.0;
    shutdown_cost 0.0;
    fixed_cost 0.0;
    variable_cost 0.0;
    scarcity_cost 0.0;
}

object pypower.gen
{
    name "wecc240_psse_G_4202";
    parent "wecc240_psse_N_4202";
    Pmax 6836.5 MW;
    Qmax 1367.3 MW;
    Qmin -1367.3 MW;
    status IN_SERVICE;
    object gencost
    {
        model POLYNOMIAL;
        startup 0.0 $;
        shutdown 0.0 $;
        costs "0.0,0.0,0.0";
    };
}
object pypower.powerplant
{
    // BEAVER: cap=305.4, cf=0.045, units=1
    // CHEHALIS_GENERATING_FACILITY: cap=698.0, cf=0.102, units=1
    // FREDERICKSON_POWER_LP: cap=318.3, cf=0.047, units=1
    // GRAYS_HARBOR_ENERGY_FACILITY: cap=697.8, cf=0.102, units=1
    // MINT_FARM_GENERATING_STATION: cap=319.0, cf=0.047, units=1
    // PORT_WESTWARD: cap=483.0, cf=0.071, units=1
    // TRANSALTA_CENTRALIA_GENERATION: cap=729.9, cf=0.107, units=1
    name "wecc240_psse_G_4202_CC";
    parent "wecc240_psse_G_4202";
    latitude 47.06;
    longitude -121.8;
    generator CC;
    operating_capacity 3551.4 MW;
    startup_cost 35.0;
    shutdown_cost 0.0;
    fixed_cost 500.0;
    variable_cost 50.0;
    scarcity_cost 0.001;
}

object pypower.powerplant
{
    // BEAVER: cap=305.4, cf=0.045, units=1
    // FREDERICKSON: cap=177.8, cf=0.026, units=1
    // LONGVIEW_FIBRE: cap=22.5, cf=0.003, units=1
    name "wecc240_psse_G_4202_CT";
    parent "wecc240_psse_G_4202";
    latitude 47.06;
    longitude -121.8;
    generator CT;
    operating_capacity 505.7 MW;
    startup_cost 25.0;
    shutdown_cost 0.0;
    fixed_cost 350.0;
    variable_cost 75.0;
    scarcity_cost 0.001;
}

object pypower.powerplant
{
    // ALDER: cap=50.0, cf=0.007, units=1
    // CEDAR_FALLS: cap=30.0, cf=0.004, units=1
    // COWLITZ_FALLS: cap=70.0, cf=0.01, units=1
    // CUSHMAN_1: cap=43.2, cf=0.006, units=1
    // CUSHMAN_2: cap=84.6, cf=0.012, units=1
    // ELECTRON: cap=22.8, cf=0.003, units=1
    // LAGRANDE: cap=64.0, cf=0.009, units=1
    // MAYFIELD: cap=162.0, cf=0.024, units=1
    // MERWIN: cap=136.0, cf=0.02, units=1
    // MOSSYROCK: cap=300.0, cf=0.044, units=1
    // PACKWOOD: cap=27.5, cf=0.004, units=1
    // SNOQUALMIE: cap=12.8, cf=0.002, units=1
    // SNOQUALMIE_2: cap=38.7, cf=0.006, units=1
    // SWIFT_1: cap=240.0, cf=0.035, units=1
    // TIETON_DAM_HYDRO_ELECTRIC_PROJECT: cap=13.8, cf=0.002, units=1
    // TWIN_FALLS_HYDRO: cap=24.0, cf=0.004, units=1
    // WYNOOCHEE: cap=12.8, cf=0.002, units=1
    // YALE: cap=134.0, cf=0.02, units=1
    // YELM: cap=12.0, cf=0.002, units=1
    name "wecc240_psse_G_4202_HT";
    parent "wecc240_psse_G_4202";
    latitude 47.06;
    longitude -121.8;
    generator HT;
    operating_capacity 1478.2 MW;
    startup_cost 0.0;
    shutdown_cost 0.0;
    fixed_cost 200.0;
    variable_cost 0.0;
    scarcity_cost 0.001;
}

object pypower.powerplant
{
    // PORT_WESTWARD_UNIT_2: cap=225.6, cf=0.033, units=1
    name "wecc240_psse_G_4202_IC";
    parent "wecc240_psse_G_4202";
    latitude 47.06;
    longitude -121.8;
    generator IC;
    operating_capacity 225.6 MW;
    startup_cost 0.0;
    shutdown_cost 0.0;
    fixed_cost 0.0;
    variable_cost 50.0;
    scarcity_cost 0.001;
}

object pypower.powerplant
{
    // GEORGIA-PACIFIC_WAUNA_MILL: cap=36.0, cf=0.005, units=1
    // LONGVIEW_FIBRE: cap=22.5, cf=0.003, units=1
    // SIERRA_PACIFIC_ABERDEEN: cap=18.0, cf=0.003, units=1
    // SIMPSON_TACOMA_KRAFT_BIOMASS: cap=64.0, cf=0.009, units=1
    // TRANSALTA_CENTRALIA_GENERATION: cap=729.9, cf=0.107, units=1
    // WEYERHAEUSER_LONGVIEW_WA: cap=62.4, cf=0.009, units=1
    name "wecc240_psse_G_4202_ST";
    parent "wecc240_psse_G_4202";
    latitude 47.06;
    longitude -121.8;
    generator ST;
    operating_capacity 932.8 MW;
    startup_cost 6500.0;
    shutdown_cost 0.0;
    fixed_cost 1000.0;
    variable_cost 5.0;
    scarcity_cost 0.001;
}

object pypower.powerplant
{
    // Coastal Energy: cap=6.0, cf=0.0, units=4
    // Skookumchuck: cap=136.8, cf=0.0, units=38
    name "wecc240_psse_G_4202_WT";
    parent "wecc240_psse_G_4202";
    latitude 47.06;
    longitude -121.8;
    generator WT;
    operating_capacity 142.8 MW;
    startup_cost 0.0;
    shutdown_cost 0.0;
    fixed_cost 0.0;
    variable_cost 0.0;
    scarcity_cost 0.0;
}

object pypower.gen
{
    name "wecc240_psse_G_4005";
    parent "wecc240_psse_N_4005";
    Pmax 5536.1 MW;
    Qmax 1107.2 MW;
    Qmin -1107.2 MW;
    status IN_SERVICE;
    object gencost
    {
        model POLYNOMIAL;
        startup 0.0 $;
        shutdown 0.0 $;
        costs "0.0,0.0,0.0";
    };
}
object pypower.powerplant
{
    // GOLDENDALE_GENERATING_STATION: cap=284.3, cf=0.051, units=1
    name "wecc240_psse_G_4005_CC";
    parent "wecc240_psse_G_4005";
    latitude 45.68;
    longitude -120.7;
    generator CC;
    operating_capacity 284.3 MW;
    startup_cost 35.0;
    shutdown_cost 0.0;
    fixed_cost 500.0;
    variable_cost 50.0;
    scarcity_cost 0.001;
}

object pypower.powerplant
{
    // ROOSEVELT_BIOGAS_1: cap=36.5, cf=0.007, units=1
    // WASTE_MANAGEMENT_COLUMBIA_RIDGE_LFGTE: cap=12.8, cf=0.002, units=1
    name "wecc240_psse_G_4005_CT";
    parent "wecc240_psse_G_4005";
    latitude 45.68;
    longitude -120.7;
    generator CT;
    operating_capacity 49.3 MW;
    startup_cost 25.0;
    shutdown_cost 0.0;
    fixed_cost 350.0;
    variable_cost 75.0;
    scarcity_cost 0.001;
}

object pypower.powerplant
{
    // JOHN_DAY: cap=2160.0, cf=0.39, units=1
    name "wecc240_psse_G_4005_HT";
    parent "wecc240_psse_G_4005";
    latitude 45.68;
    longitude -120.7;
    generator HT;
    operating_capacity 2160.0 MW;
    startup_cost 0.0;
    shutdown_cost 0.0;
    fixed_cost 200.0;
    variable_cost 0.0;
    scarcity_cost 0.001;
}

object pypower.powerplant
{
    // Montague Solar: cap=162.0, cf=0.0, units=1
    // WyEast Solar: cap=10.0, cf=0.0, units=1
    name "wecc240_psse_G_4005_PV";
    parent "wecc240_psse_G_4005";
    latitude 45.68;
    longitude -120.7;
    generator PV;
    operating_capacity 172.0 MW;
    startup_cost 0.0;
    shutdown_cost 0.0;
    fixed_cost 0.0;
    variable_cost 0.0;
    scarcity_cost 0.0;
}

object pypower.powerplant
{
    // Biglow Canyon I: cap=125.39999999999999, cf=0.0, units=76
    // Biglow Canyon II: cap=149.5, cf=0.0, units=65
    // Biglow Canyon III: cap=174.79999999999998, cf=0.0, units=76
    // Condon Wind Project, phase I: cap=24.599999999999998, cf=0.0, units=41
    // Condon Wind Project, phase II: cap=25.2, cf=0.0, units=42
    // Golden Hills (Oregon): cap=197.0, cf=0.0, units=50
    // Hay Canyon: cap=100.80000000000001, cf=0.0, units=48
    // Horseshoe Bend: cap=167.75, cf=0.0, units=61
    // Klondike I: cap=24.0, cf=0.0, units=16
    // Klondike II: cap=80.0, cf=0.0, units=50
    // Klondike III: cap=221.2, cf=0.0, units=124
    // Klondike IIIA: cap=78.0, cf=0.0, units=52
    // Leaning Juniper: cap=109.2, cf=0.0, units=67
    // Leaning Juniper II: cap=201.3, cf=0.0, units=117
    // Montague: cap=200.85, cf=0.0, units=56
    // North Hurlburt: cap=68.25, cf=0.0, units=24
    // PaTu Wind Farm: cap=9.0, cf=0.0, units=6
    // Pebble Springs: cap=98.7, cf=0.0, units=47
    // Rattlesnake Road: cap=102.9, cf=0.0, units=49
    // Shepherds Flat: cap=249.75, cf=0.0, units=82
    // South Hurlburt: cap=240.0, cf=0.0, units=85
    // Star Point: cap=98.7, cf=0.0, units=47
    // Wheatfield: cap=96.60000000000001, cf=0.0, units=46
    // Willow Creek: cap=27.0, cf=0.0, units=18
    name "wecc240_psse_G_4005_WT";
    parent "wecc240_psse_G_4005";
    latitude 45.68;
    longitude -120.7;
    generator WT;
    operating_capacity 2870.5 MW;
    startup_cost 0.0;
    shutdown_cost 0.0;
    fixed_cost 0.0;
    variable_cost 0.0;
    scarcity_cost 0.0;
}

object pypower.gen
{
    name "wecc240_psse_G_4102";
    parent "wecc240_psse_N_4102";
    Pmax 12069.4 MW;
    Qmax 2413.9 MW;
    Qmin -2413.9 MW;
    status IN_SERVICE;
    object gencost
    {
        model POLYNOMIAL;
        startup 0.0 $;
        shutdown 0.0 $;
        costs "0.0,0.0,0.0";
    };
}
object pypower.powerplant
{
    // CARTY_GENERATING_STATION: cap=500.0, cf=0.041, units=1
    // COYOTE_SPRINGS: cap=296.0, cf=0.025, units=1
    // COYOTE_SPRINGS_II: cap=287.0, cf=0.024, units=1
    // HERMISTON_GENERATING_PLANT: cap=621.2, cf=0.051, units=1
    // HERMISTON_POWER_PARTNERSHIP: cap=689.4, cf=0.057, units=1
    name "wecc240_psse_G_4102_CC";
    parent "wecc240_psse_G_4102";
    latitude 46.67;
    longitude -119.6;
    generator CC;
    operating_capacity 2393.6 MW;
    startup_cost 35.0;
    shutdown_cost 0.0;
    fixed_cost 500.0;
    variable_cost 50.0;
    scarcity_cost 0.001;
}

object pypower.powerplant
{
    // CHANDLER: cap=12.0, cf=0.001, units=1
    // ICE_HARBOR: cap=603.0, cf=0.05, units=1
    // LOWER_MONUMENTAL: cap=810.0, cf=0.067, units=1
    // MCNARY: cap=990.5, cf=0.082, units=1
    // MCNARY_DAM_FISH_ATTRACTION_PROJECT: cap=10.0, cf=0.001, units=1
    // PRIEST_RAPIDS: cap=955.6, cf=0.079, units=1
    // ROCKY_REACH: cap=1299.6, cf=0.108, units=1
    // ROCK_ISLAND: cap=629.4, cf=0.052, units=1
    // ROZA: cap=12.9, cf=0.001, units=1
    // WANAPUM: cap=1098.0, cf=0.091, units=1
    name "wecc240_psse_G_4102_HT";
    parent "wecc240_psse_G_4102";
    latitude 46.67;
    longitude -119.6;
    generator HT;
    operating_capacity 6421.0 MW;
    startup_cost 0.0;
    shutdown_cost 0.0;
    fixed_cost 200.0;
    variable_cost 0.0;
    scarcity_cost 0.001;
}

object pypower.powerplant
{
    // Adams Nielson Solar: cap=19.2, cf=0.0, units=1
    // Camas Solar Project: cap=5.0, cf=0.0, units=1
    // Horn Rapids Solar, Storage and Training: cap=3.2, cf=0.0, units=1
    // NorWest Energy 9, LLC: cap=6.0, cf=0.0, units=1
    // Penstemon Solar Project: cap=5.0, cf=0.0, units=1
    // Wheatridge Hybrid: cap=50.0, cf=0.0, units=1
    name "wecc240_psse_G_4102_PV";
    parent "wecc240_psse_G_4102";
    latitude 46.67;
    longitude -119.6;
    generator PV;
    operating_capacity 88.4 MW;
    startup_cost 0.0;
    shutdown_cost 0.0;
    fixed_cost 0.0;
    variable_cost 0.0;
    scarcity_cost 0.0;
}

object pypower.powerplant
{
    // COLUMBIA_GENERATING_STATION: cap=1200.0, cf=0.099, units=1
    name "wecc240_psse_G_4102_ST";
    parent "wecc240_psse_G_4102";
    latitude 46.67;
    longitude -119.6;
    generator ST;
    operating_capacity 1200.0 MW;
    startup_cost 6500.0;
    shutdown_cost 0.0;
    fixed_cost 1000.0;
    variable_cost 5.0;
    scarcity_cost 0.001;
}

object pypower.powerplant
{
    // Chopin: cap=9.899999999999999, cf=0.0, units=6
    // Chopin (Phase II): cap=8.65, cf=0.0, units=5
    // Combine Hills I: cap=41.0, cf=0.0, units=41
    // Combine Hills II: cap=63.0, cf=0.0, units=63
    // Echo 1-7: cap=44.55, cf=0.0, units=27
    // Echo 8-9: cap=20.0, cf=0.0, units=10
    // Horseshoe Bend: cap=151.25, cf=0.0, units=55
    // Nine Canyon: cap=48.1, cf=0.0, units=37
    // Nine Canyon II: cap=15.600000000000001, cf=0.0, units=12
    // Nine Canyon III: cap=32.199999999999996, cf=0.0, units=14
    // Orchard Wind: cap=40.0, cf=0.0, units=16
    // Rattlesnake Flat: cap=149.9, cf=0.0, units=57
    // Sagebrush (Kittitas Valley): cap=100.80000000000001, cf=0.0, units=48
    // South Hurlburt: cap=93.25, cf=0.0, units=31
    // Stateline Wind Project: cap=299.64, cf=0.0, units=454
    // Swauk Valley: cap=4.25, cf=0.0, units=5
    // Threemile Canyon: cap=9.899999999999999, cf=0.0, units=6
    // Vansycle I: cap=25.080000000000002, cf=0.0, units=38
    // Vansycle II: cap=102.19999999999999, cf=0.0, units=43
    // Vantage Point: cap=90.0, cf=0.0, units=60
    // Wheatridge Wind: cap=299.54, cf=0.0, units=120
    // Wild Horse I: cap=228.6, cf=0.0, units=127
    // Wild Horse II: cap=44.0, cf=0.0, units=22
    // Willow Creek: cap=45.0, cf=0.0, units=30
    name "wecc240_psse_G_4102_WT";
    parent "wecc240_psse_G_4102";
    latitude 46.67;
    longitude -119.6;
    generator WT;
    operating_capacity 1966.41 MW;
    startup_cost 0.0;
    shutdown_cost 0.0;
    fixed_cost 0.0;
    variable_cost 0.0;
    scarcity_cost 0.0;
}

object pypower.gen
{
    name "wecc240_psse_G_4201";
    parent "wecc240_psse_N_4201";
    Pmax 1379.1 MW;
    Qmax 275.8 MW;
    Qmin -275.8 MW;
    status IN_SERVICE;
    object gencost
    {
        model POLYNOMIAL;
        startup 0.0 $;
        shutdown 0.0 $;
        costs "0.0,0.0,0.0";
    };
}
object pypower.powerplant
{
    // MARCH_POINT_COGENERATION: cap=69.9, cf=0.051, units=1
    name "wecc240_psse_G_4201_CC";
    parent "wecc240_psse_G_4201";
    latitude 48.22;
    longitude -121.8;
    generator CC;
    operating_capacity 69.9 MW;
    startup_cost 35.0;
    shutdown_cost 0.0;
    fixed_cost 500.0;
    variable_cost 50.0;
    scarcity_cost 0.001;
}

object pypower.powerplant
{
    // MARCH_POINT_COGENERATION: cap=69.9, cf=0.051, units=1
    name "wecc240_psse_G_4201_CT";
    parent "wecc240_psse_G_4201";
    latitude 48.22;
    longitude -121.8;
    generator CT;
    operating_capacity 69.9 MW;
    startup_cost 25.0;
    shutdown_cost 0.0;
    fixed_cost 350.0;
    variable_cost 75.0;
    scarcity_cost 0.001;
}

object pypower.powerplant
{
    // DIABLO: cap=182.4, cf=0.132, units=1
    // GORGE: cap=207.3, cf=0.15, units=1
    // H_M_JACKSON: cap=111.8, cf=0.081, units=1
    // KOMA_KULSHAN_ASSOCIATES: cap=12.0, cf=0.009, units=1
    // LOWER_BAKER: cap=111.2, cf=0.081, units=1
    // ROSS: cap=450.0, cf=0.326, units=1
    // SOUTH_FORK_TOLT: cap=16.8, cf=0.012, units=1
    // UPPER_BAKER: cap=104.8, cf=0.076, units=1
    name "wecc240_psse_G_4201_HT";
    parent "wecc240_psse_G_4201";
    latitude 48.22;
    longitude -121.8;
    generator HT;
    operating_capacity 1196.3 MW;
    startup_cost 0.0;
    shutdown_cost 0.0;
    fixed_cost 200.0;
    variable_cost 0.0;
    scarcity_cost 0.001;
}

object pypower.powerplant
{
    // SIERRA_PACIFIC_BURLINGTON_FACILITY: cap=28.0, cf=0.02, units=1
    // UNIVERSITY_OF_WASHINGTON_POWER_PLANT: cap=15.0, cf=0.011, units=1
    name "wecc240_psse_G_4201_ST";
    parent "wecc240_psse_G_4201";
    latitude 48.22;
    longitude -121.8;
    generator ST;
    operating_capacity 43.0 MW;
    startup_cost 6500.0;
    shutdown_cost 0.0;
    fixed_cost 1000.0;
    variable_cost 5.0;
    scarcity_cost 0.001;
}

object pypower.gen
{
    name "wecc240_psse_G_5001";
    parent "wecc240_psse_N_5001";
    Pmax 756.6 MW;
    Qmax 151.3 MW;
    Qmin -151.3 MW;
    status IN_SERVICE;
    object gencost
    {
        model POLYNOMIAL;
        startup 0.0 $;
        shutdown 0.0 $;
        costs "0.0,0.0,0.0";
    };
}
object pypower.powerplant
{
    // ENCOGEN: cap=176.4, cf=0.233, units=1
    // FERNDALE_GENERATING_STATION: cap=285.5, cf=0.377, units=1
    // SUMAS_POWER_PLANT: cap=125.5, cf=0.166, units=1
    name "wecc240_psse_G_5001_CC";
    parent "wecc240_psse_G_5001";
    latitude 49.43;
    longitude -122.3;
    generator CC;
    operating_capacity 587.4 MW;
    startup_cost 35.0;
    shutdown_cost 0.0;
    fixed_cost 500.0;
    variable_cost 50.0;
    scarcity_cost 0.001;
}

object pypower.powerplant
{
    // WHITEHORN: cap=169.2, cf=0.224, units=1
    name "wecc240_psse_G_5001_CT";
    parent "wecc240_psse_G_5001";
    latitude 49.43;
    longitude -122.3;
    generator CT;
    operating_capacity 169.2 MW;
    startup_cost 25.0;
    shutdown_cost 0.0;
    fixed_cost 350.0;
    variable_cost 75.0;
    scarcity_cost 0.001;
}

object pypower.gen
{
    name "wecc240_psse_G_4101";
    parent "wecc240_psse_N_4101";
    Pmax 10275.0 MW;
    Qmax 2055.0 MW;
    Qmin -2055.0 MW;
    status IN_SERVICE;
    object gencost
    {
        model POLYNOMIAL;
        startup 0.0 $;
        shutdown 0.0 $;
        costs "0.0,0.0,0.0";
    };
}
object pypower.powerplant
{
    // KETTLE_FALLS_GENERATING_STATION: cap=28.9, cf=0.003, units=1
    name "wecc240_psse_G_4101_CT";
    parent "wecc240_psse_G_4101";
    latitude 47.95;
    longitude -119.0;
    generator CT;
    operating_capacity 28.9 MW;
    startup_cost 25.0;
    shutdown_cost 0.0;
    fixed_cost 350.0;
    variable_cost 75.0;
    scarcity_cost 0.001;
}

object pypower.powerplant
{
    // CHELAN: cap=59.2, cf=0.006, units=1
    // CHIEF_JOSEPH: cap=2456.2, cf=0.239, units=1
    // GRAND_COULEE: cap=6809.0, cf=0.663, units=1
    // MAIN_CANAL_HEADWORKS: cap=26.8, cf=0.003, units=1
    // SUMMER_FALLS_POWER_PLANT: cap=92.0, cf=0.009, units=1
    // WELLS: cap=774.0, cf=0.075, units=1
    name "wecc240_psse_G_4101_HT";
    parent "wecc240_psse_G_4101";
    latitude 47.95;
    longitude -119.0;
    generator HT;
    operating_capacity 10217.2 MW;
    startup_cost 0.0;
    shutdown_cost 0.0;
    fixed_cost 200.0;
    variable_cost 0.0;
    scarcity_cost 0.001;
}

object pypower.powerplant
{
    // KETTLE_FALLS_GENERATING_STATION: cap=28.9, cf=0.003, units=1
    name "wecc240_psse_G_4101_ST";
    parent "wecc240_psse_G_4101";
    latitude 47.95;
    longitude -119.0;
    generator ST;
    operating_capacity 28.9 MW;
    startup_cost 6500.0;
    shutdown_cost 0.0;
    fixed_cost 1000.0;
    variable_cost 5.0;
    scarcity_cost 0.001;
}

object pypower.gen
{
    name "wecc240_psse_G_4103";
    parent "wecc240_psse_N_4103";
    Pmax 5591.1 MW;
    Qmax 1118.2 MW;
    Qmin -1118.2 MW;
    status IN_SERVICE;
    object gencost
    {
        model POLYNOMIAL;
        startup 0.0 $;
        shutdown 0.0 $;
        costs "0.0,0.0,0.0";
    };
}
object pypower.powerplant
{
    // RATHDRUM_POWER_LLC: cap=301.5, cf=0.054, units=1
    name "wecc240_psse_G_4103_CC";
    parent "wecc240_psse_G_4103";
    latitude 47.74;
    longitude -117.4;
    generator CC;
    operating_capacity 301.5 MW;
    startup_cost 35.0;
    shutdown_cost 0.0;
    fixed_cost 500.0;
    variable_cost 50.0;
    scarcity_cost 0.001;
}

object pypower.powerplant
{
    // NORTHEAST: cap=61.8, cf=0.011, units=1
    // RATHDRUM: cap=166.4, cf=0.03, units=1
    // WHEELABRATOR_SPOKANE: cap=26.0, cf=0.005, units=1
    name "wecc240_psse_G_4103_CT";
    parent "wecc240_psse_G_4103";
    latitude 47.74;
    longitude -117.4;
    generator CT;
    operating_capacity 254.2 MW;
    startup_cost 25.0;
    shutdown_cost 0.0;
    fixed_cost 350.0;
    variable_cost 75.0;
    scarcity_cost 0.001;
}

object pypower.powerplant
{
    // ALBENI_FALLS: cap=42.0, cf=0.008, units=1
    // CABINET_GORGE: cap=265.2, cf=0.047, units=1
    // DWORSHAK: cap=465.0, cf=0.083, units=1
    // LIBBY: cap=525.0, cf=0.094, units=1
    // LITTLE_FALLS: cap=43.2, cf=0.008, units=1
    // LITTLE_GOOSE: cap=810.0, cf=0.145, units=1
    // LONG_LAKE: cap=70.0, cf=0.013, units=1
    // LOWER_GRANITE: cap=810.0, cf=0.145, units=1
    // MONROE_STREET: cap=14.8, cf=0.003, units=1
    // NINE_MILE: cap=37.6, cf=0.007, units=1
    // NOXON_RAPIDS: cap=569.5, cf=0.102, units=1
    // POST_FALLS: cap=14.5, cf=0.003, units=1
    // THOMPSON_FALLS: cap=98.1, cf=0.018, units=1
    // UPPER_FALLS: cap=10.0, cf=0.002, units=1
    // UPRIVER_DAM_HYDRO_PLANT: cap=17.6, cf=0.003, units=1
    name "wecc240_psse_G_4103_HT";
    parent "wecc240_psse_G_4103";
    latitude 47.74;
    longitude -117.4;
    generator HT;
    operating_capacity 3792.5 MW;
    startup_cost 0.0;
    shutdown_cost 0.0;
    fixed_cost 200.0;
    variable_cost 0.0;
    scarcity_cost 0.001;
}

object pypower.powerplant
{
    // BOULDER_PARK: cap=24.6, cf=0.004, units=1
    name "wecc240_psse_G_4103_IC";
    parent "wecc240_psse_G_4103";
    latitude 47.74;
    longitude -117.4;
    generator IC;
    operating_capacity 24.6 MW;
    startup_cost 0.0;
    shutdown_cost 0.0;
    fixed_cost 0.0;
    variable_cost 50.0;
    scarcity_cost 0.001;
}

object pypower.powerplant
{
    // CLEARWATER_PAPER_IPP_LEWISTON: cap=113.8, cf=0.02, units=1
    name "wecc240_psse_G_4103_ST";
    parent "wecc240_psse_G_4103";
    latitude 47.74;
    longitude -117.4;
    generator ST;
    operating_capacity 113.8 MW;
    startup_cost 6500.0;
    shutdown_cost 0.0;
    fixed_cost 1000.0;
    variable_cost 5.0;
    scarcity_cost 0.001;
}

object pypower.powerplant
{
    // Hopkins Ridge II: cap=7.2, cf=0.0, units=4
    // Hopkins Ridge Wind Project: cap=149.4, cf=0.0, units=83
    // Lower Snake River Phase I: cap=342.7, cf=0.0, units=149
    // Marengo I: cap=156.0, cf=0.0, units=78
    // Marengo II: cap=78.0, cf=0.0, units=39
    // Palouse: cap=104.4, cf=0.0, units=58
    // Tucannon River: cap=266.79999999999995, cf=0.0, units=116
    name "wecc240_psse_G_4103_WT";
    parent "wecc240_psse_G_4103";
    latitude 47.74;
    longitude -117.4;
    generator WT;
    operating_capacity 1104.5 MW;
    startup_cost 0.0;
    shutdown_cost 0.0;
    fixed_cost 0.0;
    variable_cost 0.0;
    scarcity_cost 0.0;
}

object pypower.gen
{
    name "wecc240_psse_G_6202";
    parent "wecc240_psse_N_6202";
    Pmax 979.6 MW;
    Qmax 195.9 MW;
    Qmin -195.9 MW;
    status IN_SERVICE;
    object gencost
    {
        model POLYNOMIAL;
        startup 0.0 $;
        shutdown 0.0 $;
        costs "0.0,0.0,0.0";
    };
}
object pypower.powerplant
{
    // DAVE_GATES_GENERATING_STATION: cap=203.1, cf=0.207, units=1
    name "wecc240_psse_G_6202_CT";
    parent "wecc240_psse_G_6202";
    latitude 46.51;
    longitude -112.9;
    generator CT;
    operating_capacity 203.1 MW;
    startup_cost 25.0;
    shutdown_cost 0.0;
    fixed_cost 350.0;
    variable_cost 75.0;
    scarcity_cost 0.001;
}

object pypower.powerplant
{
    // HUNGRY_HORSE: cap=428.0, cf=0.437, units=1
    // KERR: cap=207.6, cf=0.212, units=1
    name "wecc240_psse_G_6202_HT";
    parent "wecc240_psse_G_6202";
    latitude 46.51;
    longitude -112.9;
    generator HT;
    operating_capacity 635.6 MW;
    startup_cost 0.0;
    shutdown_cost 0.0;
    fixed_cost 200.0;
    variable_cost 0.0;
    scarcity_cost 0.001;
}

object pypower.powerplant
{
    // BASIN_CREEK_PLANT: cap=54.9, cf=0.056, units=1
    name "wecc240_psse_G_6202_IC";
    parent "wecc240_psse_G_6202";
    latitude 46.51;
    longitude -112.9;
    generator IC;
    operating_capacity 54.9 MW;
    startup_cost 0.0;
    shutdown_cost 0.0;
    fixed_cost 0.0;
    variable_cost 50.0;
    scarcity_cost 0.001;
}

object pypower.powerplant
{
    // Apex Solar: cap=80.0, cf=0.0, units=1
    // Great Divide Solar, LLC: cap=3.0, cf=0.0, units=1
    // Green Meadow Solar, LLC: cap=3.0, cf=0.0, units=1
    name "wecc240_psse_G_6202_PV";
    parent "wecc240_psse_G_6202";
    latitude 46.51;
    longitude -112.9;
    generator PV;
    operating_capacity 86.0 MW;
    startup_cost 0.0;
    shutdown_cost 0.0;
    fixed_cost 0.0;
    variable_cost 0.0;
    scarcity_cost 0.0;
}

object pypower.gen
{
    name "wecc240_psse_G_5003";
    parent "wecc240_psse_N_5003";
    Pmax 1246.7 MW;
    Qmax 249.3 MW;
    Qmin -249.3 MW;
    status IN_SERVICE;
    object gencost
    {
        model POLYNOMIAL;
        startup 0.0 $;
        shutdown 0.0 $;
        costs "0.0,0.0,0.0";
    };
}
object pypower.powerplant
{
    // BOUNDARY: cap=1118.6, cf=0.897, units=1
    // BOX_CANYON: cap=90.0, cf=0.072, units=1
    // SMITH_FALLS_HYDRO_PROJECT: cap=38.1, cf=0.031, units=1
    name "wecc240_psse_G_5003_HT";
    parent "wecc240_psse_G_5003";
    latitude 49.69;
    longitude -117.4;
    generator HT;
    operating_capacity 1246.7 MW;
    startup_cost 0.0;
    shutdown_cost 0.0;
    fixed_cost 200.0;
    variable_cost 0.0;
    scarcity_cost 0.001;
}

object pypower.gen
{
    name "wecc240_psse_G_6205";
    parent "wecc240_psse_N_6205";
    Pmax 1168.9 MW;
    Qmax 233.8 MW;
    Qmin -233.8 MW;
    status IN_SERVICE;
    object gencost
    {
        model POLYNOMIAL;
        startup 0.0 $;
        shutdown 0.0 $;
        costs "0.0,0.0,0.0";
    };
}
object pypower.powerplant
{
    // BLACK_EAGLE: cap=24.0, cf=0.021, units=1
    // CANYON_FERRY: cap=49.8, cf=0.043, units=1
    // COCHRANE: cap=60.4, cf=0.052, units=1
    // HAUSER: cap=17.7, cf=0.015, units=1
    // HOLTER: cap=38.4, cf=0.033, units=1
    // MORONY: cap=63.0, cf=0.054, units=1
    // MYSTIC: cap=12.0, cf=0.01, units=1
    // RAINBOW: cap=59.0, cf=0.05, units=1
    // RYAN: cap=52.8, cf=0.045, units=1
    // TURNBULL_HYDRO: cap=13.0, cf=0.011, units=1
    name "wecc240_psse_G_6205_HT";
    parent "wecc240_psse_G_6205";
    latitude 47.43;
    longitude -111.3;
    generator HT;
    operating_capacity 390.1 MW;
    startup_cost 0.0;
    shutdown_cost 0.0;
    fixed_cost 200.0;
    variable_cost 0.0;
    scarcity_cost 0.001;
}

object pypower.powerplant
{
    // Black Eagle Solar, LLC: cap=3.0, cf=0.0, units=1
    // Magpie Solar, LLC: cap=3.0, cf=0.0, units=1
    // River Bend Solar, LLC: cap=2.0, cf=0.0, units=1
    name "wecc240_psse_G_6205_PV";
    parent "wecc240_psse_G_6205";
    latitude 47.43;
    longitude -111.3;
    generator PV;
    operating_capacity 8.0 MW;
    startup_cost 0.0;
    shutdown_cost 0.0;
    fixed_cost 0.0;
    variable_cost 0.0;
    scarcity_cost 0.0;
}

object pypower.powerplant
{
    // Big Timber: cap=25.060000000000002, cf=0.0, units=14
    // Fairfield Wind Farm: cap=10.0, cf=0.0, units=6
    // Glacier I: cap=106.5, cf=0.0, units=71
    // Glacier Wind II: cap=103.5, cf=0.0, units=69
    // Gordon Butte: cap=9.0, cf=0.0, units=6
    // Greenfield Wind Farm: cap=29.9, cf=0.0, units=13
    // Horseshoe Bend/ranch pit: cap=9.0, cf=0.0, units=6
    // Judith Gap: cap=135.0, cf=0.0, units=90
    // Martinsdale Colony South: cap=2.0, cf=0.0, units=8
    // Martinsdale Wind Farm: cap=0.7150000000000001, cf=0.0, units=11
    // Musselshell I: cap=10.5, cf=0.0, units=7
    // Musselshell II: cap=10.5, cf=0.0, units=7
    // Rim Rock: cap=189.0, cf=0.0, units=126
    // South Peak: cap=79.89999999999999, cf=0.0, units=29
    // Spion Kop: cap=40.0, cf=0.0, units=25
    // Two Dot: cap=9.72, cf=0.0, units=6
    // Two Dot Wind Farm: cap=0.455, cf=0.0, units=7
    name "wecc240_psse_G_6205_WT";
    parent "wecc240_psse_G_6205";
    latitude 47.43;
    longitude -111.3;
    generator WT;
    operating_capacity 770.75 MW;
    startup_cost 0.0;
    shutdown_cost 0.0;
    fixed_cost 0.0;
    variable_cost 0.0;
    scarcity_cost 0.0;
}

object pypower.gen
{
    name "wecc240_psse_G_6201";
    parent "wecc240_psse_N_6201";
    Pmax 5970.1 MW;
    Qmax 1194.0 MW;
    Qmin -1194.0 MW;
    status IN_SERVICE;
    object gencost
    {
        model POLYNOMIAL;
        startup 0.0 $;
        shutdown 0.0 $;
        costs "0.0,0.0,0.0";
    };
}
object pypower.powerplant
{
    // ARVADA: cap=22.5, cf=0.004, units=1
    // BARBER_CREEK: cap=22.5, cf=0.004, units=1
    // CULBERTSON_GENERATION_STATION: cap=91.0, cf=0.015, units=1
    // GLENDIVE_GT: cap=83.7, cf=0.014, units=1
    // HARTZOG: cap=22.5, cf=0.004, units=1
    // MILES_CITY_GT: cap=23.3, cf=0.004, units=1
    // NEIL_SIMPSON_GAS_TURBINE_2: cap=40.0, cf=0.007, units=1
    // NEIL_SIMPSON_II: cap=65.0, cf=0.011, units=1
    // OREG_1_INC: cap=30.0, cf=0.005, units=1
    // OREG_2_INC: cap=30.0, cf=0.005, units=1
    name "wecc240_psse_G_6201_CT";
    parent "wecc240_psse_G_6201";
    latitude 45.69;
    longitude -106.6;
    generator CT;
    operating_capacity 430.5 MW;
    startup_cost 25.0;
    shutdown_cost 0.0;
    fixed_cost 350.0;
    variable_cost 75.0;
    scarcity_cost 0.001;
}

object pypower.powerplant
{
    // FORT_PECK: cap=179.7, cf=0.03, units=1
    // YELLOWTAIL: cap=268.8, cf=0.045, units=1
    name "wecc240_psse_G_6201_HT";
    parent "wecc240_psse_G_6201";
    latitude 45.69;
    longitude -106.6;
    generator HT;
    operating_capacity 448.5 MW;
    startup_cost 0.0;
    shutdown_cost 0.0;
    fixed_cost 200.0;
    variable_cost 0.0;
    scarcity_cost 0.001;
}

object pypower.powerplant
{
    // LEWIS_CLARK: cap=34.3, cf=0.006, units=1
    name "wecc240_psse_G_6201_IC";
    parent "wecc240_psse_G_6201";
    latitude 45.69;
    longitude -106.6;
    generator IC;
    operating_capacity 34.3 MW;
    startup_cost 0.0;
    shutdown_cost 0.0;
    fixed_cost 0.0;
    variable_cost 50.0;
    scarcity_cost 0.001;
}

object pypower.powerplant
{
    // MTSUN: cap=80.0, cf=0.0, units=1
    // South Mills Solar, LLC: cap=3.0, cf=0.0, units=1
    name "wecc240_psse_G_6201_PV";
    parent "wecc240_psse_G_6201";
    latitude 45.69;
    longitude -106.6;
    generator PV;
    operating_capacity 83.0 MW;
    startup_cost 0.0;
    shutdown_cost 0.0;
    fixed_cost 0.0;
    variable_cost 0.0;
    scarcity_cost 0.0;
}

object pypower.powerplant
{
    // COLSTRIP: cap=2363.4, cf=0.396, units=1
    // COLSTRIP_ENERGY_LP: cap=46.1, cf=0.008, units=1
    // DRY_FORK_STATION: cap=483.7, cf=0.081, units=1
    // HARDIN_GENERATOR_PROJECT: cap=115.7, cf=0.019, units=1
    // LEWIS_CLARK: cap=34.3, cf=0.006, units=1
    // NEIL_SIMPSON_II: cap=65.0, cf=0.011, units=1
    // WYGEN_1: cap=90.0, cf=0.015, units=1
    // WYGEN_2: cap=95.0, cf=0.016, units=1
    // WYGEN_III: cap=116.0, cf=0.019, units=1
    // WYODAK: cap=402.3, cf=0.067, units=1
    // YELLOWSTONE_ENERGY_LP: cap=68.0, cf=0.011, units=1
    name "wecc240_psse_G_6201_ST";
    parent "wecc240_psse_G_6201";
    latitude 45.69;
    longitude -106.6;
    generator ST;
    operating_capacity 3879.5 MW;
    startup_cost 6500.0;
    shutdown_cost 0.0;
    fixed_cost 1000.0;
    variable_cost 5.0;
    scarcity_cost 0.001;
}

object pypower.powerplant
{
    // Clearwater Energy Project 1A: cap=365.52, cf=0.0, units=131
    // Clearwater Wind East: cap=208.2, cf=0.0, units=75
    // Clearwater Wind II: cap=100.02, cf=0.0, units=36
    // Clearwater Wind III: cap=99.3, cf=0.0, units=36
    // East Broadview Wind Project: cap=1.7, cf=0.0, units=1
    // Pryor Mountain: cap=239.8, cf=0.0, units=114
    // Stillwater Big Sky: cap=79.75, cf=0.0, units=31
    name "wecc240_psse_G_6201_WT";
    parent "wecc240_psse_G_6201";
    latitude 45.69;
    longitude -106.6;
    generator WT;
    operating_capacity 1094.29 MW;
    startup_cost 0.0;
    shutdown_cost 0.0;
    fixed_cost 0.0;
    variable_cost 0.0;
    scarcity_cost 0.0;
}
