// JSON to GLM Converter Output
// InputFile 'test_out.json'
// CreateDate '2025-04-22 09:47:31 '


// CLOCK
clock {
	timezone PST8PDT;
	starttime "1999-12-31 16:00:00 PST";
	stoptime "NEVER";
}

// MODULES
module pypower
{
	default_reactive_power_fraction +0.2 pu;
	minimum_voltage_magnitude_deadband +0.002 pu.kV;
	minimum_voltage_angle_deadband +0.01 deg;
	version 2;
	solver_method NR;
	maximum_timestep +0 s;
	baseMVA +100 MVA;
	enable_opf FALSE;
	opf_update_interval +0 s;
	stop_on_failure FALSE;
	save_case FALSE;
	solver_update_resolution +1e-08;
	maximum_iterations 0;
	solution_tolerance +0;
	solver_status SUCCESS;
	enforce_q_limits FALSE;
	use_dc_powerflow FALSE;
	save_format CSV;
	total_loss +0.219248 MW;
	generation_shortfall +10.0711 MW;
	with_emissions FALSE;
	maximum_iterations_opf 10;
	opf_feasibility_tolerance +1.3;
	opf_gradient_tolerance +3;
	opf_condition_tolerance +1000;
	opf_cost_tolerance +0.01;
}

// GLOBALS
// version.major is set to 4
// version.minor is set to 3
// version.patch is set to 14
// version.build is set to 250417
// version.branch is set to develop_fix_pypower_shunt
// version is set to 4.3.14-250417-develop_fix_pypower_shunt
// command_line is set to /usr/local/opt/gridlabd/4.3.14-250417-develop_fix_pypower_shunt-darwin_23-x86_64/bin/gridlabd.bin /Users/david/GitHub/dchassin/regrow/examples/example.glm
#ifndef environment
#define environment=batch
#else
#set environment=batch
#endif //environment
#ifndef quiet
global bool quiet FALSE;
#else
#set quiet=FALSE
#endif //quiet
#ifndef warn
global bool warn TRUE;
#else
#set warn=TRUE
#endif //warn
#ifndef debugger
global bool debugger FALSE;
#else
#set debugger=FALSE
#endif //debugger
#ifndef gdb
global bool gdb FALSE;
#else
#set gdb=FALSE
#endif //gdb
#ifndef debug
global bool debug FALSE;
#else
#set debug=FALSE
#endif //debug
#ifndef test
global bool test FALSE;
#else
#set test=FALSE
#endif //test
#ifndef verbose
global bool verbose FALSE;
#else
#set verbose=FALSE
#endif //verbose
#ifndef iteration_limit
global int32 iteration_limit 100;
#else
#set iteration_limit=100
#endif //iteration_limit
// workdir is set to /Users/david/GitHub/dchassin/regrow/examples
#ifndef dumpfile
#define dumpfile=gridlabd.json
#else
#set dumpfile=gridlabd.json
#endif //dumpfile
